# Strength calculation of normal sections based on a nonlinear deformation model
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# 1. Rectangular section
B := 400 mm
H := 600 mm
n_b := 8
n_h := 12
A_c := B*H = 0.24 m^2
ΔB := B/n_b = 0.05 m
ΔH := H/n_h = 0.05 m
A_bi := ΔB*ΔH = 0.0025 m^2
# Reinforcing bars
table  # each column defines a variable
    X_s (mm) | Y_s (mm) | d_s (mm)
    250 | -150 | 32
    250 | 150 | 32
    -250 | -150 | 32
    -250 | 150 | 32
    0 | -150 | 18
    0 | 150 | 18
end table
ns := rows(X_s) = 6
# Concrete elements
Sec :=
    for i ∈ 0 .. n_b - 1
        for j ∈ 0 .. n_h - 1
            Sec[j + i*n_h, 0] ← -H/2 + ΔH*j + ΔH/2
            Sec[j + i*n_h, 1] ← -B/2 + ΔB*i + ΔB/2
    Sec
nb := rows(Sec) = 96
A_b :=
    for i ∈ 0 .. nb - 1
        A_b[i] ← A_bi
    A_b
Ab :=
    for i ∈ 0 .. n_b - 1
        for j ∈ 0 .. n_h - 1
            Ab[i, j] ← A_bi
    Ab
# [3D plot: Ab (m^2)]
X_b := Sec[:, 0]
Y_b := Sec[:, 1]
# Loads
table  # each column defines a variable
    N (kN) | M_x (kN*m) | M_y (kN*m)
    -2600 | 250 | -200
end table
L := [N; M_x; M_y] = [-2600000 N; 250000 J; -200000 J]
kM_x := M_x/|M_x| = 1
kM_y := M_y/|M_y| = -1
# [reference: Concrete.mcdx]
rb := match("B25", Grade_b)[0] = 2
R_b := R__b[rb] = -14.5 MPa
k_bt := 0
R_bt := R__bt[rb]*k_bt = 0 MPa
ε_b2 := ε_b_2[rb] = -0.0035
ε_b0 := ε_b_0[rb] = -0.002
ε_bt0 := ε_b_t0[rb] = 0.0001
ε_bt2 := ε_b_t2[rb] = 0.00015
E_bi := E_b[rb] = 30000 MPa
σ_b1 := 0.6*R_b = -8.7 MPa
σ_bt1 := 0.6*R_bt = 0 MPa
ε_b1 := σ_b1/E_bi = -0.00029
ε_bt1 := σ_bt1/E_bi = 0
# [reference: Effective_length.mcdx]
l_c = 6 m
μ_x = 0.7
μ_y = 0.7
st_x = "indef"
st_y = "indef"
l_0x := μ_x*l_c = 4.2 m
# Cлучайный эксцентриситет
l_0y := μ_y*l_c = 4.2 m
e_ax := max(l_c/600, H/30, 10 mm) = 2 cm
e_ay := max(l_c/600, B/30, 10 mm) = 1.33333 cm
# Эксцентриситет продольной силы
e_0x :=
    if st_x == "indef"
        if e_ax > |M_x/N|
            e ← e_ax
        else
            e ← 0 m
    else
        e ← e_ax
    e
    = 0 cm
e_0y :=
    if st_y == "indef"
        if e_ay > |M_y/N|
            e ← e_ay
        else
            e ← 0 m
    else
        e ← e_ay
    e
    = 0 cm
# Коэффициент длительности нагрузки
M_1x := M_x = 250 kN*m
M_1y := M_y = -200 kN*m
k_dx := 0.5
k_dy := 0.5
M_1lx := k_dx*M_1x = 125 kN*m
M_1ly := k_dy*M_1y = -100 kN*m
φ_lx :=
    φ ← 1 + M_1lx/M_1x
    if φ > 2
        φ ← 2
    else
        φ
    φ
    = 1.5
φ_ly :=
    φ ← 1 + M_1ly/M_1y
    if φ > 2
        φ ← 2
    else
        φ
    φ
    = 1.5
h_0x := max(X_s) + H/2 = 0.55 m
h_0y := max(Y_s) + B/2 = 0.35 m
# Момент инерции площади сечения бетона
I_by := B*H^3/12 = 0.0072 m^4
λ_x := l_0x/sqrt(I_by/A_c) = 24.2487
I_bx := H*B^3/12 = 0.0032 m^4
λ_y := l_0x/sqrt(I_bx/A_c) = 36.3731
σb(ε) :=
    if ε ≥ ε_b2 and ε ≤ ε_b0
        σ_b ← R_b
    else if ε > ε_b0 and ε < ε_b1
        σ_b ← R_b + (ε - ε_b0)*(σ_b1 - R_b)/(ε_b1 - ε_b0)
    else if ε ≥ ε_b1 and ε ≤ ε_bt1
        σ_b ← σ_b1 + (ε - ε_b1)*σ_b1/ε_b1
    else if ε > ε_bt1 and ε < ε_bt0
        σ_b ← R_bt + (ε - ε_bt0)*(σ_bt1 - R_bt)/(ε_bt1 - ε_bt0)
    else if ε ≥ ε_bt0 and ε ≤ ε_bt2
        σ_b ← R_bt
    else
        σ_b ← 0
    σ_b
E.b :=
    for i ∈ 0 .. nb - 1
        E.b[i] ← E_bi
    E.b
ε_bi := ε_b2 - 0.00001, ε_b2 .. ε_bt2 + 0.00001
# Concrete strain-stress diagram
# [plot: σb(ε_bi) (MPa) vs ε_bi]
# [reference: Rebar.mcdx]
rs := match("A400", Grade_s)[0] = 1
ε_sc2 := ε_s_c2[rs] = -0.025
ε_s2 := ε_s_2[rs] = 0.025
R_sc := R_s_c[rs] = -350 MPa
R_s := R__s[rs] = 350 MPa
E_sj := E_s[rs] = 200000 MPa
ε_sc0 := R_sc/E_sj = -0.00175
ε_s0 := R_s/E_sj = 0.00175
E.s :=
    for j ∈ 0 .. ns - 1
        E.s[j] ← E_sj
    E.s
σs(ε) :=
    if ε ≥ ε_sc2 and ε ≤ ε_sc0
        σ_s ← R_sc
    else if ε > ε_sc0 and ε < ε_s0
        σ_s ← R_sc + (ε - ε_sc0)*E_sj
    else if ε ≥ ε_s0 and ε ≤ ε_s2
        σ_s ← R_s
    else
        σ_s ← 0
    σ_s
ε_sj := ε_sc2 - 0.00001, ε_sc2 .. ε_s2 + 0.00001
# Rebar steel strain-stress diagram
# [plot: σs(ε_sj) (MPa) vs ε_sj]
X_s = [0.25; 0.25; -0.25; -0.25; 0; 0] m
Y_s = [-0.15; 0.15; -0.15; 0.15; -0.15; 0.15] m
A_s := π*d_s^2/4 = [8.04248; 8.04248; 8.04248; 8.04248; 2.54469; 2.54469] cm^2
# Момент инерции площадей всей продольной арматуры
I_sy := (A_s*X_s^2) = 20106.2 cm^4
I_sx := (A_s*Y_s^2) = 8383.34 cm^4
k_s := 0.7
# Относительное значение эксцентриситета продольной силы
δ_ex :=
    δ ← |e_0x/H|
    if δ < 0.15
        δ ← 0.15
    else if δ > 1.5
        δ ← 1.5
    else
        δ
    δ
    = 0.15
δ_ey :=
    δ ← |e_0y/B|
    if δ < 0.15
        δ ← 0.15
    else if δ > 1.5
        δ ← 1.5
    else
        δ
    δ
    = 0.15
k_bx := 0.15/(φ_lx*(0.3 + δ_ex)) = 0.222222
k_by := 0.15/(φ_ly*(0.3 + δ_ey)) = 0.222222
# Жесткость железобетонного элемента в предельной по прочности стадии
D_x := k_bx*E_bi*I_by + k_s*E_sj*I_sy = 76148.7 kN*m^2
D_y := k_by*E_bi*I_bx + k_s*E_sj*I_sx = 33070 kN*m^2
# Условная критическая сила
N_cr(l_0, D) := π^2*D/l_0^2
N_crx := N_cr(l_0x, D_x) = 42605.3 kN
N_cry := N_cr(l_0y, D_y) = 18502.7 kN
# Коэффициент, учитывающий влияние продольного изгиба (прогиба) элемента на его несущую способность
η(l_0, D) :=
    N_cr ← N_cr(l_0, D)
    if N_cr > N
        η ← 1/(1 - N/N_cr)
    else
        η ← 1000000
    η
η_x := η(l_0x, D_x) = 0.942485
η_y := η(l_0y, D_y) = 0.876793
l_0x = 4.2 m
l__0 := 3 m, 3.1 m .. 12 m
N = -2600 kN
l_0y = 4.2 m
# [plot: N_cr(l__0, D_x) (kN), N_cr(l__0, D_y) (kN) vs l__0]
# [plot: η(l__0, D_x), η(l__0, D_y) vs l__0]
e_x := e_0x*η_x = 0 cm
e_y := e_0y*η_y = 0 cm
Load := [N; M_x + |N|*e_x*kM_x; M_y + |N|*e_y*kM_y] = [-2600000 N; 250000 J; -200000 J]
D00(v_b, v_s) := sum(vectorize(A_b[i]*E.b[i]*v_b)[i], i = 0 .. nb - 1) + sum(vectorize(A_s[j]*E.s[j]*v_s[j]), j = 0 .. ns - 1)
D11(v_b, v_s) := sum(vectorize(A_b[i]*X_b[i]^2*E.b[i]*v_b[i]), i = 0 .. nb - 1) + sum(vectorize(A_s[j]*X_s[j]^2*E.s[j]*v_s[j]), j = 0 .. ns - 1)
D22(v_b, v_s) := sum(vectorize(A_b[i]*Y_b[i]^2*E.b[i]*v_b[i]), i = 0 .. nb - 1) + sum(vectorize(A_s[j]*Y_s[j]^2*E.s[j]*v_s[j]), j = 0 .. ns - 1)
D01(v_b, v_s) := sum(vectorize(A_b[i]*X_b[i]*E.b[i]*v_b[i]), i = 0 .. nb - 1) + sum(vectorize(A_s[j]*X_s[j]*E.s[j]*v_s[j]), j = 0 .. ns - 1)
D02(v_b, v_s) := sum(vectorize(A_b[i]*Y_b[i]*E.b[i]*v_b[i]), i = 0 .. nb - 1) + sum(vectorize(A_s[j]*Y_s[j]*E.s[j]*v_s[j]), j = 0 .. ns - 1)
D12(v_b, v_s) := sum(vectorize(A_b[i]*X_b[i]*Y_b[i]*E.b[i]*v_b[i]), i = 0 .. nb - 1) + sum(vectorize(A_s[j]*X_s[j]*Y_s[j]*E.s[j]*v_s[j]), j = 0 .. ns - 1)
# Stiffness matrix
Di(v_b, v_s) :=
    Di[0, 0] ← D00(v_b, v_s)
    Di[1, 1] ← D11(v_b, v_s)
    Di[2, 2] ← D22(v_b, v_s)
    Di[0, 1] ← D01(v_b, v_s)
    Di[1, 0] ← D01(v_b, v_s)
    Di[0, 2] ← D02(v_b, v_s)
    Di[2, 0] ← D02(v_b, v_s)
    Di[1, 2] ← D12(v_b, v_s)
    Di[2, 1] ← D12(v_b, v_s)
    Di
# Linear solution
v_b :=
    for i ∈ 0 .. nb - 1
        v_b[i] ← 1
    v_b
v_s :=
    for j ∈ 0 .. ns - 1
        v_s[j] ← 1
    v_s
D := Di(v_b, v_s)
R := lsolve(D, Load)
ε_b :=
    for i ∈ 0 .. nb - 1
        ε_b[i] ← R[0] + R[1]*X_b[i] + R[2]*Y_b[i]
    ε_b
ε_s :=
    for j ∈ 0 .. ns - 1
        ε_s[j] ← R[0] + R[1]*X_s[j] + R[2]*Y_s[j]
    ε_s
σ_b :=
    for i ∈ 0 .. nb - 1
        σ_b[i] ← σb(ε_b[i])
    σ_b
σ_s :=
    for j ∈ 0 .. ns - 1
        σ_s[j] ← σs(ε_s[j])
    σ_s
# Stiffness matrix
D = [
    7.94519e9 N, -1.08033e-7 J, -5.58794e-8 J;
    -1.08033e-7 J, 254712386 kg*m^3/s^2, -4.65661e-10 kg*m^3/s^2;
    -5.58794e-8 J, -4.65661e-10 kg*m^3/s^2, 111266680 kg*m^3/s^2
]
# Strain vector
R = [-0.000327242; 0.000981499 1/m; -0.00179748 1/m]
# Number of iterations
ni := 20
# Nonlinear solution
Result :=
    for k ∈ 0 .. ni - 1
        for i ∈ 0 .. nb - 1
            v_b[i] ← σ_b[i]/(E.b[i]*ε_b[i])
        for j ∈ 0 .. ns - 1
            v_s[j] ← σ_s[j]/(E.s[j]*ε_s[j])
        D ← Di(v_b, v_s)
        R ← lsolve(D, Load)
        for i ∈ 0 .. nb - 1
            ε_b[i] ← R[0] + R[1]*X_b[i] + R[2]*Y_b[i]
        for i ∈ 0 .. nb - 1
            σ_b[i] ← σb(ε_b[i])
        for j ∈ 0 .. ns - 1
            ε_s[j] ← R[0] + R[1]*X_s[j] + R[2]*Y_s[j]
        for j ∈ 0 .. ns - 1
            σ_s[j] ← σs(ε_s[j])
        [σ_b; σ_s; ε_b; ε_s; D; R]
# Strain vector
Result[5] = [-0.000933367; 0.0043225 1/m; -0.00773873 1/m]
# Stiffness matrix
Result[4] = [
    2.9337e9 N, -5562393 J, -20967668 J;
    -5562393 J, 94277865 kg*m^3/s^2, 21025138 kg*m^3/s^2;
    -20967668 J, 21025138 kg*m^3/s^2, 40116643 kg*m^3/s^2
]
# Convergence check
N_c := sum(vectorize(A_b[i]*Result[0][i]), i = 0 .. nb - 1) + sum(vectorize(A_s[j]*Result[1][j]), j = 0 .. ns - 1) = -2597.98 kN
M_xc := sum(vectorize(A_b[i]*Result[0][i]*X_b)[i], i = 0 .. nb - 1) + sum(vectorize(A_s[j]*Result[1][j]*X_s[j]), j = 0 .. ns - 1) = 249.801 kN*m
M_yc := sum(vectorize(A_b[i]*Result[0][i]*Y_b)[i], i = 0 .. nb - 1) + sum(vectorize(A_s[j]*Result[1][j]*Y_s[j]), j = 0 .. ns - 1) = -199.846 kN*m
# Rebars stress
X_s = [0.25; 0.25; -0.25; -0.25; 0; 0] m
Y_s = [-0.15; 0.15; -0.15; 0.15; -0.15; 0.15] m
Result[1] = [261.613; -202.71; -170.637; -350; 45.4884; -350] MPa
# Rebars strain
X_s = [0.25; 0.25; -0.25; -0.25; 0; 0] m
Y_s = [-0.15; 0.15; -0.15; 0.15; -0.15; 0.15] m
Result[3] = [0.00130807; -0.00101355; -0.000853183; -0.0031748; 0.000227442; -0.00209418]
σ_0 := submatrix(Result[0], 0, n_h - 1, 0, 0)
ε_0 := submatrix(Result[2], 0, n_h - 1, 0, 0)
σε_b :=
    for i ∈ 2 .. n_b
        σ ← submatrix(Result[0], n_h*i - n_h, n_h*i - 1, 0, 0)
        ε ← submatrix(Result[2], n_h*i - n_h, n_h*i - 1, 0, 0)
        σ_0 ← augment(σ_0, σ)
        ε_0 ← augment(ε_0, ε)
    [σ_0; ε_0]
# Concrete stress
σε_b[0] = [
    -10.3205, -11.6329, -12.9454, -14.2578, -14.5, -14.5, -14.5, -14.5;
    -9.58748, -10.8999, -12.2123, -13.5247, -14.5, -14.5, -14.5, -14.5;
    -8.85442, -10.1668, -11.4793, -12.7917, -14.1041, -14.5, -14.5, -14.5;
    -3.58208, -9.43378, -10.7462, -12.0586, -13.371, -14.5, -14.5, -14.5;
    0, -8.70073, -10.0131, -11.3256, -12.638, -13.9504, -14.5, -14.5;
    0, -2.22267, -9.28009, -10.5925, -11.9049, -13.2173, -14.5, -14.5;
    0, 0, -7.347, -9.85945, -11.1719, -12.4843, -13.7967, -14.5;
    0, 0, -0.863256, -9.12639, -10.4388, -11.7512, -13.0636, -14.3761;
    0, 0, 0, -5.98759, -9.70575, -11.0182, -12.3306, -13.643;
    0, 0, 0, 0, -8.97269, -10.2851, -11.5975, -12.9099;
    0, 0, 0, 0, -4.62818, -9.55205, -10.8645, -12.1769;
    0, 0, 0, 0, 0, -8.819, -10.1314, -11.4438
] MPa
# Concrete stress
# [contour plot: σε_b[0] (MPa)]
# Concrete stress
# [3D plot: σε_b[0] (MPa)]
# Concrete strain
σε_b[1] = [
    -0.000767777, -0.00115471, -0.00154165, -0.00192859, -0.00231552, -0.00270246, -0.0030894, -0.00347633;
    -0.000551652, -0.000938589, -0.00132553, -0.00171246, -0.0020994, -0.00248633, -0.00287327, -0.00326021;
    -0.000335528, -0.000722464, -0.0011094, -0.00149634, -0.00188327, -0.00227021, -0.00265715, -0.00304408;
    -0.000119403, -0.000506339, -0.000893275, -0.00128021, -0.00166715, -0.00205408, -0.00244102, -0.00282796;
    9.67224e-5, -0.000290214, -0.00067715, -0.00106409, -0.00145102, -0.00183796, -0.0022249, -0.00261183;
    0.000312847, -7.40889e-5, -0.000461025, -0.000847961, -0.0012349, -0.00162183, -0.00200877, -0.00239571;
    0.000528972, 0.000142036, -0.0002449, -0.000631836, -0.00101877, -0.00140571, -0.00179265, -0.00217958;
    0.000745097, 0.000358161, -2.87752e-5, -0.000415711, -0.000802648, -0.00118958, -0.00157652, -0.00196346;
    0.000961222, 0.000574286, 0.00018735, -0.000199586, -0.000586523, -0.000973459, -0.0013604, -0.00174733;
    0.00117735, 0.000790411, 0.000403475, 1.65385e-5, -0.000370398, -0.000757334, -0.00114427, -0.00153121;
    0.00139347, 0.00100654, 0.0006196, 0.000232663, -0.000154273, -0.000541209, -0.000928145, -0.00131508;
    0.0016096, 0.00122266, 0.000835725, 0.000448788, 6.18522e-5, -0.000325084, -0.00071202, -0.00109896
]
# Concrete strain
# [contour plot: σε_b[1] (MPa)]
# Concrete strain
# [3D plot: σε_b[1]]
