# Strength calculation of normal sections based on a nonlinear deformation model
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# 1. Rectangular section
B := 400 mm
H := 600 mm
n_b := 8
n_h := 12
ΔB := B/n_b = 0.05 m
ΔH := H/n_h = 0.05 m
A_bi := ΔB*ΔH = 0.0025 m^2
# Reinforcing bars
table  # each column defines a variable
    X_s (mm) | Y_s (mm) | d_s (mm)
    250 | -150 | 32
    250 | 150 | 32
    -250 | -150 | 32
    -250 | 150 | 32
    0 | -150 | 18
    0 | 150 | 18
end table
ns := rows(X_s) = 6
# Concrete elements
Sec :=
    for i ∈ 0 .. n_b - 1
        for j ∈ 0 .. n_h - 1
            Sec[j + i*n_h, 0] ← -H/2 + ΔH*j + ΔH/2
            Sec[j + i*n_h, 1] ← -B/2 + ΔB*i + ΔB/2
    Sec
nb := rows(Sec) = 96
A_b :=
    for i ∈ 0 .. nb - 1
        A_b[i] ← A_bi
    A_b
Ab :=
    for i ∈ 0 .. n_b - 1
        for j ∈ 0 .. n_h - 1
            Ab[i, j] ← A_bi
    Ab
# [3D plot: Ab (m^2)]
X_b := Sec[:, 0]
Y_b := Sec[:, 1]
# Loads
table  # each column defines a variable
    N (kN) | M_x (kN*m) | M_y (kN*m)
    -2600 | 250 | -200
end table
L := [N; M_x; M_y]
# [reference: Concrete.mcdx]
r := match("B25", Grade)[0] = 2
R_b := R_b[r] = -14.5 MPa
R_bt := R_bt[r] = 1.05 MPa
ε_b2 := ε_b2[r] = -0.0035
ε_b0 := ε_b0[r] = -0.002
ε_bt0 := ε_bt0[r] = 0.0001
ε_bt2 := ε_bt2[r] = 0.00015
E_bi := E[r] = 30000 MPa
σ_b1 := 0.6*R_b = -8.7 MPa
σ_bt1 := 0.6*R_bt = 0.63 MPa
ε_b1 := σ_b1/E_bi = -0.00029
ε_bt1 := σ_bt1/E_bi = 2.1e-5
σb(ε) :=
    if ε ≥ ε_b2 and ε ≤ ε_b0
        σ_b ← R_b
    else if ε > ε_b0 and ε < ε_b1
        σ_b ← R_b + (ε - ε_b0)*(σ_b1 - R_b)/(ε_b1 - ε_b0)
    else if ε ≥ ε_b1 and ε ≤ ε_bt1
        σ_b ← σ_b1 + (ε - ε_b1)*σ_b1/ε_b1
    else if ε > ε_bt1 and ε < ε_bt0
        σ_b ← R_bt + (ε - ε_bt0)*(σ_bt1 - R_bt)/(ε_bt1 - ε_bt0)
    else if ε ≥ ε_bt0 and ε ≤ ε_bt2
        σ_b ← R_bt
    else
        σ_b ← 0
    σ_b
E_b :=
    for i ∈ 0 .. nb - 1
        E_b[i] ← E_bi
    E_b
ε := ε_b2 - 0.00001, ε_b2 .. ε_bt2 + 0.00001
# Concrete strain-stress diagramm
# [plot: σb(ε) (MPa) vs ε]
# [reference: Rebar.mcdx]
r := match("A400", Grade)[0] = 1
ε_sc2 := ε_sc2[r] = -0.025
ε_s2 := ε_s2[r] = 0.025
R_sc := R_sc[r] = -350 MPa
R_s := R_s[r] = 350 MPa
E_sj := E[r] = 200000 MPa
ε_sc0 := R_sc/E_sj = -0.00175
ε_s0 := R_s/E_sj = 0.00175
E_s :=
    for j ∈ 0 .. ns - 1
        E_s[j] ← E_sj
    E_s
σs(ε) :=
    if ε ≥ ε_sc2 and ε ≤ ε_sc0
        σ_s ← R_sc
    else if ε > ε_sc0 and ε < ε_s0
        σ_s ← R_sc + (ε - ε_sc0)*E_sj
    else if ε ≥ ε_s0 and ε ≤ ε_s2
        σ_s ← R_s
    else
        σ_s ← 0
    σ_s
ε := ε_sc2 - 0.00001, ε_sc2 .. ε_s2 + 0.00001
# Rebar steel strain-stress diagramm
# [plot: σs(ε) (MPa) vs ε]
X_s = [0.25; 0.25; -0.25; -0.25; 0; 0] m
Y_s = [-0.15; 0.15; -0.15; 0.15; -0.15; 0.15] m
A_s := π*d_s^2/4 = [8.04248; 8.04248; 8.04248; 8.04248; 2.54469; 2.54469] cm^2
D00(v_b, v_s) := sum(vectorize(A_b[i]*E_b[i]*v_b)[i], i = 0 .. nb - 1) + sum(vectorize(A_s[j]*E_s[j]*v_s[j]), j = 0 .. ns - 1)
D11(v_b, v_s) := sum(vectorize(A_b[i]*X_b[i]^2*E_b[i]*v_b[i]), i = 0 .. nb - 1) + sum(vectorize(A_s[j]*X_s[j]^2*E_s[j]*v_s[j]), j = 0 .. ns - 1)
D22(v_b, v_s) := sum(vectorize(A_b[i]*Y_b[i]^2*E_b[i]*v_b[i]), i = 0 .. nb - 1) + sum(vectorize(A_s[j]*Y_s[j]^2*E_s[j]*v_s[j]), j = 0 .. ns - 1)
D01(v_b, v_s) := sum(vectorize(A_b[i]*X_b[i]*E_b[i]*v_b[i]), i = 0 .. nb - 1) + sum(vectorize(A_s[j]*X_s[j]*E_s[j]*v_s[j]), j = 0 .. ns - 1)
D02(v_b, v_s) := sum(vectorize(A_b[i]*Y_b[i]*E_b[i]*v_b[i]), i = 0 .. nb - 1) + sum(vectorize(A_s[j]*Y_s[j]*E_s[j]*v_s[j]), j = 0 .. ns - 1)
D12(v_b, v_s) := sum(vectorize(A_b[i]*X_b[i]*Y_b[i]*E_b[i]*v_b[i]), i = 0 .. nb - 1) + sum(vectorize(A_s[j]*X_s[j]*Y_s[j]*E_s[j]*v_s[j]), j = 0 .. ns - 1)
# Stiffness matrix
Di(v_b, v_s) :=
    Di[0, 0] ← D00(v_b, v_s)
    Di[1, 1] ← D11(v_b, v_s)
    Di[2, 2] ← D22(v_b, v_s)
    Di[0, 1] ← D01(v_b, v_s)
    Di[1, 0] ← D01(v_b, v_s)
    Di[0, 2] ← D02(v_b, v_s)
    Di[2, 0] ← D02(v_b, v_s)
    Di[1, 2] ← D12(v_b, v_s)
    Di[2, 1] ← D12(v_b, v_s)
    Di
# Linear solution
v_b :=
    for i ∈ 0 .. nb - 1
        v_b[i] ← 1
    v_b
v_s :=
    for j ∈ 0 .. ns - 1
        v_s[j] ← 1
    v_s
D := Di(v_b, v_s)
R := lsolve(D, L)
ε_b :=
    for i ∈ 0 .. nb - 1
        ε_b[i] ← R[0] + R[1]*X_b[i] + R[2]*Y_b[i]
    ε_b
ε_s :=
    for j ∈ 0 .. ns - 1
        ε_s[j] ← R[0] + R[1]*X_s[j] + R[2]*Y_s[j]
    ε_s
σ_b :=
    for i ∈ 0 .. nb - 1
        σ_b[i] ← σb(ε_b[i])
    σ_b
σ_s :=
    for j ∈ 0 .. ns - 1
        σ_s[j] ← σs(ε_s[j])
    σ_s
# Number of iterations
ni := 20
# NonLinear solution
Result :=
    for k ∈ 0 .. ni - 1
        for i ∈ 0 .. nb - 1
            v_b[i] ← σ_b[i]/(E_b[i]*ε_b[i])
        for j ∈ 0 .. ns - 1
            v_s[j] ← σ_s[j]/(E_s[j]*ε_s[j])
        D ← Di(v_b, v_s)
        R ← lsolve(D, L)
        for i ∈ 0 .. nb - 1
            ε_b[i] ← R[0] + R[1]*X_b[i] + R[2]*Y_b[i]
        for i ∈ 0 .. nb - 1
            σ_b[i] ← σb(ε_b[i])
        for j ∈ 0 .. ns - 1
            ε_s[j] ← R[0] + R[1]*X_s[j] + R[2]*Y_s[j]
        for j ∈ 0 .. ns - 1
            σ_s[j] ← σs(ε_s[j])
        [σ_b; σ_s; ε_b; ε_s; D; R]
# Loads
L = [-2600000 N; 250000 J; -200000 J]
# Strain vector
R = [-0.000327242; 0.000981499 1/m; -0.00179748 1/m]
# Stiffness matrix
D = [
    7.94519e9 N, -1.08033e-7 J, -5.58794e-8 J;
    -1.08033e-7 J, 254712386 kg*m^3/s^2, -4.65661e-10 kg*m^3/s^2;
    -5.58794e-8 J, -4.65661e-10 kg*m^3/s^2, 111266680 kg*m^3/s^2
]
# Convergence check
N := sum(vectorize(A_b[i]*Result[0][i]), i = 0 .. nb - 1) + sum(vectorize(A_s[j]*Result[1][j]), j = 0 .. ns - 1) = -2597.95 kN
Mx := sum(vectorize(A_b[i]*Result[0][i]*X_b)[i], i = 0 .. nb - 1) + sum(vectorize(A_s[j]*Result[1][j]*X_s[j]), j = 0 .. ns - 1) = 249.795 kN*m
My := sum(vectorize(A_b[i]*Result[0][i]*Y_b)[i], i = 0 .. nb - 1) + sum(vectorize(A_s[j]*Result[1][j]*Y_s[j]), j = 0 .. ns - 1) = -199.846 kN*m
# Rebars stress
X_s = [0.25; 0.25; -0.25; -0.25; 0; 0] m
Y_s = [-0.15; 0.15; -0.15; 0.15; -0.15; 0.15] m
Result[1] = [258.972; -203.144; -171.503; -350; 43.7346; -350] MPa
# Rebars strain
X_s = [0.25; 0.25; -0.25; -0.25; 0; 0] m
Y_s = [-0.15; 0.15; -0.15; 0.15; -0.15; 0.15] m
Result[3] = [0.00129486; -0.00101572; -0.000857513; -0.00316809; 0.000218673; -0.00209191]
σ_0 := submatrix(Result[0], 0, n_h - 1, 0, 0)
ε_0 := submatrix(Result[2], 0, n_h - 1, 0, 0)
σε_b :=
    for i ∈ 2 .. n_b
        σ ← submatrix(Result[0], n_h*i - n_h, n_h*i - 1, 0, 0)
        ε ← submatrix(Result[2], n_h*i - n_h, n_h*i - 1, 0, 0)
        σ_0 ← augment(σ_0, σ)
        ε_0 ← augment(ε_0, ε)
    [σ_0; ε_0]
# Concrete stress
σε_b[0] = [
    -10.3368, -11.643, -12.9492, -14.2554, -14.5, -14.5, -14.5, -14.5;
    -9.60679, -10.913, -12.2191, -13.5253, -14.5, -14.5, -14.5, -14.5;
    -8.87674, -10.1829, -11.4891, -12.7953, -14.1014, -14.5, -14.5, -14.5;
    -3.80614, -9.45287, -10.7591, -12.0652, -13.3714, -14.5, -14.5, -14.5;
    0.988147, -8.72283, -10.029, -11.3352, -12.6414, -13.9475, -14.5, -14.5;
    0, -2.44482, -9.29896, -10.6051, -11.9113, -13.2175, -14.5, -14.5;
    0, 1.05, -7.54061, -9.8751, -11.1813, -12.4874, -13.7936, -14.5;
    0, 0, -1.08349, -9.14505, -10.4512, -11.7574, -13.0636, -14.3698;
    0, 0, 0, -6.17928, -9.72118, -11.0274, -12.3335, -13.6397;
    0, 0, 0, 0.277831, -8.99114, -10.2973, -11.6035, -12.9097;
    0, 0, 0, 0, -4.81796, -9.56727, -10.8734, -12.1796;
    0, 0, 0, 0, 0.808838, -8.83723, -10.1434, -11.4496
] MPa
# Concrete stress
# [contour plot: σε_b[0] (MPa)]
# Concrete stress
# [3D plot: σε_b[0] (MPa)]
# Concrete strain
σε_b[1] = [
    -0.000772583, -0.00115768, -0.00154278, -0.00192787, -0.00231297, -0.00269807, -0.00308316, -0.00346826;
    -0.000557346, -0.000942443, -0.00132754, -0.00171264, -0.00209773, -0.00248283, -0.00286793, -0.00325302;
    -0.000342109, -0.000727205, -0.0011123, -0.0014974, -0.0018825, -0.00226759, -0.00265269, -0.00303779;
    -0.000126871, -0.000511968, -0.000897065, -0.00128216, -0.00166726, -0.00205236, -0.00243745, -0.00282255;
    8.83658e-5, -0.000296731, -0.000681828, -0.00106692, -0.00145202, -0.00183712, -0.00222222, -0.00260731;
    0.000303603, -8.14939e-5, -0.000466591, -0.000851688, -0.00123678, -0.00162188, -0.00200698, -0.00239208;
    0.00051884, 0.000133743, -0.000251354, -0.00063645, -0.00102155, -0.00140664, -0.00179174, -0.00217684;
    0.000734077, 0.00034898, -3.61164e-5, -0.000421213, -0.00080631, -0.00119141, -0.0015765, -0.0019616;
    0.000949314, 0.000564218, 0.000179121, -0.000205976, -0.000591073, -0.00097617, -0.00136127, -0.00174636;
    0.00116455, 0.000779455, 0.000394358, 9.26104e-6, -0.000375836, -0.000760933, -0.00114603, -0.00153113;
    0.00137979, 0.000994692, 0.000609595, 0.000224498, -0.000160599, -0.000545696, -0.000930792, -0.00131589;
    0.00159503, 0.00120993, 0.000824832, 0.000439735, 5.46385e-5, -0.000330458, -0.000715555, -0.00110065
]
# Concrete strain
# [contour plot: σε_b[1] (MPa)]
# Concrete strain
# [3D plot: σε_b[1]]
