# Effective length of column
# Length of column
l_c := 6 m
table  # each column defines a variable
    U | R
    "free" | "free"
    "fixed" | "fixed"
end table
# Top
# Bottom
μ_i(U, R) :=
    if U[0] == "fixed" and R[0] == "free" and (U[1] == "fixed" and R[1] == "free")
        1
    else if U[0] == "free" and R[0] == "free" and (U[1] == "fixed" and R[1] == "fixed")
        2
    else if U[0] == "fixed" and R[0] == "fixed" and (U[1] == "free" and R[1] == "free")
        2
    else if U[0] == "fixed" and R[0] == "free" and (U[1] == "fixed" and R[1] == "fixed")
        0.7
    else if U[0] == "fixed" and R[0] == "fixed" and (U[1] == "fixed" and R[1] == "free")
        0.7
    else if U[0] == "fixed" and R[0] == "free" and (U[1] == "fixed" and R[1] == "lim")
        0.9
    else if U[0] == "fixed" and R[0] == "lim" and (U[1] == "fixed" and R[1] == "free")
        0.9
    else if U[0] == "lim" and R[0] == "free" and (U[1] == "fixed" and R[1] == "fixed")
        1.5
    else if U[0] == "fixed" and R[0] == "fixed" and (U[1] == "lim" and R[1] == "free")
        1.5
    else if U[0] == "lim" and R[0] == "free" and (U[1] == "lim" and R[1] == "fixed")
        2
    else if U[0] == "lim" and R[0] == "fixed" and (U[1] == "lim" and R[1] == "free")
        2
    else if U[0] == "fixed" and R[0] == "fixed" and (U[1] == "fixed" and R[1] == "fixed")
        0.5
    else if U[0] == "fixed" and R[0] == "lim" and (U[1] == "fixed" and R[1] == "lim")
        0.8
    else if U[0] == "lim" and R[0] == "fixed" and (U[1] == "lim" and R[1] == "fixed")
        0.8
    else if U[0] == "lim" and R[0] == "lim" and (U[1] == "lim" and R[1] == "lim")
        1.2
    else
        "undefined"
μ := μ_i(U, R) = 2
