table  # each column defines a variable
    Grade_s | ε_s_c2 | ε_s_c0 | ε_s_0 | ε_s_2 | R_s_c (MPa) | R__s (MPa) | E_s (MPa)
    "A240" | -0.025 | -0.00105 | 0.00105 | 0.025 | -210 | 210 | 200000
    "A400" | -0.025 | -0.00175 | 0.00175 | 0.025 | -350 | 350 | 200000
    "A500" | -0.025 | -0.002 | 0.002175 | 0.025 | -400 | 435 | 200000
end table
