# Effective length of column
# Length of column
l_c := 6 m
μ_i(U, R) :=
    if U[0] == "fixed" and R[0] == "free" and (U[1] == "fixed" and R[1] == "free")
        1
    else if U[0] == "free" and R[0] == "free" and (U[1] == "fixed" and R[1] == "fixed")
        2
    else if U[0] == "fixed" and R[0] == "fixed" and (U[1] == "free" and R[1] == "free")
        2
    else if U[0] == "fixed" and R[0] == "free" and (U[1] == "fixed" and R[1] == "fixed")
        0.7
    else if U[0] == "fixed" and R[0] == "fixed" and (U[1] == "fixed" and R[1] == "free")
        0.7
    else if U[0] == "fixed" and R[0] == "free" and (U[1] == "fixed" and R[1] == "lim")
        0.9
    else if U[0] == "fixed" and R[0] == "lim" and (U[1] == "fixed" and R[1] == "free")
        0.9
    else if U[0] == "lim" and R[0] == "free" and (U[1] == "fixed" and R[1] == "fixed")
        1.5
    else if U[0] == "fixed" and R[0] == "fixed" and (U[1] == "lim" and R[1] == "free")
        1.5
    else if U[0] == "lim" and R[0] == "free" and (U[1] == "lim" and R[1] == "fixed")
        2
    else if U[0] == "lim" and R[0] == "fixed" and (U[1] == "lim" and R[1] == "free")
        2
    else if U[0] == "fixed" and R[0] == "fixed" and (U[1] == "fixed" and R[1] == "fixed")
        0.5
    else if U[0] == "fixed" and R[0] == "lim" and (U[1] == "fixed" and R[1] == "lim")
        0.8
    else if U[0] == "lim" and R[0] == "fixed" and (U[1] == "lim" and R[1] == "fixed")
        0.8
    else if U[0] == "lim" and R[0] == "lim" and (U[1] == "lim" and R[1] == "lim")
        1.2
    else
        "undefined"
table  # each column defines a variable
    Point_x | U_ix | R_ix
    "Top" | "fixed" | "free"
    "Bottom" | "fixed" | "fixed"
end table
μ_x := μ_i(U_ix, R_ix) = 0.7
st_x :=
    if U_ix[0] == "fixed" and R_ix[0] == "free" and (U_ix[1] == "fixed" and R_ix[1] == "free")
        s ← "def"
    else if U_ix[0] == "free" and R_ix[0] == "free" and (U_ix[1] == "fixed" and R_ix[1] == "fixed")
        s ← "def"
    else if U_ix[0] == "fixed" and R_ix[0] == "fixed" and (U_ix[1] == "free" and R_ix[1] == "free")
        s ← "def"
    else
        s ← "indef"
    s
    = "indef"
table  # each column defines a variable
    Point_y | U_iy | R_iy
    "Top" | "fixed" | "free"
    "Bottom" | "fixed" | "fixed"
end table
μ_y := μ_i(U_ix, R_ix) = 0.7
st_y :=
    if U_iy[0] == "fixed" and R_iy[0] == "free" and (U_iy[1] == "fixed" and R_iy[1] == "free")
        s ← "def"
    else if U_iy[0] == "free" and R_iy[0] == "free" and (U_iy[1] == "fixed" and R_iy[1] == "fixed")
        s ← "def"
    else if U_iy[0] == "fixed" and R_iy[0] == "fixed" and (U_iy[1] == "free" and R_iy[1] == "free")
        s ← "def"
    else
        s ← "indef"
    s
    = "indef"
