# Расчёт плоской рамы методом деформаций
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# Узлы | Элементы
table  # each column defines a variable
    x (m) | z (m) | U_x | U_z | R_y | F_x (kN) | F_z (kN) | M_y (kN·m) | m_x (tonne)
    0 | 4 | 0 | 0 | 0 | 0 | -20 | 0 | 0
    2 | 4 | 0 | 0 | 0 | 0 | 0 | 0 | 2
    2 | 2 | 0 | 0 | 0 | 20 | 0 | 0 | 0
    2 | 0 | 1 | 1 | 1 | 0 | 0 | 0 | 0
    10 | 4 | 0 | 0 | 0 | 0 | 0 | 0 | 2
    13 | 0 | 1 | 1 | 0 | 0 | 0 | 0 | 0
end table
table  # each column defines a variable
    j_s | j_e | R_s | R_e | A (m^2) | J (m^4) | E (MPa) | q_1 (kN/m) | q_2 (kN/m)
    0 | 1 | 0 | 0 | 200 | 20 | 1 | 0 | 0
    1 | 2 | 1 | 0 | 100 | 10 | 1 | 0 | 0
    2 | 3 | 0 | 0 | 100 | 10 | 1 | 0 | 0
    1 | 4 | 0 | 0 | 200 | 20 | 1 | 0 | -10
    4 | 5 | 0 | 0 | 100 | 10 | 1 | 0 | -10
    3 | 4 | 1 | 1 | 100 | 10 | 1 | 10 | -5
end table
# 1 - закрепление | 1 - шарнир
# количество узлов
n_j := rows(x) = 6
# количество элементов
n_f := rows(j_s) = 6
# Длины элементов
l :=
    for i ∈ 0 .. n_f - 1
        l[i] ← sqrt((x[j_e[i]] - x[j_s[i]])^2 + (z[j_e[i]] - z[j_s[i]])^2)
    l
# Косинусы α | Синусы α | Матрица преобразования координат
cos :=
    for i ∈ 0 .. n_f - 1
        c[i] ← (x[j_e[i]] - x[j_s[i]])/l[i]
    c
sin :=
    for i ∈ 0 .. n_f - 1
        s[i] ← (z[j_e[i]] - z[j_s[i]])/l[i]
    s
T_α(i) := [
    cos[i], sin[i], 0, 0, 0, 0;
    -sin[i], cos[i], 0, 0, 0, 0;
    0, 0, 1, 0, 0, 0;
    0, 0, 0, cos[i], sin[i], 0;
    0, 0, 0, -sin[i], cos[i], 0;
    0, 0, 0, 0, 0, 1
]
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# Матрицы приведения размерностей
U_1 := [
    m, m, m, m, m, m;
    m, m, 1, m, m, 1;
    m, 1, 1/m, m, 1, 1/m;
    m, m, m, m, m, m;
    m, m, 1, m, m, 1;
    m, 1, 1/m, m, 1, 1/m
]*1/kN
P_1 := [1; 1; 1/m; 1; 1; 1/m]*1/kN
# Матрицы жесткости и узловые равнодействующие от равномерных нагрузок КЭ в локальной системе координат
K'_1(i) := [
    E[i]*A[i]/l[i], 0, 0, -E[i]*A[i]/l[i], 0, 0;
    0, 12*E[i]*J[i]/l[i]^3, -6*E[i]*J[i]/l[i]^2, 0, -12*E[i]*J[i]/l[i]^3, -6*E[i]*J[i]/l[i]^2;
    0, -6*E[i]*J[i]/l[i]^2, 4*E[i]*J[i]/l[i], 0, 6*E[i]*J[i]/l[i]^2, 2*E[i]*J[i]/l[i];
    -E[i]*A[i]/l[i], 0, 0, E[i]*A[i]/l[i], 0, 0;
    0, -12*E[i]*J[i]/l[i]^3, 6*E[i]*J[i]/l[i]^2, 0, 12*E[i]*J[i]/l[i]^3, 6*E[i]*J[i]/l[i]^2;
    0, -6*E[i]*J[i]/l[i]^2, 2*E[i]*J[i]/l[i], 0, 6*E[i]*J[i]/l[i]^2, 4*E[i]*J[i]/l[i]
]
# Матрицы жесткости и узловые равнодействующие от равномерных нагрузок КЭ в глобальной системе координат
P'_q1(i) := [q_1[i]*l[i]/2; q_2[i]*l[i]/2; -q_2[i]*l[i]^2/12; q_1[i]*l[i]/2; q_2[i]*l[i]/2; q_2[i]*l[i]^2/12]
K_1(i) := transpose(T_α(i))*vectorize(K'_1(i)*U_1)*T_α(i)
P_q1(i) := transpose(T_α(i))*vectorize(P'_q1(i)*P_1)
# Матрицы приведения размерностей
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U_2 := [
    m, m, m, m, m, m;
    m, m, 1, m, m, m;
    m, 1, 1/m, m, 1, m;
    m, m, m, m, m, m;
    m, m, 1, m, m, m;
    m, m, m, m, m, m
]*1/kN
P_2 := [1; 1; 1/m; 1; 1; 1]*1/kN
# Матрицы жесткости и узловые равнодействующие от равномерных нагрузок КЭ в локальной системе координат
K'_2(i) := [
    E[i]*A[i]/l[i], 0, 0, -E[i]*A[i]/l[i], 0, 0;
    0, 3*E[i]*J[i]/l[i]^3, -3*E[i]*J[i]/l[i]^2, 0, -3*E[i]*J[i]/l[i]^3, 0;
    0, -3*E[i]*J[i]/l[i]^2, 3*E[i]*J[i]/l[i], 0, 3*E[i]*J[i]/l[i]^2, 0;
    -E[i]*A[i]/l[i], 0, 0, E[i]*A[i]/l[i], 0, 0;
    0, -3*E[i]*J[i]/l[i]^3, 3*E[i]*J[i]/l[i]^2, 0, 3*E[i]*J[i]/l[i]^3, 0;
    0, 0, 0, 0, 0, 0
]
# Матрицы жесткости и узловые равнодействующие от равномерных нагрузок КЭ в глобальной системе координат
P'_q2(i) := [q_1[i]*l[i]/2; 5*q_2[i]*l[i]/8; -q_2[i]*l[i]^2/8; q_1[i]*l[i]/2; 3*q_2[i]*l[i]/8; 0]
K_2(i) := transpose(T_α(i))*vectorize(K'_2(i)*U_2)*T_α(i)
P_q2(i) := transpose(T_α(i))*vectorize(P'_q2(i)*P_2)
# Матрицы приведения размерностей
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U_3 := [
    m, m, m, m, m, m;
    m, m, m, m, m, 1;
    m, m, m, m, m, m;
    m, m, m, m, m, m;
    m, m, m, m, m, 1;
    m, 1, m, m, 1, 1/m
]*1/kN
P_3 := [1; 1; 1; 1; 1; 1/m]*1/kN
# Матрицы жесткости и узловые равнодействующие от равномерных нагрузок КЭ в локальной системе координат
K'_3(i) := [
    E[i]*A[i]/l[i], 0, 0, -E[i]*A[i]/l[i], 0, 0;
    0, 3*E[i]*J[i]/l[i]^3, 0, 0, -3*E[i]*J[i]/l[i]^3, -3*E[i]*J[i]/l[i]^2;
    0, 0, 0, 0, 0, 0;
    -E[i]*A[i]/l[i], 0, 0, E[i]*A[i]/l[i], 0, 0;
    0, -3*E[i]*J[i]/l[i]^3, 0, 0, 3*E[i]*J[i]/l[i]^3, 3*E[i]*J[i]/l[i]^2;
    0, -3*E[i]*J[i]/l[i]^2, 0, 0, 3*E[i]*J[i]/l[i]^2, 3*E[i]*J[i]/l[i]
]
# Матрицы жесткости и узловые равнодействующие от равномерных нагрузок КЭ в глобальной системе координат
P'_q3(i) := [q_1[i]*l[i]/2; 3*q_2[i]*l[i]/8; 0; q_1[i]*l[i]/2; 5*q_2[i]*l[i]/8; q_2[i]*l[i]^2/8]
K_3(i) := transpose(T_α(i))*vectorize(K'_3(i)*U_3)*T_α(i)
P_q3(i) := transpose(T_α(i))*vectorize(P'_q3(i)*P_3)
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# Матрицы приведения размерностей
U_4 := [
    m, m, m, m, m, m;
    m, m, m, m, m, m;
    m, m, m, m, m, m;
    m, m, m, m, m, m;
    m, m, m, m, m, m;
    m, m, m, m, m, m
]*1/kN
P_4 := [1; 1; 1; 1; 1; 1]*1/kN
# Матрицы жесткости и узловые равнодействующие от равномерных нагрузок КЭ в локальной системе координат
K'_4(i) := [
    E[i]*A[i]/l[i], 0, 0, -E[i]*A[i]/l[i], 0, 0;
    0, 0, 0, 0, 0, 0;
    0, 0, 0, 0, 0, 0;
    -E[i]*A[i]/l[i], 0, 0, E[i]*A[i]/l[i], 0, 0;
    0, 0, 0, 0, 0, 0;
    0, 0, 0, 0, 0, 0
]
P'_q4(i) := [q_1[i]*l[i]/2; q_2[i]*l[i]/2; 0; q_1[i]*l[i]/2; q_2[i]*l[i]/2; 0]
# Матрицы жесткости и узловые равнодействующие от равномерных нагрузок КЭ в глобальной системе координат
K_4(i) := transpose(T_α(i))*vectorize(K'_4(i)*U_4)*T_α(i)
P_q4(i) := transpose(T_α(i))*vectorize(P'_q4(i)*P_4)
# Матрица жёсткости конечных элементов | Узловые равнодействующие от равномерных нагрузок
K_i(i) :=
    if R_s[i] == 0 and R_e[i] == 0
        K ← K_1(i)
    else if R_s[i] == 0 and R_e[i] == 1
        K ← K_2(i)
    else if R_s[i] == 1 and R_e[i] == 0
        K ← K_3(i)
    else
        K ← K_4(i)
    K
P_q(i) :=
    if R_s[i] == 0 and R_e[i] == 0
        P ← P_q1(i)
    else if R_s[i] == 0 and R_e[i] == 1
        P ← P_q2(i)
    else if R_s[i] == 1 and R_e[i] == 0
        P ← P_q3(i)
    else
        P ← P_q4(i)
    P
# Степени свободы узлов | Матрица топологии | Матрица положения КЭ
DoF :=
    k ← 0
    for i ∈ 0 .. n_j - 1
        for j ∈ 0 .. 2
            dof[i, j] ← i + j + k
        k ← k + 2
    dof
A_f :=
    for i ∈ 0 .. n_f - 1
        for j ∈ 0 .. 2
            af[j, i] ← DoF[j_s[i], j]
            af[j + 3, i] ← DoF[j_e[i], j]
    af
C_i(f) :=
    for i ∈ 0 .. 5
        for j ∈ n_j*3 - 1
            c[i, j] ← 0
    for i ∈ 0 .. 5
        k ← A_f[i, f]
        c[i, k] ← 1
    c
# Узловые нагрузки | Узловые равнодействующие от равномерных нагрузок | Полные узловые нагрузки
F_p :=
    for i ∈ n_j*3 - 1
        f[i] ← 0
    for i ∈ 0 .. n_f - 1
        f[i*3] ← F_x[j_s[i]]/kN
        f[i*3 + 1] ← F_z[j_s[i]]/kN
        f[i*3 + 2] ← M_y[j_s[i]]/kN·m
    f
F_q :=
    for i ∈ n_j*3 - 1
        f[i] ← 0
    for i ∈ 0 .. n_f - 1
        f[j_s[i]*3] ← f[j_s[i]*3] + P_q(i)[0]
        f[j_s[i]*3 + 1] ← f[j_s[i]*3 + 1] + P_q(i)[1]
        f[j_s[i]*3 + 2] ← f[j_s[i]*3 + 2] + P_q(i)[2]
        f[j_e[i]*3] ← f[j_e[i]*3] + P_q(i)[3]
        f[j_e[i]*3 + 1] ← f[j_e[i]*3 + 1] + P_q(i)[4]
        f[j_e[i]*3 + 2] ← f[j_e[i]*3 + 2] + P_q(i)[5]
    f
F := F_p + F_q
# Матрица жесткости в глобальной системе координат
K :=
    for i ∈ 0 .. n_j*3 - 1
        for j ∈ 0 .. n_j*3 - 1
            k[i, j] ← 0
    for i ∈ 0 .. n_f - 1
        k ← k + transpose(C_i(i))*K_i(i)*C_i(i)
    k
# Граничные условия K | Граничные условия F
k_r(K) :=
    K_r ← K
    for i ∈ 0 .. n_j - 1
        rstr ← [U_x[i]; U_z[i]; R_y[i]]
        for j ∈ 0 .. 2
            if rstr[j] ≠ 0
                rs ← i*3 + j
                for k ∈ 0 .. n_j*3 - 1
                    K_r[rs, k] ← 0
                    K_r[k, rs] ← 0
                K_r[rs, rs] ← 1
        if K_r[i*3 + 2, i*3 + 2] == 0
            K_r[i*3 + 2, i*3 + 2] ← 1
    K_r
f_r(F) :=
    F_r ← F
    for i ∈ 0 .. n_j - 1
        rstr ← [U_x[i]; U_z[i]; R_y[i]]
        for j ∈ 0 .. 2
            if rstr[j] ≠ 0
                rs ← i*3 + j
                F_r[rs] ← 0
    F_r
F_r := f_r(F)
K_r := k_r(K)
# Узловые равнодействующие от равномерных нагрузок КЭ в локальной системе координат
# Решение
U := lsolve(K_r, F_r)
P_qi(i) :=
    if R_s[i] == 0 and R_e[i] == 0
        P ← vectorize(P'_q1(i)*P_1)
    else if R_s[i] == 0 and R_e[i] == 1
        P ← vectorize(P'_q2(i)*P_2)
    else if R_s[i] == 1 and R_e[i] == 0
        P ← vectorize(P'_q3(i)*P_3)
    else
        P ← vectorize(P'_q4(i)*P_4)
    P  # Перемещения узлов
U_i :=
    for i ∈ 0 .. n_j - 1
        u[i] ← [U[i*3]*m; U[i*3 + 1]*m; U[i*3 + 2]*rad]
    u
U_i = [
    [0.000826778 m; 0.000336578 m; 0.000696056]; [0.000826778 m; -0.00238887 m; 0.00269606]; [0.00142503 m; -0.00119443 m; 0.000482531]; [0 m; 0 m; 0]; [0.00059228 m; -0.00381139 m; -0.002192]; [0 m; 0 m; -0.00205207]
]
# Узловые усилия в КЭ
S_i :=
    for i ∈ 0 .. n_f - 1
        U_ ← C_i(i)*U
        s[i] ← (T_α(i)*K_i(i))*U_ - P_qi(i)
    s
# Продольные силы в сечениях КЭ
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N_i :=
    for i ∈ 0 .. n_f - 1
        n[i] ← [-S_i[i][0], S_i[i][3]] kN
    n
N_i = [
    [0, 0]; [-59.7217, -59.7217]; [-59.7217, -59.7217]; [-5.86245, -5.86245]; [-68.0896, -68.0896]; [31.5872, -57.8555]
] kN
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# Поперечные силы в сечениях КЭ
Q_i :=
    for i ∈ 0 .. n_f - 1
        q[i] ← [-S_i[i][1], S_i[i][4]] kN
    q
Q_i = [
    [20, 20]; [5.86245, 5.86245]; [-14.1376, -14.1376]; [-39.7217, 40.2783]; [-33.4453, 16.5547]; [-22.3607, 22.3607]
] kN
# Изгибающие моменты в сечениях КЭ
n := 4
M_i :=
    for i ∈ 0 .. n_f - 1
        Δl ← l[i]/n
        m[i, 0] ← S_i[i][2]*kN*m
        m[i, n] ← -S_i[i][5]*kN*m
        Δm ← (m[i, n] - m[i, 0])/l[i]
        for j ∈ 0 .. n - 1
            x ← (j + 1)*Δl
            m[i, j + 1] ← -q_2[i]*x*(l[i] - x)/2 + m[i, 0] + x*Δm
    m
M_i = [
    0, -10, -20, -30, -40;
    0, -2.93122, -5.86245, -8.79367, -11.7249;
    -11.7249, -4.65612, 2.41266, 9.48143, 16.5502;
    -40, 19.4434, 38.8868, 18.3302, -42.2264;
    -42.2264, -8.23229, 10.1368, 12.8809, 0;
    0, 37.5, 50, 37.5, 0
] kN*m
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# Матрица масс в локальной системе координат | Матрица масс в глобальной системе координат
M'(k) :=
    for i ∈ 0 .. 5
        for j ∈ 0 .. 5
            M[i, j] ← 0
    M[0, 0] ← m_x[j_s[k]]/tonne
    M[3, 3] ← m_x[j_e[k]]/tonne
    M
M :=
    for i ∈ 0 .. n_j*3 - 1
        for j ∈ 0 .. n_j*3 - 1
            m[i, j] ← 0
    for i ∈ 0 .. n_f - 1
        m_i ← transpose(C_i(i))*M'(i)*C_i(i)
        for j ∈ 0 .. n_j*3 - 1
            if m[j, j] == 0
                m[j, j] ← m_i[j, j]
    m
# Число степеней свободы масс
# Матрица податливости
n_m :=
    n ← 0
    for i ∈ 0 .. n_j - 1
        if m_x[i] ≠ 0
            n ← n + 1
    n
δ := K_r^-1
d := δ*M
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# Собственные значения
λ := submatrix(eigenvals(d), 0, n_m - 1, 0, 0) = [0.000305272; 3.41837e-5]
# Круговая частота
ω := sqrt(1/λ) = [57.2343; 171.037]
# Техническая частота
f := ω/(2*π) = [9.10912; 27.2214]
# Период
T := 2*π/ω = [0.10978; 0.0367358]
