# Арматура
table  # each column defines a variable
    grade | εc2 | εc0 | ε0 | ε2 | Rc (MPa) | R (MPa) | E (MPa)
    "A240" | -0.025 | -0.00105 | 0.00105 | 0.025 | -210 | 210 | 200000
    "A400" | -0.025 | -0.00175 | 0.00175 | 0.025 | -350 | 350 | 200000
    "A500" | -0.025 | -0.002 | 0.002175 | 0.025 | -400 | 435 | 200000
end table
