# Расчет по прочности нормальных сечений на основе нелинейной деформационной модели,
# балочная плита с усилением
# Сечение до усиления
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B := 1000 mm
H := 300 mm
n_H := 48
ΔH := H/n_H = 0.625 cm
A_bi := B*ΔH = 62.5 cm^2
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# Нагрузки на стадии 1
table  # each column defines a variable
    N_z (tonnef) | M_x (tonnef*m)
    -2.94 | 3.4
end table
N_z = -28.8316 kN
M_x = 33.3426 kN*m
L := [N_z; M_x]
N0_z := N_z
M0_x := M_x
# Количество итераций
ni := 50
# Участки бетона
X_b :=
    for i ∈ 0 .. n_H - 1
        X[i] ← -H/2 + ΔH*i + ΔH/2
    X
n_b := rows(X_b) = 48
A_b :=
    for i ∈ 0 .. n_b - 1
        A[i] ← A_bi
    A
# Арматурные стержни
table  # each column defines a variable
    X (mm) | n | d (mm)
    -110 | 5 | 10
    100 | 5 | 10
end table
n_s :=
    if rows(X) == 0
        n_s ← 1
    else
        n_s ← rows(X)
    = 2
X_s := X
a' := H/2 + X[0] = 40 mm
a := H/2 - X[1] = 50 mm
A_s := vectorize(π*d^2/4*n)
# Материалы
# Бетон
# [reference: Бетон.mcdx]
γ_b3 := 1  # Растяжение бетона
kt := 1
r := match("B40", grade)[0] = 5
R_b := R[r]*γ_b3 = -22 MPa
R_bt := Rt[r]*kt = 1.4 MPa
ε_b2 := ε2[r] = -0.0035
ε_b0 := ε0[r] = -0.002
ε_bt0 := εt0[r] = 0.0001
ε_bt2 := εt2[r] = 0.00015
E_b := E[r] = 36000 MPa
σ_b1 := 0.6*R_b = -13.2 MPa
σ_bt1 := 0.6*R_bt = 0.84 MPa
ε_b1 := σ_b1/E_b = -0.000366667
ε_bt1 := σ_bt1/E_b = 2.33333e-5
σb(ε_b) :=
    if ε_b ≤ ε_b0
        σ_b ← R_b
    else if ε_b > ε_b0 and ε_b < ε_b1
        σ_b ← R_b + (ε_b - ε_b0)*(σ_b1 - R_b)/(ε_b1 - ε_b0)
    else if ε_b ≥ ε_b1 and ε_b ≤ ε_bt1
        σ_b ← σ_b1 + (ε_b - ε_b1)*σ_b1/ε_b1
    else if ε_b > ε_bt1 and ε_b < ε_bt0
        σ_b ← R_bt + (ε_b - ε_bt0)*(σ_bt1 - R_bt)/(ε_bt1 - ε_bt0)
    else if ε_b ≥ ε_bt0
        σ_b ← R_bt
    else
        σ_b ← 0
    σ_b
# Диаграмма состояния бетона
ε_b := ε_b2 - 0.000001, ε_b2 .. ε_bt2 + 0.000001
# [plot: σb(ε_b) (MPa) vs ε_b]
# Арматура
# [reference: Арматура.mcdx]
r := match("A500", grade)[0] = 2
ε_sc2 := εc2[r] = -0.025
ε_s2 := ε2[r] = 0.025
R_sc := Rc[r] = -400 MPa
R_s := R[r] = 435 MPa
E_s := E[r] = 200000 MPa
ε_sc0 := R_sc/E_s = -0.002
ε_s0 := R_s/E_s = 0.002175
σs(ε_s) :=
    if ε_s ≤ ε_sc0
        σ_s ← R_sc
    else if ε_s > ε_sc0 and ε_s < ε_s0
        σ_s ← R_sc + (ε_s - ε_sc0)*E_s
    else if ε_s ≥ ε_s0
        σ_s ← R_s
    else
        σ_s ← 0 MPa
    σ_s
# Диаграмма состояния арматурной стали
ε_s := ε_sc2 - 0.00001, ε_sc2 .. ε_s2 + 0.00001
# [plot: σs(ε_s) (MPa) vs ε_s]
# Жесткостные характеристики
DNMx00(v_b, v_s) := sum(vectorize(A_b[i]*v_b)[i]*E_b, i = 0 .. n_b - 1) + sum(vectorize(A_s[j]*v_s[j])*E_s, j = 0 .. n_s - 1)
DNMx01(v_b, v_s) := sum(vectorize(A_b[i]*X_b[i]*v_b[i])*E_b, i = 0 .. n_b - 1) + sum(vectorize(A_s[j]*X_s[j]*v_s[j])*E_s, j = 0 .. n_s - 1)
DNMx11(v_b, v_s) := sum(vectorize(A_b[i]*X_b[i]^2*v_b[i])*E_b, i = 0 .. n_b - 1) + sum(vectorize(A_s[j]*X_s[j]^2*v_s[j])*E_s, j = 0 .. n_s - 1)
# Матрица жёсткости
DNMx(v_b, v_s) :=
    DNMx[0, 0] ← DNMx00(v_b, v_s)
    DNMx[0, 1] ← sum(vectorize(A_b[i]*X_b[i]*v_b[i])*E_b, i = 0 .. n_b - 1) + sum(vectorize(A_s[j]*X_s[j]*v_s[j])*E_s, j = 0 .. n_s - 1)
    DNMx[1, 0] ← DNMx[0, 1]
    DNMx[1, 1] ← sum(vectorize(A_b[i]*X_b[i]^2*v_b[i])*E_b, i = 0 .. n_b - 1) + sum(vectorize(A_s[j]*X_s[j]^2*v_s[j])*E_s, j = 0 .. n_s - 1)
    DNMx
# Линейное решение при коэффициентах жёсткости  υ= 1
Res1 :=
    for i ∈ 0 .. n_b - 1
        v_b[i] ← 1
    for j ∈ 0 .. n_s - 1
        v_s[j] ← 1
    R ← lsolve(DNMx(v_b, v_s), L)
    for i ∈ 0 .. n_b - 1
        ε_b[i] ← R[0] + R[1]*X_b[i]
        σ_b[i] ← σb(ε_b[i])
    for j ∈ 0 .. n_s - 1
        ε_s[j] ← R[0] + R[1]*X_s[j]
        σ_s[j] ← σs(ε_s[j])
    [ε_b; σ_b; ε_s; σ_s; R]
ε_b := Res1[0]
σ_b := Res1[1]
ε_s := Res1[2]
σ_s := Res1[3]
R := Res1[4]
# Деформации линейного расчёта
# [plot: ε_b, ε_s vs X_b (cm), X_s (cm)]
# Напряжения линейного расчёта
σ_s = [-9.38974; 7.54247] MPa
# [plot: σ_b (MPa), σ_s (MPa) vs X_b (cm), X_s (cm)]
# Нелинейное решение
Res :=
    for k ∈ 0 .. ni - 1
        for i ∈ 0 .. n_b - 1
            v_b[i] ← σ_b[i]/(E_b*ε_b[i])
        for j ∈ 0 .. n_s - 1
            v_s[j] ← σ_s[j]/(E_s*ε_s[j])
        R ← lsolve(DNMx(v_b, v_s), L)
        for i ∈ 0 .. n_b - 1
            ε_b[i] ← R[0] + R[1]*X_b[i]
            σ_b[i] ← σb(ε_b[i])
        for j ∈ 0 .. n_s - 1
            ε_s[j] ← R[0] + R[1]*X_s[j]
            σ_s[j] ← σs(ε_s[j])
    [v_b; v_s; ε_b; σ_b; ε_s; σ_s; R]
υ_b := Res[0]
υ_s := Res[1]
ε_b := Res[2]
σ_b := Res[3]
ε_s := Res[4]
σ_s := Res[5]
R := Res[6]
# Деформации нелинейного расчёта
# [plot: ε_b, ε_s vs X_b (cm), X_s (cm)]
ε_min := min(ε_b) = -7.47697e-5
ε_max := max(ε_s) = 6.6227e-5
# Напряжения нелинейного расчёта
σ_s = [-10.7419; 13.2454] MPa
# [plot: σ_b (MPa), σ_s (MPa) vs X_b (cm), X_s (cm)]
# Результаты расчёта арматуры
X_s = [-11; 10] cm
ε_s = [-5.37095e-5; 6.6227e-5]
σ_s = [-10.7419; 13.2454] MPa
# Проверка сходимости
Nz := sum(vectorize(A_b[i]*σ_b[i]), i = 0 .. n_b - 1) + sum(vectorize(A_s[j]*σ_s[j]), j = 0 .. n_s - 1) = -28.8316 kN
Mx := sum(vectorize(A_b[i]*σ_b[i]*X_b)[i], i = 0 .. n_b - 1) + sum(vectorize(A_s[j]*σ_s[j]*X_s[j]), j = 0 .. n_s - 1) = 33.3426 kN*m
# Сечение после усиления
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X1_b := X_b
A1_b := A_b
n1_b := n_b
X1_s := X_s
A1_s := A_s
n1_s := n_s
H1 := H
h := 100 mm
n_h := 16
Δh := h/n_h = 0.625 cm
A_bi := B*Δh = 62.5 cm^2
# Нагрузки на стадии 2
table  # each column defines a variable
    N_z (tonnef) | M_x (tonnef*m)
    -50.06 | 4.5
end table
N_z = -490.921 kN
M_x = 44.1299 kN*m
L := [N_z; M_x]
# Участки бетона
X_b :=
    for i ∈ 0 .. n_h - 1
        X_b[i] ← H1/2 + Δh*i + Δh/2
    X_b
n_b := rows(X_b) = 16
A_b :=
    for i ∈ 0 .. n_b - 1
        A_b[i] ← A_bi
    A_b
X_b := stack(X1_b, X_b)
A_b := stack(A1_b, A_b)
n_b := rows(X_b) = 64
# Определение нового центра тяжести
S_y := sum({
    for i ∈ 0 .. n_b - 1
        S_y[i] ← A_b[i]*X_b[i]
    S_y
}) = 20 L
X_c := S_y/sum(A_b) = 5 cm
# Арматурные стержни
ε0_s := ε_s
σ0_s := σ_s
table  # each column defines a variable
    X (mm) | n | d (mm)
    200 | 5 | 12
end table
n_s :=
    if rows(X) == 0
        n_s ← 1
    else
        n_s ← rows(X)
    = 1
X_s := X
A_s := vectorize(π*d^2/4*n) = 5.65487 cm^2
X_s := stack(X1_s, X_s)
A_s := stack(A1_s, A_s)
n_s :=
    if rows(X_s) == 0
        n_s ← 1
    else
        n_s ← rows(X_s)
as := H/2 + h - X = 5 cm
# Результаты по стадии 2 без нагрузки с деформациями от стадии 1
Resb1 :=
    for i ∈ 0 .. n_b - 1
        if i ≤ n1_b - 1
            υ_b[i] ← υ_b[i]
            ε_b[i] ← ε_b[i]
            σ_b[i] ← σ_b[i]
        else
            υ_b[i] ← 0
            ε_b[i] ← 0
            σ_b[i] ← 0 MPa
    [υ_b; ε_b; σ_b]
Ress1 :=
    for j ∈ 0 .. n_s - 1
        if j ≤ n1_s - 1
            υ_s[j] ← υ_s[j]
            ε_s[j] ← ε_s[j]
            σ_s[j] ← σ_s[j]
        else
            υ_s[j] ← 0
            ε_s[j] ← 0
            σ_s[j] ← 0 MPa
    [υ_s; ε_s; σ_s]
υ_b := Resb1[0]
υ_s := Ress1[0]
ε_b := Resb1[1]
ε_s := Ress1[1]
σ_b := Resb1[2]
σ_s := Ress1[2]
# Деформации в усиленном сечении
# [plot: ε_b, ε_s vs X_b (cm), X_s (cm)]
ε1_b := ε_b
ε1_s := ε_s
ε_min := min(ε_b) = -7.47697e-5
ε_max := max(ε_s) = 6.6227e-5
# Напряжения в усиленном сечении
σ_s = [-10.7419; 13.2454; 0] MPa
# [plot: σ_b (MPa), σ_s (MPa) vs X_b (cm), X_s (cm)]
# Изменённая матрица жёсткости
DNMx(v_b, v_s) :=
    DNMx[0, 0] ← DNMx00(v_b, v_s)
    DNMx[0, 1] ← sum(vectorize(A_b[i]*X_b[i]*v_b[i])*E_b, i = 0 .. n_b - 1) + sum(vectorize(A_s[j]*X_s[j]*v_s[j])*E_s, j = 0 .. n_s - 1)
    DNMx[1, 0] ← DNMx[0, 1]
    DNMx[1, 1] ← sum(vectorize(A_b[i]*X_b[i]^2*v_b[i])*E_b, i = 0 .. n_b - 1) + sum(vectorize(A_s[j]*X_s[j]^2*v_s[j])*E_s, j = 0 .. n_s - 1)
    DNMx
# Нелинейное решение
Res2 :=
    for k ∈ 0 .. ni - 1
        for i ∈ 0 .. n_b - 1
            if ε_b[i] ≠ 0
                v_b[i] ← σ_b[i]/(E_b*ε_b[i])
            else
                v_b[i] ← 0
        for j ∈ 0 .. n_s - 1
            if ε_s[j] ≠ 0
                v_s[j] ← σ_s[j]/(E_s*ε_s[j])
            else
                v_s[j] ← 0
        R ← lsolve(DNMx(v_b, v_s), L)
        for i ∈ 0 .. n_b - 1
            ε_b[i] ← R[0] + R[1]*X_b[i] + ε1_b[i]
            σ_b[i] ← σb(ε_b[i])
        for j ∈ 0 .. n_s - 1
            ε_s[j] ← R[0] + R[1]*X_s[j] + ε1_s[j]
            σ_s[j] ← σs(ε_s[j])
    [ε_b; σ_b; ε_s; σ_s; R]
ε_b := Res2[0]
σ_b := Res2[1]
ε_s := Res2[2]
σ_s := Res2[3]
R := Res2[4]
# Деформации нелинейные
# [plot: ε_b, ε_s vs X_b (cm), X_s (cm)]
ε_min := min(ε_b) = -0.000209901
ε_max := max(ε_s) = 3.35157e-5
# Напряжения нелинейные
σ_s = [-34.7086; 6.70314; 1.75509] MPa
# [plot: σ_b (MPa), σ_s (MPa) vs X_b (cm), X_s (cm)]
# Результаты расчёта арматуры
X_s = [-11; 10; 20] cm
ε_s = [-0.000173543; 3.35157e-5; 8.77544e-6]
σ_s = [-34.7086; 6.70314; 1.75509] MPa
