# Расчёт ветровой нагрузки по СП 20.13330.2016
# тип местности
ter := "B"
# сооружение
bld := "Здание"
# размер здания в направлении расчетного ветра
a := 21.4 m
# размер здания в направлении перпендикулярном расчетному направлению ветра
d := 16 m
# коэффициент надёжности по нагрузке
γ_f := 1.4
# Расчётная динамическая модель РДМ
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# Модуль упругости бетона
E := 36000 MPa
# Плотность бетона
γ := 2750 kg/m^3
# Количество диафрагм одного направления
n_d := 8
table  # each column defines a variable
    td (mm) | ld (m) | tp (mm) | la (m^2) | dlv (kPa) | llv (kPa) | x_i (m)
    300 | 7.2 | 200 | 1650 | 2 | 4 | 4.2
    300 | 7.2 | 200 | 1650 | 3 | 2 | 7.2
    300 | 7.2 | 200 | 1650 | 3 | 2 | 10.2
    300 | 7.2 | 200 | 1650 | 3 | 2 | 13.2
    300 | 7.2 | 200 | 1650 | 3 | 2 | 16.2
    300 | 7.2 | 200 | 1650 | 3 | 2 | 19.2
    300 | 7.2 | 200 | 1650 | 3 | 2 | 22.2
    300 | 7.2 | 200 | 1650 | 3 | 2 | 25.2
    300 | 7.2 | 200 | 1650 | 3 | 2 | 28.2
    300 | 7.2 | 200 | 1650 | 3 | 2 | 31.2
    300 | 7.2 | 200 | 1650 | 3 | 2 | 34.2
    300 | 7.2 | 200 | 1650 | 3 | 2 | 37.2
    300 | 7.2 | 200 | 1650 | 3 | 2 | 40.2
    300 | 7.2 | 200 | 1650 | 3 | 2 | 43.2
    300 | 7.2 | 200 | 1650 | 3 | 2 | 46.2
    300 | 7.2 | 200 | 1650 | 3 | 2 | 49.2
    300 | 7.2 | 200 | 1650 | 3 | 2 | 52.2
    300 | 7.2 | 200 | 1650 | 3 | 2 | 55.2
    300 | 7.2 | 200 | 1650 | 4 | 4 | 59.4
end table
# Толщина диафрагм td
# Длина диафрагм ld
# Толщина перекрытий tp
# Площади этажей la
# Постоянные нагрузки dlv
# Временные нагрузки llv
# Отметка перекрытия x_i
# Момент инерции диафрагм
I_d := vectorize(td*ld^3)/12*n_d
EI := E*I_d
n := rows(td) = 19
# Общая длина
L := x_i[n - 1] = 59.4 m
# коэффициент учёта других конструкций
k_w := 1.1
# Матрица масс
M :=
    for i ∈ 0 .. n - 1
        M[i, i] ← (tp[i]*γ + dlv[i]/g + llv[i]/g)*la[i]*k_w
    M
# Моменты от единичных сил
M_i(x, xi, S) :=
    if x ≤ xi
        M ← S*xi - S*x
    else
        M ← 0 kN*m
    M
# Матрица податливости
Δ :=
    for i ∈ 0 .. n - 1
        for j ∈ 0 .. n - 1
            D[i, j] ← integral(M_i(x, x_i[i], 1 kN)*M_i(x, x_i[j], 1 kN)/EI[i], x = 0 m .. L)
    D
D := Δ*M
# Собственные значения | Круговая частота
λ := eigenvals(D)
ω := sqrt(1/λ)
# Период | Техническая частота | Собственные векторы
T := 2*π/(ω*kN)
f := ω*kN/(2*π)
U := eigenvecs(D)
vx := stack(0 m, x_i)
vy :=
    for i ∈ 0 .. n - 1
        vy[i] ← stack(0, U[:, i])
    vy
ci(i) := cspline(vx, vy[i])
U_i(x, i) := interp(ci(i), vx, vy[i], x)
# Формы колебаний
x := 0 m, L/100 .. L
# [plot: U_i(x, 0), U_i(x, 1), U_i(x, 2), U_i(x, 3), U_i(x, 4), U_i(x, 5) vs x]
T[0] = 3.21395 s
T[1] = 0.516703 s
# Первая частота собственных колебаний | Вторая частота собственных колебаний
f[0] = 0.311144 1/s
f[1] = 1.93535 1/s
Δz := 0.15 m
# высота от поверхности земли
h := x_i[n - 1] + Δz = 59.55 m
# Нормативное значение ветрового давления
# Таблица 11.1
table  # each column defines a variable
    Ia (kPa) | I (kPa) | II (kPa) | III (kPa) | IV (kPa) | V (kPa) | VI (kPa) | VII (kPa)
    0.17 | 0.23 | 0.3 | 0.38 | 0.48 | 0.6 | 0.73 | 0.85
end table
w_0 := I = 0.23 kPa
z_e(z, d, h) :=
    if bld == "Здание"
        if h ≤ z
            z.e ← h
        else if d < h ≤ 2*d
            if z ≥ h - d
                z.e ← h
            else if 0 < z < h - d
                z.e ← d
            else
                z.e ← z
        else if h > 2*d
            if z ≥ h - d
                z.e ← h
            else if d < z < h - d
                z.e ← z
            else if 0 ≤ z ≤ d
                z.e ← d
            else
                z.e ← z
        else
            z.e ← z
    z.e
# Коэффициент k
# Таблица 11.2
table  # each column defines a variable
    z_ei (m) | A2 | B2 | C2
    0 | 0.75 | 0.5 | 0.4
    5 | 0.75 | 0.5 | 0.4
    10 | 1 | 0.65 | 0.4
    20 | 1.25 | 0.85 | 0.55
    40 | 1.5 | 1.1 | 0.8
    60 | 1.7 | 1.3 | 1
    80 | 1.85 | 1.45 | 1.15
    100 | 2 | 1.6 | 1.25
    150 | 2.25 | 1.9 | 1.55
    200 | 2.45 | 2.1 | 1.8
    250 | 2.65 | 2.3 | 2
    300 | 2.75 | 2.5 | 2.2
end table
z_i := stack(0, x_i + Δz)
n_z := rows(z_i)
z_e_i(z) :=
    for i ∈ 0 .. n_z - 1
        z[i] ← z_e(z[i], d, h)
    z
# Эквивалентная высота
# [plot: z_e_i(z_i) vs z_i (m)]
z.e := z_e_i(z_i)
k(z) := linterp(z_ei, B2, z.e)
# Коэффициенты k
# [plot: k(z.e) vs z.e (m)]
# аэродинамический коэффициент
c_f := 0.8
c_b := -0.5
# Нормативное значение средней составляющей основной ветровой нагрузки
w_m(z, c) := w_0*k(z)*c
# [plot: w_m(z.e, c_f) (kPa), w_m(z.e, -c_b) (kPa), w_m(z.e, c_f - c_b) (kPa) vs z.e (m)]
# Коэффициент пульсаций давления ветра ζ
# Таблица 11.4
table  # each column defines a variable
    A4 | B4 | C4
    0.85 | 1.22 | 1.78
    0.85 | 1.22 | 1.78
    0.76 | 1.06 | 1.78
    0.69 | 0.92 | 1.5
    0.62 | 0.8 | 1.26
    0.58 | 0.74 | 1.14
    0.56 | 0.7 | 1.06
    0.54 | 0.67 | 1
    0.51 | 0.62 | 0.9
    0.49 | 0.58 | 0.84
    0.47 | 0.56 | 0.8
    0.46 | 0.54 | 0.76
end table
ζ(z) := linterp(z_ei, B4, z.e)
# [plot: ζ(z.e) vs z.e (m)]
table  # each column defines a variable
    T_gi (s) | δ_0.15 | δ_0.22 | δ_0.30
    0 | 1 | 1 | 1
    0.01 | 1.4102 | 1.2935 | 1.2144
    0.02 | 1.5868 | 1.4312 | 1.3171
    0.03 | 1.7304 | 1.5389 | 1.4037
    0.04 | 1.8536 | 1.6261 | 1.4771
    0.05 | 1.9613 | 1.6994 | 1.5449
    0.06 | 2.0496 | 1.7698 | 1.5948
    0.07 | 2.1368 | 1.8345 | 1.6461
    0.08 | 2.2086 | 1.8899 | 1.6916
    0.09 | 2.2789 | 1.9408 | 1.733
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end table
# Коэффициенты динамичности ξ
# [plot: δ_0.15, δ_0.22, δ_0.30 vs T_gi]
T_g1(z) := sqrt(w_0*k(z)*γ_f*m^2/kN)/(940*f[0])
ξ(z) := linterp(T_gi, δ_0.30, T_g1(z))
# Коэффициенты динамичности ξ
# [plot: ξ(z.e) vs z.e (m)]
T_glim := 0.023
f_lim(z) := sqrt(w_0*k(z)*γ_f*m^2/kN)/(940*T_glim*s)
# Предельное значение частоты собственных колебаний
# [plot: f_lim(z.e) (Hz) vs z.e (m)]
# Коэффициент корреляции ν
# Таблица 11.6
table  # each column defines a variable
    ρ_i (m) | χ_5 | χ_10 | χ_20 | χ_40 | χ_80 | χ_160 | χ_350
    0.1 | 0.95 | 0.92 | 0.88 | 0.83 | 0.76 | 0.67 | 0.56
    5 | 0.89 | 0.87 | 0.84 | 0.8 | 0.73 | 0.65 | 0.54
    10 | 0.85 | 0.84 | 0.81 | 0.77 | 0.71 | 0.64 | 0.53
    20 | 0.8 | 0.78 | 0.76 | 0.73 | 0.68 | 0.61 | 0.51
    40 | 0.72 | 0.72 | 0.7 | 0.67 | 0.63 | 0.57 | 0.48
    80 | 0.63 | 0.63 | 0.61 | 0.59 | 0.56 | 0.51 | 0.44
    160 | 0.53 | 0.53 | 0.52 | 0.5 | 0.47 | 0.44 | 0.38
end table
# Основная система координат при определении коэффициента корреляции ν
# Таблица 11.7
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b := d
table  # each column defines a variable
    mcs | ρ_s | χ_s
    "Z0Y" | "b" | "h"
    "Z0X" | "0.4*a" | "h"
    "X0Y" | "b" | "a"
end table
ρ := b
χ := h
ν :=
    if χ ≤ 5 m
        ν ← linterp(ρ_i, χ_5, ρ)
    else if 5 m < χ ≤ 10 m
        ν_0 ← linterp(ρ_i, χ_5, ρ)
        ν ← ν_0 + (linterp(ρ_i, χ_10, ρ) - ν_0)/(5 m)*(χ - 5 m)
    else if 10 m < χ ≤ 20 m
        ν_0 ← linterp(ρ_i, χ_10, ρ)
        ν ← ν_0 + (linterp(ρ_i, χ_20, ρ) - ν_0)/(10 m)*(χ - 10 m)
    else if 20 m < χ ≤ 40 m
        ν_0 ← linterp(ρ_i, χ_20, ρ)
        ν ← ν_0 + (linterp(ρ_i, χ_40, ρ) - ν_0)/(20 m)*(χ - 20 m)
    else if 40 m < χ ≤ 80 m
        ν_0 ← linterp(ρ_i, χ_40, ρ)
        ν ← ν_0 + (linterp(ρ_i, χ_80, ρ) - ν_0)/(40 m)*(χ - 40 m)
    else if 80 m < χ ≤ 160 m
        ν_0 ← linterp(ρ_i, χ_80, ρ)
        ν ← ν_0 + (linterp(ρ_i, χ_160, ρ) - ν_0)/(80 m)*(χ - 80 m)
    else if 160 m < χ ≤ 350 m
        ν_0 ← linterp(ρ_i, χ_160, ρ)
        ν ← ν_0 + (linterp(ρ_i, χ_350, ρ) - ν_0)/(190 m)*(χ - 160 m)
    else
        ν ← linterp(ρ_i, χ_350, ρ)
    ν
ν = 0.719608
max(f_lim(z_i)) = 0.0298738 1/s
f[0] = 0.311144 1/s
f[1] = 1.93535 1/s
f[3] = 10.6045 1/s
# Нормативное значение пульсационной составляющей основной ветровой нагрузки
w_g(z, c) :=
    w ← w_m(z, c)
    ζ ← ζ(z_e_i(z))
    ξ ← ξ(z)
    if f[0] ≥ max(f_lim(z_i))
        w ← vectorize(w*ζ)*ν
    else if f[0] < max(f_lim(z_i)) ≤ f[1]
        w ← vectorize(vectorize(w*ξ)*ζ)*ν
    else
        w ← vectorize(w*ζ)*0
    w
# Нормативное значение пульсационной составляющей основной ветровой нагрузки w_g
# [plot: w_g(z.e, c_f) (kPa), w_g(z.e, -c_b) (kPa), w_g(z.e, c_f - c_b) (kPa) vs z.e (m)]
w := w_m(z.e, c_f - c_b) + w_g(z.e, c_f - c_b)
# Нормативное значение основной ветровой нагрузки w
# [plot: w (kPa) vs z.e (m), z_i]
