# Расчёт ветровой нагрузки по СП 20.13330.2016
# тип местности
ter := "B"
# сооружение
bld := "Здание"
# размер здания в направлении расчетного ветра
a := 31 m
# размер здания в направлении перпендикулярном расчетному направлению ветра
d := 80 m
# коэффициент надёжности по нагрузке ветра
γ_f := 1.4
# Расчётная динамическая модель РДМ
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# Модуль упругости бетона
E := 42000 MPa
# Плотность бетона
γ_b := 2750 kg/m^3
# коэффициент надёжности по нагрузке бетона
γ_fb := 1.1
# h_i высота этажа | t_p толщина плиты
# A_t площадь | DL постоянная нагрузка
# I_t момент инерции | LL временная нагрузка
table  # each column defines a variable
    h_i (m) | A_t (m^2) | I_t (m^4) | t_p (mm) | DL (kPa) | LL (kPa)
    8 | 514.8 | 10698.055 | 250 | 3.91 | 2.46
    4.2 | 514.8 | 10698.055 | 250 | 3.91 | 2.46
    4.2 | 514.8 | 10698.055 | 250 | 3.91 | 2.46
    4.2 | 514.8 | 10698.055 | 250 | 3.91 | 2.46
    4.2 | 514.8 | 10698.055 | 250 | 3.91 | 2.46
    4.2 | 514.8 | 10698.055 | 250 | 3.91 | 2.46
    4.2 | 514.8 | 10698.055 | 250 | 3.91 | 2.46
    4.2 | 514.8 | 10698.055 | 250 | 3.91 | 2.46
    4.2 | 514.8 | 10698.055 | 250 | 3.91 | 2.46
    4.2 | 514.8 | 10698.055 | 250 | 3.91 | 2.46
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end table
# Длина диафрагмы
l_d := 9 m
# Пролёты
S_i := 10 m
# Ширина башни
a_t := S_i + l_d + S_i = 29 m
# Шаг колонн
s_c := 6.9 m
n := rows(h_i) = 107
# Отметки этажей | Массы вертикальных конструкций
x_i :=
    x_0 ← 0 m
    for i ∈ 0 .. n - 1
        x[i] ← x_0 + h_i[i]
        x_0 ← x[i]
    x
Mi :=
    for i ∈ 1 .. n - 1
        m[i] ← (h_i[i] + h_i[i - 1])/2*(A_t[i] + A_t[i - 1])/2*γ_b*γ_fb
    m[0] ← (h_i[1] + h_i[0])/2*(A_t[1] + A_t[0])/2*γ_b*γ_fb
    m
# Общая длина
L := x_i[n - 1] = 412.4 m
# коэффициент учёта других конструкций
k_w := 1
# Матрица масс
M :=
    for i ∈ 0 .. n - 1
        M[i, i] ← (t_p[i]*γ_b*γ_fb + DL[i]/g + LL[i]/g)*a*s_c*k_w + Mi[i]
    M
# Моменты от единичных сил
M_i(x, xi, S) :=
    if x ≤ xi
        Mi ← S*xi - S*x
    else
        Mi ← 0 kN*m
    Mi
# Матрица податливости
Δ :=
    for i ∈ 0 .. n - 1
        for j ∈ 0 .. n - 1
            Δ[i, j] ← integral(M_i(x, x_i[i], 1 kN)*M_i(x, x_i[j], 1 kN)/(E*I_t[i]), x = 0 m .. L)
    Δ
D := Δ*M
# Собственные значения | Круговая частота
λ := eigenvals(D)
ω := sqrt(1/λ)*tonne*m/s^2
# Период | Техническая частота | Собственные векторы
T := 2*π/ω
f := ω/(2*π)
U := eigenvecs(D)
vx := stack(0, x_i)
vy :=
    for i ∈ 0 .. n - 1
        vy[i] ← stack(0, U[:, i])
    vy
ci(i) := cspline(vx, vy[i])
U_i(x, i) := interp(ci(i), vx, vy[i], x)
# Формы колебаний
x := 0 m, L/100 .. L
# [plot: U_i(x, 0), U_i(x, 1), U_i(x, 2), U_i(x, 3) vs x]
# Периоды собственных колебаний
T[0] = 18.504 s
T[1] = 2.95462 s
T[2] = 1.05 s
T[3] = 0.534824 s
# Частоты собственных колебаний
f[0] = 0.0540425 Hz
f[1] = 0.338453 Hz
f[2] = 0.952381 Hz
f[3] = 1.86977 Hz
Δz := 0.15 m
# высота от поверхности земли
h := x_i[n - 1] + Δz = 412.55 m
# Нормативное значение ветрового давления
# Таблица 11.1
table  # each column defines a variable
    Ia (kPa) | I (kPa) | II (kPa) | III (kPa) | IV (kPa) | V (kPa) | VI (kPa) | VII (kPa)
    0.17 | 0.23 | 0.3 | 0.38 | 0.48 | 0.6 | 0.73 | 0.85
end table
w_0 := I = 230 Pa
z_e(z, d, h) :=
    if bld == "Здание"
        if h ≤ z
            z.e ← h
        else if d < h ≤ 2*d
            if z ≥ h - d
                z.e ← h
            else if 0 < z < h - d
                z.e ← d
            else
                z.e ← z
        else if h > 2*d
            if z ≥ h - d
                z.e ← h
            else if d < z < h - d
                z.e ← z
            else if 0 ≤ z ≤ d
                z.e ← d
            else
                z.e ← z
        else
            z.e ← z
    z.e
# Коэффициент k
# Таблица 11.2
table  # each column defines a variable
    z_ei (m) | A2 | B2 | C2
    0 | 0.5 | 0.35 | 0.4
    5 | 0.75 | 0.5 | 0.4
    10 | 1 | 0.65 | 0.4
    20 | 1.25 | 0.85 | 0.55
    40 | 1.5 | 1.1 | 0.8
    60 | 1.7 | 1.3 | 1
    80 | 1.85 | 1.45 | 1.15
    100 | 2 | 1.6 | 1.25
    150 | 2.25 | 1.9 | 1.55
    200 | 2.45 | 2.1 | 1.8
    250 | 2.65 | 2.3 | 2
    300 | 2.75 | 2.5 | 2.2
    350 | 2.85 | 2.7 | 2.4
    400 | 2.95 | 2.9 | 2.6
    450 | 3.05 | 3.1 | 2.8
    500 | 3.15 | 3.3 | 3
end table
z_i := stack(0, x_i + Δz)
n_z := rows(z_i)
z_e_i(z) :=
    for i ∈ 0 .. n_z - 1
        z[i] ← z_e(z[i], d, h)
    z
# Эквивалентная высота
# [plot: z_e_i(z_i) vs z_i (m)]
z.e := z_e_i(z_i)
k(z) := linterp(z_ei, B2, z)
# Коэффициенты k
k(z.e[n]) = 2.9502
# [plot: k(z.e) vs z.e (m)]
# аэродинамический коэффициент
c_f := 0.8
c_b := -0.5
# Нормативное значение средней составляющей основной ветровой нагрузки
w_m(c) := w_0*k(z.e)*c
# [plot: w_m(c_f) (kPa), w_m(-c_b) (kPa), w_m(c_f - c_b) (kPa) vs z.e (m)]
w_m(c_f - c_b)[n] = 0.88211 kPa
# Нормативное значение средней составляющей основной ветровой нагрузки
w_m(c_f - c_b)[n]*s_c*h_i[n - 1] = 21.9116 kN
# Коэффициент пульсаций давления ветра ζ
# Таблица 11.4
table  # each column defines a variable
    A4 | B4 | C4
    0.94 | 1.38 | 1.78
    0.85 | 1.22 | 1.78
    0.76 | 1.06 | 1.78
    0.69 | 0.92 | 1.5
    0.62 | 0.8 | 1.26
    0.58 | 0.74 | 1.14
    0.56 | 0.7 | 1.06
    0.54 | 0.67 | 1
    0.51 | 0.62 | 0.9
    0.49 | 0.58 | 0.84
    0.47 | 0.56 | 0.8
    0.46 | 0.54 | 0.76
    0.45 | 0.52 | 0.72
    0.44 | 0.5 | 0.68
    0.43 | 0.48 | 0.64
    0.42 | 0.46 | 0.6
end table
ζ(z) := linterp(z_ei, B4, z.e)
# [plot: ζ(z.e) vs z.e (m)]
table  # each column defines a variable
    T_gi | δ_0.15 | δ_0.22 | δ_0.30
    0 | 1 | 1 | 1
    0.01 | 1.4102 | 1.2935 | 1.2144
    0.02 | 1.5868 | 1.4312 | 1.3171
    0.03 | 1.7304 | 1.5389 | 1.4037
    0.04 | 1.8536 | 1.6261 | 1.4771
    0.05 | 1.9613 | 1.6994 | 1.5449
    0.06 | 2.0496 | 1.7698 | 1.5948
    0.07 | 2.1368 | 1.8345 | 1.6461
    0.08 | 2.2086 | 1.8899 | 1.6916
    0.09 | 2.2789 | 1.9408 | 1.733
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end table
# Коэффициенты динамичности ξ
# [plot: δ_0.15, δ_0.22, δ_0.30 vs T_gi]
T_g1(z) := sqrt(w_0*k(z)*γ_f*m^2/N)/(940*f[0]*s)
ξ(z) := linterp(T_gi, δ_0.30, T_g1(z))
# Коэффициенты динамичности ξ
T_g1(z.e)[n] = 0.606723
# [plot: ξ(z.e) vs z.e (m)]
ξ(z.e)[n] = 2.61707
T_glim := 0.023 s
f_lim(z) := sqrt(w_0*k(z)*γ_f*m^2/N)/(940*T_glim)
# Предельное значение частоты собственных колебаний
f_lim(z.e)[n] = 1.4256 Hz
# [plot: f_lim(z.e) (Hz) vs z.e (m)]
# Коэффициент корреляции ν
# Таблица 11.6
table  # each column defines a variable
    ρ_i (m) | χ_5 | χ_10 | χ_20 | χ_40 | χ_80 | χ_160 | χ_350 | χ_700
    0.1 | 0.95 | 0.92 | 0.88 | 0.83 | 0.76 | 0.67 | 0.56 | 0.45
    5 | 0.89 | 0.87 | 0.84 | 0.8 | 0.73 | 0.65 | 0.54 | 0.43
    10 | 0.85 | 0.84 | 0.81 | 0.77 | 0.71 | 0.64 | 0.53 | 0.42
    20 | 0.8 | 0.78 | 0.76 | 0.73 | 0.68 | 0.61 | 0.51 | 0.41
    40 | 0.72 | 0.72 | 0.7 | 0.67 | 0.63 | 0.57 | 0.48 | 0.39
    80 | 0.63 | 0.63 | 0.61 | 0.59 | 0.56 | 0.51 | 0.44 | 0.37
    160 | 0.53 | 0.53 | 0.52 | 0.5 | 0.47 | 0.44 | 0.38 | 0.32
    320 | 0.43 | 0.43 | 0.43 | 0.41 | 0.38 | 0.37 | 0.32 | 0.27
    640 | 0.33 | 0.33 | 0.34 | 0.32 | 0.29 | 0.28 | 0.26 | 0.22
end table
# Основная система координат при определении коэффициента корреляции ν
# Таблица 11.7
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b := d
table  # each column defines a variable
    mcs | ρ_s | χ_s
    "Z0Y" | "b" | "h"
    "Z0X" | "0.4*a" | "h"
    "X0Y" | "b" | "a"
end table
ρ := b
χ := h
ν :=
    if χ ≤ 5 m
        ν ← linterp(ρ_i, χ_5, ρ)
    else if 5 m < χ ≤ 10 m
        ν_0 ← linterp(ρ_i, χ_5, ρ)
        ν ← ν_0 + (linterp(ρ_i, χ_10, ρ) - ν_0)/(5 m)*(χ - 5 m)
    else if 10 m < χ ≤ 20 m
        ν_0 ← linterp(ρ_i, χ_10, ρ)
        ν ← ν_0 + (linterp(ρ_i, χ_20, ρ) - ν_0)/(10 m)*(χ - 10 m)
    else if 20 m < χ ≤ 40 m
        ν_0 ← linterp(ρ_i, χ_20, ρ)
        ν ← ν_0 + (linterp(ρ_i, χ_40, ρ) - ν_0)/(20 m)*(χ - 20 m)
    else if 40 m < χ ≤ 80 m
        ν_0 ← linterp(ρ_i, χ_40, ρ)
        ν ← ν_0 + (linterp(ρ_i, χ_80, ρ) - ν_0)/(40 m)*(χ - 40 m)
    else if 80 m < χ ≤ 160 m
        ν_0 ← linterp(ρ_i, χ_80, ρ)
        ν ← ν_0 + (linterp(ρ_i, χ_160, ρ) - ν_0)/(80 m)*(χ - 80 m)
    else if 160 m < χ ≤ 350 m
        ν_0 ← linterp(ρ_i, χ_160, ρ)
        ν ← ν_0 + (linterp(ρ_i, χ_350, ρ) - ν_0)/(190 m)*(χ - 160 m)
    else if 350 m < χ ≤ 700 m
        ν_0 ← linterp(ρ_i, χ_350, ρ)
        ν ← ν_0 + (linterp(ρ_i, χ_700, ρ) - ν_0)/(190 m)*(χ - 350 m)
    else
        ν ← linterp(ρ_i, χ_700, ρ)
    ν
ν = 0.416955
f_lim(z.e)[n] = 1.4256 Hz
f[0] = 0.0540425 Hz
f[1] = 0.338453 Hz
f[3] = 1.86977 Hz
# Нормативное значение пульсационной составляющей основной ветровой нагрузки
w_g(c) :=
    w ← w_m(c)
    ζ ← ζ(z.e)
    ξ ← ξ(z.e)
    if f[0] ≥ f_lim(z.e)[n]
        w_g ← vectorize(w*ζ)*ν
        txt ← "f1>=flim"
    else if f[0] < f_lim(z.e)[n] ≤ f[1]
        w_g ← vectorize(vectorize(w*ξ)*ζ)*ν
        txt ← "f1<flim<=f2"
    else
        w_g ← vectorize(w*ζ)*0
        txt ← "f2<flim"
    [w_g; txt]
w_g(0)[1] = "f2<flim"
# Нормативное значение пульсационной составляющей основной ветровой нагрузки
# [plot: w_g(c_f - c_b)[0] (kPa) vs z.e (m)]
# Нормативное значение пульсационной составляющей основной ветровой нагрузки
w_g(c_f - c_b)[0][n]*s_c*h_i[n - 1] = 0 kN
# Нормативное значение основной ветровой нагрузки
w :=
    if f[1] ≥ f_lim(z.e)[n]
        w ← w_m(c_f - c_b) + w_g(c_f - c_b)[0]
    else
        w ← w_m(c_f - c_b)*0 + w_g(c_f - c_b)[0]
    w
# Расчётное значение основной ветровой нагрузки
w_d := w*γ_f
# [plot: w (kPa), w_d (kPa) vs z_i]
w_d[n] = 0 kPa
