table  # each column defines a variable
    Z (m) | IL_0.0 (kPa) | IL_0.1 (kPa) | IL_0.2 (kPa) | IL_0.3 (kPa) | IL_0.4 (kPa) | IL_0.5 (kPa) | IL_0.6 (kPa)
    3 | 7500 | 4000 | 3000 | 2000 | 1200 | 1100 | 600
    4 | 8300 | 5100 | 3800 | 2500 | 1600 | 1250 | 700
    5 | 8800 | 6200 | 4000 | 2800 | 2000 | 1300 | 800
    7 | 9700 | 6900 | 4300 | 3300 | 2200 | 1400 | 850
    10 | 10500 | 7300 | 5000 | 3500 | 2400 | 1500 | 900
    15 | 11700 | 7500 | 5600 | 4000 | 2900 | 1650 | 1000
    20 | 12600 | 8500 | 6200 | 4500 | 3200 | 1800 | 1100
    25 | 13400 | 9000 | 6800 | 5200 | 3500 | 1950 | 1200
    30 | 14200 | 9500 | 7400 | 5600 | 3800 | 2100 | 1300
    35 | 15000 | 10000 | 8000 | 6000 | 4100 | 2250 | 1400
    40 | 15800 | 10500 | 8600 | 6400 | 4400 | 2400 | 1500
end table
# [plot: IL_0.0 (kPa), IL_0.1 (kPa), IL_0.2 (kPa), IL_0.3 (kPa), IL_0.4 (kPa), IL_0.5 (kPa), IL_0.6 (kPa) vs Z (m)]
