table  # each column defines a variable
    Z (m) | IL_0.2 (kPa) | IL_0.3 (kPa) | IL_0.4 (kPa) | IL_0.5 (kPa) | IL_0.6 (kPa) | IL_0.7 (kPa) | IL_0.8 (kPa) | IL_0.9 (kPa) | IL_1.0 (kPa)
    1 | 35 | 23 | 15 | 12 | 8 | 4 | 4 | 3 | 2
    2 | 42 | 30 | 21 | 17 | 12 | 7 | 5 | 4 | 4
    3 | 48 | 35 | 25 | 20 | 14 | 8 | 7 | 6 | 5
    4 | 53 | 38 | 27 | 22 | 16 | 9 | 8 | 7 | 5
    5 | 56 | 40 | 29 | 24 | 17 | 10 | 8 | 7 | 6
    6 | 58 | 42 | 31 | 25 | 18 | 10 | 8 | 7 | 6
    8 | 62 | 44 | 33 | 26 | 19 | 10 | 8 | 7 | 6
    10 | 65 | 46 | 34 | 27 | 19 | 10 | 8 | 7 | 6
    15 | 72 | 51 | 38 | 28 | 20 | 11 | 8 | 7 | 6
    20 | 79 | 56 | 41 | 30 | 20 | 12 | 8 | 7 | 6
    25 | 86 | 61 | 44 | 32 | 20 | 12 | 8 | 7 | 6
    30 | 93 | 66 | 47 | 34 | 21 | 12 | 9 | 8 | 7
    35 | 100 | 70 | 50 | 36 | 22 | 13 | 9 | 8 | 7
    40 | 107 | 74 | 53 | 38 | 23 | 14 | 9 | 8 | 7
end table
# [plot: IL_0.2 (kPa), IL_0.3 (kPa), IL_0.4 (kPa), IL_0.5 (kPa), IL_0.6 (kPa), IL_0.7 (kPa), IL_0.8 (kPa), IL_0.9 (kPa), IL_1.0 (kPa) vs Z (m)]
