table  # each column defines a variable
    Z (m) | IL_0.0 (kPa) | IL_0.1 (kPa) | IL_0.2 (kPa) | IL_0.3 (kPa) | IL_0.4 (kPa) | IL_0.5 (kPa) | IL_0.6 (kPa)
    3.00 | 850.00 | 750.00 | 650.00 | 500.00 | 400.00 | 300.00 | 250.00
    5.00 | 1000.00 | 850.00 | 750.00 | 650.00 | 500.00 | 400.00 | 350.00
    7.00 | 1150.00 | 1000.00 | 850.00 | 750.00 | 600.00 | 500.00 | 450.00
    10.00 | 1350.00 | 1200.00 | 1050.00 | 950.00 | 800.00 | 700.00 | 600.00
    12.00 | 1550.00 | 1400.00 | 1250.00 | 1100.00 | 950.00 | 800.00 | 700.00
    15.00 | 1800.00 | 1650.00 | 1500.00 | 1300.00 | 1100.00 | 1000.00 | 800.00
    18.00 | 2100.00 | 1900.00 | 1700.00 | 1500.00 | 1300.00 | 1150.00 | 950.00
    20.00 | 2300.00 | 2100.00 | 1900.00 | 1650.00 | 1450.00 | 1250.00 | 1050.00
    30.00 | 3300.00 | 3000.00 | 2600.00 | 2300.00 | 2000.00 | 1250.00 | 1050.00
    40.00 | 4500.00 | 4000.00 | 3500.00 | 3000.00 | 2500.00 | 1250.00 | 1050.00
end table
# [plot: IL_0.0 (kPa), IL_0.1 (kPa), IL_0.2 (kPa), IL_0.3 (kPa), IL_0.4 (kPa), IL_0.5 (kPa), IL_0.6 (kPa) vs Z (m)]
