table  # each column defines a variable
    Z (m) | Гравелистые (kPa) | Крупные (kPa) | Средней_крупности (kPa) | Мелкие (kPa) | Пылеватые (kPa)
    3 | 7500 | 6600 | 3100 | 2000 | 1100
    4 | 8300 | 6800 | 3200 | 2100 | 1250
    5 | 8800 | 7000 | 3400 | 2200 | 1300
    7 | 9700 | 7300 | 3700 | 2400 | 1400
    10 | 10500 | 7700 | 4000 | 2600 | 1500
    15 | 11700 | 8200 | 4400 | 2900 | 1650
    20 | 12600 | 8500 | 4800 | 3200 | 1800
    25 | 13400 | 9000 | 5200 | 3500 | 1950
    30 | 14200 | 9500 | 5600 | 3800 | 2100
    35 | 15000 | 10000 | 6000 | 4100 | 2250
    40 | 15800 | 10500 | 6400 | 4400 | 2400
end table
# [plot: Гравелистые (kPa), Крупные (kPa), Средней_крупности (kPa), Мелкие (kPa), Пылеватые (kPa) vs Z (m)]
