# Расчет плоских выделенных элементов железобетонных оболочек на основе нелинейной деформационной модели
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# Толщина плиты
d_pl := 50 cm
# Число делений
n_b := 25
# Нагрузки
table  # each column defines a variable
    LC | N_xx (kN) | N_yy (kN) | N_xy (kN) | M_xx (kN*m) | M_yy (kN*m) | M_xy (kN*m)
    0 | 980 | 0 | 0 | 0 | 0 | 0
    1 | 0 | 800 | 0 | 0 | 0 | 0
    2 | -8000 | 0 | 0 | 0 | 0 | 0
    3 | 0 | -10000 | 0 | 0 | 0 | 0
    4 | 0 | 0 | 0 | 350 | 0 | 0
    5 | 0 | 0 | 0 | 0 | -400 | 0
    6 | -100 | 0 | 0 | 350 | 0 | 0
    7 | -800 | -800 | 400 | 0 | 0 | 0
    8 | -100 | 100 | 0 | 300 | 300 | 50
    9 | -8000 | 0 | 0 | 1300 | 0 | 0
end table
n_l := rows(N_xx) = 10
Ld :=
    for i ∈ 0 .. n_l - 1
        Ld[i] ← [N_xx[i]; N_yy[i]; N_xy[i]; M_xx[i]; M_yy[i]; M_xy[i]]
    Ld
load := 8
lc := LC[load] = 8
# Арматурные стержни
# Участки бетона
table  # each column defines a variable
    Z_s (cm) | d_s (mm) | n | α_s (°)
    17.8 | 25 | 5 | 0
    15.3 | 25 | 5 | 90
    -15.3 | 25 | 5 | 90
    -17.8 | 25 | 5 | 0
end table
t_b := d_pl/n_b = 2 cm
A_b :=
    for i ∈ 0 .. n_b - 1
        A_b[i] ← t_b*1 m
    A_b
Z_b :=
    z0 ← d_pl/2 - t_b/2
    for i ∈ 0 .. n_b - 1
        Z_b[i] ← z0 - t_b*i
    Z_b
n_s := rows(n) = 4
A_s :=
    for i ∈ 0 .. n_s - 1
        A_s[i] ← π*d_s[i]^2/4*n[i]
    A_s
# Материалы
# Бетон
# [reference: Бетон.mcdx]
γ_b3 := 1  # Растяжение бетона
kt := 0
r := match("B60", grade)[0] = 9
R_b := R[r]*γ_b3 = -33 MPa
R_bt := Rt[r]*kt = 0 MPa
ε_b2 := ε2[r] = -0.0035
ε_b0 := ε0[r] = -0.002
ε_bt0 := εt0[r] = 0.0001
ε_bt2 := εt2[r] = 0.00015
E_b := E[r] = 39500 MPa
σ_b1 := 0.6*R_b = -19.8 MPa
σ_bt1 := 0.6*R_bt = 0 MPa
ε_b1 := σ_b1/E_b = -0.000501266
ε_bt1 := σ_bt1/E_b = 0
ν := 0
σb(ε_b, k_r) :=
    R_b ← R_b*k_r
    σ_b1 ← σ_b1*k_r
    if ε_b ≤ ε_b0
        σ_b ← R_b
    else if ε_b > ε_b0 and ε_b < ε_b1
        σ_b ← R_b + (ε_b - ε_b0)*(σ_b1 - R_b)/(ε_b1 - ε_b0)
    else if ε_b ≥ ε_b1 and ε_b ≤ ε_bt1
        σ_b ← σ_b1 + (ε_b - ε_b1)*σ_b1/ε_b1
    else if ε_b > ε_bt1 and ε_b < ε_bt0
        σ_b ← R_bt + (ε_b - ε_bt0)*(σ_bt1 - R_bt)/(ε_bt1 - ε_bt0)
    else if ε_b ≥ ε_bt0
        σ_b ← R_bt
    else
        σ_b ← 0
    σ_b
# Диаграмма состояния бетона
εc_b := ε_b2 - 0.000001, ε_b2 .. ε_bt2 + 0.000001
k_r := 1
# [plot: σb(εc_b, k_r) (MPa) vs εc_b]
# Арматура
# [reference: Арматура.mcdx]
r := match("A500", grade)[0] = 2
ε_sc2 := εc2[r] = -0.025
ε_s2 := ε2[r] = 0.025
R_sc := Rc[r] = -400 MPa
R_s := R[r] = 435 MPa
E_s := E[r] = 200000 MPa
ε_sc0 := R_sc/E_s = -0.002
ε_s0 := R_s/E_s = 0.002175
σs(ε_s) :=
    if ε_s ≤ ε_sc0
        σ_s ← R_sc
    else if ε_s > ε_sc0 and ε_s < ε_s0
        σ_s ← R_sc + (ε_s - ε_sc0)*E_s
    else if ε_s ≥ ε_s0
        σ_s ← R_s
    else
        σ_s ← 0
    σ_s
# Диаграмма состояния арматурной стали
εs_s := ε_sc2 - 0.00001, ε_sc2 .. ε_s2 + 0.00001
# [plot: σs(εs_s) (MPa) vs εs_s]
# Матрица коэффициентов деформаций бетонных слоёв
pl_b :=
    for i ∈ 0 .. n_b - 1
        pl_b[i] ← augment(identity(3), identity(3)*Z_b[i])
    pl_b
# Напряжения в бетоне по осям X и Y
# Начальные модули упругости в слоях бетона по главным направлениям
σxyb(σ_b, dir) :=
    cs ← cos(dir)
    sn ← sin(dir)
    for i ∈ 0 .. n_b - 1
        c_b ← [cs[i]^2, sn[i]^2; sn[i]^2, cs[i]^2; (sn[i]*cs[i]), (-sn[i]*cs[i])]
        σ_xyb[i] ← c_b*transpose(σ_b[i, :])
    σ_xyb
e.b :=
    for i ∈ 0 .. n_b - 1
        e.b[i, 0] ← E_b
        e.b[i, 1] ← E_b
    e.b
# Коэффициенты упругости бетона в слоях по главным направлениям
vb(ε_b, σ_b) :=
    for i ∈ 0 .. n_b - 1
        if ε_b[i, 0] ≠ 0
            v_b[i, 0] ← σ_b[i, 0]/(e.b[i, 0]*ε_b[i, 0])
        else
            v_b[i, 0] ← 1
        if ε_b[i, 1] ≠ 0
            v_b[i, 1] ← σ_b[i, 1]/(e.b[i, 1]*ε_b[i, 1])
        else
            v_b[i, 1] ← 1
    v_b
# Единичные коэффициенты упругости бетона в слоях
v1_b :=
    for i ∈ 0 .. n_b - 1
        v1_b[i, 0] ← 1
        v1_b[i, 1] ← 1
    v1_b
# Расчёт бетонных слоёв
conc(u, ν_b) :=
    for i ∈ 0 .. n_b - 1
        ε_c[i] ← pl_b[i]*u
        ε_xx[i] ← ε_c[i][0]
        ε_yy[i] ← ε_c[i][1]
        γ_xy[i] ← ε_c[i][2]
        ε_e0[i] ← ε_xx[i] + ε_yy[i]
        ε_e1[i] ← ε_xx[i] - ε_yy[i]
        ε_max[i] ← ε_e0[i]/2 + sqrt((ε_e1[i]/2)^2 + (γ_xy[i]/2)^2)
        ε_min[i] ← ε_e0[i]/2 - sqrt((ε_e1[i]/2)^2 + (γ_xy[i]/2)^2)
        ν_ν[i] ← 1 - ν_b[i, 0]*ν_b[i, 1]
        ε_b[i, 0] ← (ε_max[i] + ν_b[i, 0]*ε_min[i])/ν_ν[i]
        ε_b[i, 1] ← (ε_min[i] + ν_b[i, 1]*ε_max[i])/ν_ν[i]
        dir[i] ← 0.5*atan2(ε_e1[i], γ_xy[i])
        if ε_b[i, 0] > 0.002 and ε_b[i, 1] < 0
            k_r[i] ← 1/(0.8 + 100*ε_b[i, 0])
        else
            k_r[i] ← 1
        σ_b[i, 0] ← σb(ε_b[i, 0], 1)
        σ_b[i, 1] ← σb(ε_b[i, 1], k_r[i])
    [dir; ε_b; σ_b]
# Коэффициенты Пуассона
νb(e_b, ν__b) :=
    for i ∈ 0 .. n_b - 1
        if e_b[i, 0] ≠ 0
            ν_b[i, 1] ← e_b[i, 1]*ν__b[:, 0][i]/e_b[i, 0]
        else
            ν_b[i, 1] ← 0
        ν_b[i, 0] ← ν_b[i, 1]
    ν_b
# Параметр матрицы жёсткости бетонной части
qb(e_b, ν__b) :=
    ν_ν ← 1 - vectorize(ν__b[:, 0]*ν__b[:, 1])
    for i ∈ 0 .. n_b - 1
        Q_b[i] ← [
            e_b[i, 0]/ν_ν[i], ν__b[i, 0]*e_b[i, 0]/ν_ν[i], 0;
            ν__b[i, 1]*e_b[i, 1]/ν_ν[i], e_b[i, 1]/ν_ν[i], 0;
            0, 0, e_b[i, 0]/(2*(1 + ν__b[i, 1]))
        ]
    Q_b
# Параметр матрицы жёсткости бетона или арматуры
# Начальные модули упругости в слоях арматуры
ct(α) :=
    cs ← cos(α)
    sn ← sin(α)
    n_m ← length(α)
    for i ∈ 0 .. n_m - 1
        t[i] ← [
            cs[i]^2, sn[i]^2, (2*cs[i]*sn[i]);
            sn[i]^2, cs[i]^2, (-2*cs[i]*sn[i]);
            (-cs[i]*sn[i]), (cs[i]*sn[i]), (cs[i]^2 - sn[i]^2)
        ]
    t
e.s :=
    for j ∈ 0 .. n_s - 1
        e.s[j] ← E_s
    e.s
# Компонент матрицы жёсткости бетона или арматуры
ABBD(Am, z, t, q) :=
    r ← [1, 0, 0; 0, 1, 0; 0, 0, 2]
    n ← length(Am)
    for i ∈ 0 .. n - 1
        M[i] ← (t^-1)[i]*q[i]*r*t[i]*r^-1
    for i ∈ 0 .. n - 1
        a[i] ← M[i]*Am[i]
        b[i] ← M[i]*z[i]*Am[i]
        d[i] ← M[i]*z[i]^2*Am[i]
    a_ ← sum(a[i], i = 0 .. n - 1)
    b_ ← sum(b[i], i = 0 .. n - 1)
    d_ ← sum(d[i], i = 0 .. n - 1)
    d ← stack(augment(a_, b_), augment(b_, d_))
# Напряжения в арматуре по осям X и Y
σxys(stress, α) :=
    cs ← cos(α)
    sn ← sin(α)
    for j ∈ 0 .. n_s - 1
        mc ← [cs[j]^2, sn[j]^2; sn[j]^2, cs[j]^2; (sn[j]*cs[j]), (-sn[j]*cs[j])]
        σ_ts ← stack(stress[j], 0)
        σ_sys[j] ← mc*σ_ts
    σ_sys
# Матрица коэффициентов деформаций арматурных слоёв
pl_s :=
    for j ∈ 0 .. n_s - 1
        pl_s[j] ← augment(identity(3), identity(3)*Z_s[j])
    pl_s
# Коэффициенты упругости арматуры в слоях | Единичные коэффициенты упругости арматуры в слоях
vs(strain, stress) :=
    for j ∈ 0 .. n_s - 1
        if strain[j] ≠ 0
            v_s[j] ← stress[j]/(e.s[j]*strain[j])
        else
            v_s[j] ← 1
    v_s
v1_s :=
    for j ∈ 0 .. n_s - 1
        v1_s[j] ← 1
    v1_s
# Расчёт арматурных слоёв
reb(u, α) :=
    cs ← cos(α)
    sn ← sin(α)
    for j ∈ 0 .. n_s - 1
        ε_s[j] ← pl_s[j]*u
        dc ← [cs[j]^2, sn[j]^2, (2*sn[j]*cs[j])]
        strain[j] ← dc*ε_s[j]
        stress[j] ← σs(strain[j])
    [strain; stress]
qs(e_s) :=
    for j ∈ 0 .. n_s - 1
        Q_s[j] ← [e_s[j], 0, 0; 0, 0, 0; 0, 0, 0]
    Q_s
# Матрица жёсткости плоского выделенного элемента жб оболочек
# Точность расчёта
accur(F) :=
    for i ∈ 0 .. 5
        if Ld[lc][i] ≠ 0
            acc[i] ← (|Ld[lc][i] - F[i]|/|Ld[lc][i]|)
        else
            acc[i] ← 0
    max(acc)
D(dir, v_b, ν_b, v_s) :=
    Q_b ← qb(vectorize(e.b*v_b), ν_b)
    ν_b ← νb(vectorize(e.b*v_b), ν_b)
    t_b ← ct(dir)
    db ← ABBD(A_b, Z_b, t_b, Q_b)
    Q_s ← qs(vectorize(e.s*v_s))
    t_s ← ct(α_s)
    ds ← ABBD(A_s, Z_s, t_s, Q_s)
    abbd ← db + ds
# Линейный расчёт
# Начальные углы главного направления 1 от оси X в бетонных слоях
# Начальные коэффициенты Пуассона в слоях бетона
dir1 :=
    for i ∈ 0 .. n_b - 1
        dir1[i] ← 0°
    dir1
ν1_b :=
    for i ∈ 0 .. n_b - 1
        ν1_b[i, 0] ← ν
        ν1_b[i, 1] ← ν
    ν1_b
d := D(dir1, v1_b, ν1_b, v1_s)
ν_b := νb(vectorize(e.b*v1_b), ν1_b)
u := lsolve(d, Ld[lc])
# Нелинейный расчёт
accuracy := 0.00000000001
# Полученные нагрузки
Fn(res) :=
    Z ← stack(Z_b, Z_s)
    A ← stack(A_b, A_s)
    n ← length(Z)
    σ_xyb ← σxyb(res[3][2], res[3][0])
    σ_xys ← σxys(res[4][1], α_s)
    σ_xy ← stack(σ_xyb, σ_xys)
    F ← [0 kN; 0 kN; 0 kN; 0 kN·m; 0 kN·m; 0 kN·m]
    for i ∈ 0 .. n - 1
        F[0] ← F[0] + σ_xy[i][0]*A[i]
        F[1] ← F[1] + σ_xy[i][1]*A[i]
        F[2] ← F[2] + σ_xy[i][2]*A[i]
        F[3] ← F[3] + σ_xy[i][0]*A[i]*Z[i]
        F[4] ← F[4] + σ_xy[i][1]*A[i]*Z[i]
        F[5] ← F[5] + σ_xy[i][2]*A[i]*Z[i]
    F
res :=
    i ← 0
    acc ← 1
    while acc > accuracy
        try
            cnc ← conc(u, ν_b)
            v_b ← vb(cnc[1], cnc[2])
            rbr ← reb(u, α_s)
            v_s ← vs(rbr[0], rbr[1])
            d ← D(cnc[0], v_b, ν_b, v_s)
            ν__b ← νb(vectorize(e.b*v_b), ν_b)
            u ← lsolve(d, Ld[lc])
            ν_b ← ν__b
        on error
            break
        res ← [d; ν_b; u; cnc; rbr; v_b; v_s; i]
        F ← Fn(res)
        acc ← accur(F)
        i ← i + 1
    res ← stack(res, F, acc)
# Вектор главных деформаций
res[2] = [0.000823236; 0.00103728; 0.00193699; 0.00484926 1/m; 0.00599286 1/m; 0.0102179 1/m]
dir := res[3][0]
v_b := res[5]
ε_b := res[3][1]
σ_b := res[3][2]
v_s := res[6]
strain := res[4][0] = [0.0016864; 0.00195418; 0.000120368; -3.99324e-5]
stress := res[4][1] = [337.281; 390.837; 24.0736; -7.98647] MPa
# Проверка сходимости
# Данные нагрузки | Полученные нагрузки
Ld[lc] = [-100000 N; 100000 N; 0 N; 300000 J; 300000 J; 50000 J]
F := [res[8]; res[9]; res[10]; res[11]; res[12]; res[13]] = [-100000 N; 100000 N; 8.30374e-8 N; 300000 J; 300000 J; 50000 J]
# Полученная точность расчёта | Количество итераций
res[14] = 8.86561e-12
res[7] = 28
max(strain) = 0.00195418
min(ε_b) = -0.000630222
εb_0(Z_b) :=
    for i ∈ 0 .. n_b - 1
        ε[i] ← ε_b[:, 0][i]
    ε
εb_1(Z_b) :=
    for i ∈ 0 .. n_b - 1
        ε[i] ← ε_b[:, 1][i]
    ε
x := Z_b[0], Z_b[1] .. Z_b[n_b - 1]
# Strain
# [plot: εb_0(Z_b), εb_1(Z_b) vs Z_b (cm)]
σb_0(Z_b) :=
    for i ∈ 0 .. n_b - 1
        σ[i] ← σ_b[:, 0][i]
    σ
σb_1(Z_b) :=
    for i ∈ 0 .. n_b - 1
        σ[i] ← σ_b[:, 1][i]
    σ
# Stress
# [plot: σb_0(Z_b) (MPa), σb_1(Z_b) (MPa) vs Z_b (cm)]
