# Расчет по прочности нормальных железобетонных сечений на основе нелинейной деформационной модели
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# Арматурные стержни
table  # each column defines a variable
    X_s (mm) | Y_s (mm) | d_s (mm)
    250 | -150 | 32
    250 | 150 | 32
    -250 | -150 | 32
    -250 | 150 | 32
    0 | -150 | 18
    0 | 150 | 18
end table
B := 400 mm
H := 600 mm
n_b := 8
n_h := 12
ns := rows(X_s) = 6
ΔB := B/n_b = 0.05 m
ΔH := H/n_h = 0.05 m
A_bi := ΔB*ΔH = 0.0025 m^2
# Нагрузки
table  # each column defines a variable
    N (kN) | M_x (kN*m) | M_y (kN*m)
    -2600 | 250 | -200
end table
L := [N; M_x; M_y]
# Участки бетона
Sec :=
    for i ∈ 0 .. n_b - 1
        for j ∈ 0 .. n_h - 1
            Sec[j + i*n_h, 0] ← -H/2 + ΔH*j + ΔH/2
            Sec[j + i*n_h, 1] ← -B/2 + ΔB*i + ΔB/2
    Sec
nb := rows(Sec) = 96
A_b :=
    for i ∈ 0 .. nb - 1
        A_b[i] ← A_bi
    A_b
Ab :=
    for i ∈ 0 .. n_b - 1
        for j ∈ 0 .. n_h - 1
            Ab[i, j] ← A_bi
    Ab
# [3D plot: Ab (m^2)]
X_b := Sec[:, 0]
Y_b := Sec[:, 1]
# [reference: Бетон.mcdx]
γ_b3 := 1  # Растяжение бетона
kt := 1
r := match("B25", grade)[0] = 2
R_b := R[r]*γ_b3 = -14.5 MPa
R_bt := Rt[r]*kt = 1.05 MPa
ε_b2 := ε2[r] = -0.0035
ε_b0 := ε0[r] = -0.002
ε_bt0 := εt0[r] = 0.0001
ε_bt2 := εt2[r] = 0.00015
E_bi := E[r] = 30000 MPa
σ_b1 := 0.6*R_b = -8.7 MPa
σ_bt1 := 0.6*R_bt = 0.63 MPa
ε_b1 := σ_b1/E_bi = -0.00029
ε_bt1 := σ_bt1/E_bi = 2.1e-5
σb(ε) :=
    if ε ≤ ε_b0
        σ_b ← R_b
    else if ε > ε_b0 and ε < ε_b1
        σ_b ← R_b + (ε - ε_b0)*(σ_b1 - R_b)/(ε_b1 - ε_b0)
    else if ε ≥ ε_b1 and ε ≤ ε_bt1
        σ_b ← σ_b1 + (ε - ε_b1)*σ_b1/ε_b1
    else if ε > ε_bt1 and ε < ε_bt0
        σ_b ← R_bt + (ε - ε_bt0)*(σ_bt1 - R_bt)/(ε_bt1 - ε_bt0)
    else if ε ≥ ε_bt0
        σ_b ← R_bt
    else
        σ_b ← 0
    σ_b
E_b :=
    for i ∈ 0 .. nb - 1
        E_b[i] ← E_bi
    E_b
ε_b := ε_b2 - 0.00001, ε_b2 .. ε_bt2 + 0.00001
# Диаграмма состояния бетона
# [plot: σb(ε_b) (MPa) vs ε_b]
# [reference: Арматура.mcdx]
r := match("A400", grade)[0] = 1
ε_sc2 := εc2[r] = -0.025
ε_s2 := ε2[r] = 0.025
R_sc := Rc[r] = -350 MPa
R_s := R[r] = 350 MPa
E_sj := E[r] = 200000 MPa
ε_sc0 := R_sc/E_sj = -0.00175
ε_s0 := R_s/E_sj = 0.00175
E_s :=
    for j ∈ 0 .. ns - 1
        E_s[j] ← E_sj
    E_s
σs(ε) :=
    if ε ≤ ε_sc0
        σ_s ← R_sc
    else if ε > ε_sc0 and ε < ε_s0
        σ_s ← R_sc + (ε - ε_sc0)*E_sj
    else if ε ≥ ε_s0
        σ_s ← R_s
    else
        σ_s ← 0
    σ_s
ε_s := ε_sc2 - 0.00001, ε_sc2 .. ε_s2 + 0.00001
# Диаграмма состояния арматурной стали
# [plot: σs(ε_s) (MPa) vs ε_s]
X_s = [0.25; 0.25; -0.25; -0.25; 0; 0] m
Y_s = [-0.15; 0.15; -0.15; 0.15; -0.15; 0.15] m
A_s := π*d_s^2/4 = [8.04248; 8.04248; 8.04248; 8.04248; 2.54469; 2.54469] cm^2
D00(v_b, v_s) := sum(vectorize(A_b[i]*E_b[i]*v_b)[i], i = 0 .. nb - 1) + sum(vectorize(A_s[j]*E_s[j]*v_s[j]), j = 0 .. ns - 1)
D11(v_b, v_s) := sum(vectorize(A_b[i]*X_b[i]^2*E_b[i]*v_b[i]), i = 0 .. nb - 1) + sum(vectorize(A_s[j]*X_s[j]^2*E_s[j]*v_s[j]), j = 0 .. ns - 1)
D22(v_b, v_s) := sum(vectorize(A_b[i]*Y_b[i]^2*E_b[i]*v_b[i]), i = 0 .. nb - 1) + sum(vectorize(A_s[j]*Y_s[j]^2*E_s[j]*v_s[j]), j = 0 .. ns - 1)
D01(v_b, v_s) := sum(vectorize(A_b[i]*X_b[i]*E_b[i]*v_b[i]), i = 0 .. nb - 1) + sum(vectorize(A_s[j]*X_s[j]*E_s[j]*v_s[j]), j = 0 .. ns - 1)
D02(v_b, v_s) := sum(vectorize(A_b[i]*Y_b[i]*E_b[i]*v_b[i]), i = 0 .. nb - 1) + sum(vectorize(A_s[j]*Y_s[j]*E_s[j]*v_s[j]), j = 0 .. ns - 1)
D12(v_b, v_s) := sum(vectorize(A_b[i]*X_b[i]*Y_b[i]*E_b[i]*v_b[i]), i = 0 .. nb - 1) + sum(vectorize(A_s[j]*X_s[j]*Y_s[j]*E_s[j]*v_s[j]), j = 0 .. ns - 1)
# Матрица жёсткости нормальных сечений
Di(v_b, v_s) :=
    Di[0, 0] ← D00(v_b, v_s)
    Di[1, 1] ← D11(v_b, v_s)
    Di[2, 2] ← D22(v_b, v_s)
    Di[0, 1] ← D01(v_b, v_s)
    Di[1, 0] ← D01(v_b, v_s)
    Di[0, 2] ← D02(v_b, v_s)
    Di[2, 0] ← D02(v_b, v_s)
    Di[1, 2] ← D12(v_b, v_s)
    Di[2, 1] ← D12(v_b, v_s)
    Di
accur(F) :=
    for i ∈ 0 .. 2
        if L[i] ≠ 0
            acc[i] ← (|L[i] - F[i]|/|L[i]|)
        else
            acc[i] ← 0
    max(acc)
# Линейное решение
v_b :=
    for i ∈ 0 .. nb - 1
        v_b[i] ← 1
    v_b
v_s :=
    for j ∈ 0 .. ns - 1
        v_s[j] ← 1
    v_s
R := lsolve(Di(v_b, v_s), L)
ε_b :=
    for i ∈ 0 .. nb - 1
        ε_b[i] ← R[0] + R[1]*X_b[i] + R[2]*Y_b[i]
    ε_b
ε_s :=
    for j ∈ 0 .. ns - 1
        ε_s[j] ← R[0] + R[1]*X_s[j] + R[2]*Y_s[j]
    ε_s
σ_b :=
    for i ∈ 0 .. nb - 1
        σ_b[i] ← σb(ε_b[i])
    σ_b
σ_s :=
    for j ∈ 0 .. ns - 1
        σ_s[j] ← σs(ε_s[j])
    σ_s
Fn(res) :=
    σ_b ← res[0]
    σ_s ← res[1]
    F ← [
        sum(vectorize(A_b[i]*σ_b[i]), i = 0 .. nb - 1) + sum(vectorize(A_s[j]*σ_s[j]), j = 0 .. ns - 1);
        sum(vectorize(A_b[i]*σ_b[i]*X_b)[i], i = 0 .. nb - 1) + sum(vectorize(A_s[j]*σ_s[j]*X_s[j]), j = 0 .. ns - 1);
        sum(vectorize(A_b[i]*σ_b[i]*Y_b)[i], i = 0 .. nb - 1) + sum(vectorize(A_s[j]*σ_s[j]*Y_s[j]), j = 0 .. ns - 1)
    ]
    F
# Нелинейный расчёт
accuracy := 0.00000000001
res :=
    i ← 0
    acc ← 1
    while acc > accuracy
        for i ∈ 0 .. nb - 1
            v_b[i] ← σ_b[i]/(E_b[i]*ε_b[i])
        for j ∈ 0 .. ns - 1
            v_s[j] ← σ_s[j]/(E_s[j]*ε_s[j])
        R ← lsolve(Di(v_b, v_s), L)
        for i ∈ 0 .. nb - 1
            ε_b[i] ← R[0] + R[1]*X_b[i] + R[2]*Y_b[i]
        for i ∈ 0 .. nb - 1
            σ_b[i] ← σb(ε_b[i])
        for j ∈ 0 .. ns - 1
            ε_s[j] ← R[0] + R[1]*X_s[j] + R[2]*Y_s[j]
        for j ∈ 0 .. ns - 1
            σ_s[j] ← σs(ε_s[j])
        res ← [σ_b; σ_s; ε_b; ε_s; i]
        F ← Fn(res)
        acc ← accur(F)
        i ← i + 1
    res ← stack(res, F, acc)
σ_b := res[0]
σ_s := res[1]
ε_b := res[2]
ε_s := res[3]
# Проверка сходимости
N := sum(vectorize(A_b[i]*σ_b[i]), i = 0 .. nb - 1) + sum(vectorize(A_s[j]*σ_s[j]), j = 0 .. ns - 1) = -2600 kN
M_x := sum(vectorize(A_b[i]*σ_b[i]*X_b)[i], i = 0 .. nb - 1) + sum(vectorize(A_s[j]*σ_s[j]*X_s[j]), j = 0 .. ns - 1) = 250 kN*m
M_y := sum(vectorize(A_b[i]*σ_b[i]*Y_b)[i], i = 0 .. nb - 1) + sum(vectorize(A_s[j]*σ_s[j]*Y_s[j]), j = 0 .. ns - 1) = -200 kN*m
ε_min := min(ε_b) = -0.00333697
ε_max := max(ε_s) = 0.00117255
# Напряжения в арматурных стержнях
X_s = [0.25; 0.25; -0.25; -0.25; 0; 0] m
Y_s = [-0.15; 0.15; -0.15; 0.15; -0.15; 0.15] m
σ_s = [234.511; -203.762; -172.26; -350; 31.1256; -350] MPa
σ_0 := submatrix(res[0], 0, n_h - 1, 0, 0)
σ_b :=
    for i ∈ 2 .. n_b
        σ ← submatrix(σ_b, n_h*i - n_h, n_h*i - 1, 0, 0)
        σ_0 ← augment(σ_0, σ)
    σ_0
# Напряжения в бетоне
σ_b = [
    -10.3633, -11.602, -12.8408, -14.0796, -14.5, -14.5, -14.5, -14.5;
    -9.67342, -10.9122, -12.151, -13.3898, -14.5, -14.5, -14.5, -14.5;
    -8.98358, -10.2224, -11.4611, -12.6999, -13.9387, -14.5, -14.5, -14.5;
    -5.10664, -9.53251, -10.7713, -12.0101, -13.2489, -14.4876, -14.5, -14.5;
    0.694669, -8.84267, -10.0815, -11.3202, -12.559, -13.7978, -14.5, -14.5;
    1.05, -3.86034, -9.39161, -10.6304, -11.8692, -13.108, -14.3467, -14.5;
    1.05, 0.915532, -8.70176, -9.94054, -11.1793, -12.4181, -13.6569, -14.5;
    1.05, 1.05, -2.61404, -9.2507, -10.4895, -11.7283, -12.967, -14.2058;
    1.05, 1.05, 1.05, -7.46929, -9.79964, -11.0384, -12.2772, -13.516;
    1.05, 1.05, 1.05, -1.36774, -9.10979, -10.3486, -11.5874, -12.8261;
    1.05, 1.05, 1.05, 1.05, -6.22299, -9.65873, -10.8975, -12.1363;
    1.05, 1.05, 1.05, 1.05, -0.121437, -8.96889, -10.2077, -11.4464
] MPa
# Напряжения в бетоне
# [contour plot: σ_b (MPa)]
# [3D plot: σ_b (MPa)]
# Данные нагрузки | Полученные нагрузки
L = [-2600000 N; 250000 J; -200000 J]
F := [res[5]; res[6]; res[7]] = [-2600000 N; 250000 J; -200000 J]
# Количество итераций | Полученная точность расчёта
res[4] = 95
res[8] = 8.68097e-12
