# Расчет несущей способности буровой сваи СП 24.13330.2021 «СНиП 2.02.03-85 Свайные фундаменты»
# Диаметр сваи
d := 0.88 m
A := π*d^2/4 = 0.608212 m^2
u := π*d = 2.7646 m
# Длина сваи
H := 16.4 m
# Глубина котлована
h_k := 14.78 m
# Высота планировки
h_D := -0.94 m
Δh_t :=
    if h_D < 0 m
        Δh_t ← "Срезка"
    else if h_D > 0 m
        Δh_t ← "Подсыпка"
    else
        Δh_t ← "Нет"
    = "Срезка"
Δh :=
    if |h_D| < 3 m
        Δh ← 0 m
    else if Δh_t == "Срезка"
        Δh ← 3 m
    else if Δh_t == "Подсыпка"
        Δh ← -3 m
    else
        Δh ← 0 m
    Δh
    = 0 m
# Слои грунта от верха сваи
table  # each column defines a variable
    h (m) | k | γ_Rf
    1.72 | 1 | 0.7
    1.3 | 1 | 0.7
    1.76 | 1 | 0.7
    1.76 | 1 | 0.7
    1.76 | 1 | 0.7
    1.76 | 1 | 0.7
    1.76 | 1 | 0.7
    1.145 | 1 | 0.6
    1.145 | 1 | 0.6
    1.145 | 1 | 0.6
    1.145 | 1 | 0.6
end table
nh := length(h) = 11
sum(h) = 16.4 m
dz := 0
z :=
    for i ∈ 0 .. nh - 1
        z[i] ← h[i]/2 + dz
        dz ← dz + h[i]
    z + h_k + Δh
    = [15.64; 17.15; 18.68; 20.44; 22.2; 23.96; 25.72; 27.1725; 28.3175; 29.4625; 30.6075] m
# [reference: Глинистые 7.8.mcdx]
# (Т а б л и ц а 7.8)
γ_c := 1
γ_RR := 1
Z_R := H + h_k + Δh = 31.18 m
R := linterp(Z, IL_0.0, Z_R) = 3441.6 kPa
# [reference: Песок 7.3.mcdx]
# (Т а б л и ц а 7.3)
Z_f1 := [z[0]; z[1]] = [15.64; 17.15] m
f1 := linterp(Z, Крупные, Z_f1) = [72.896; 75.01] kPa
# [reference: Глинистые 7.3.mcdx]
Z_f2 := submatrix(z, 2, nh - 1, 0, 0) = [18.68; 20.44; 22.2; 23.96; 25.72; 27.1725; 28.3175; 29.4625; 30.6075] m
f2 := linterp(Z, IL_0.2, Z_f2) = [77.152; 79.616; 82.08; 84.544; 87.008; 89.0415; 90.6445; 92.2475; 93.8505] kPa
f := stack(f1, f2) = [72.896; 75.01; 77.152; 79.616; 82.08; 84.544; 87.008; 89.0415; 90.6445; 92.2475; 93.8505] kPa
# Несущая способность буровой сваи
F_d := γ_c*(γ_RR*R*A + u*sum(vectorize(k*γ_Rf*f*h))) = 4617.12 kN  # (7.13)
