# Расчет несущей способности стальной винтовой сваи по  СП 24.13330.2021 «СНиП 2.02.03-85 Свайные фундаменты»
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# (ТУ 25.11.23-001-46949399-2017)
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# Возможно изготовление винтовых свай диметром ствола от 57мм до 325мм, длиной от 1 метра до 12 метров с возможностью удлинения через сварную муфту
# Диаметр сваи
d := 0.133 m
A := π*d^2/4 = 0.0138929 m^2
u := π*d = 0.417832 m
# Диаметр лопасти
d_b := 0.35 m
A_b := π*d_b^2/4 = 0.0962113 m^2
# Длина сваи
H := 2.5 m
# Глубина котлована
h_k := 0 m
# Высота планировки
h_D := 0 m
Δh_t :=
    if h_D < 0 m
        Δh_t ← "Срезка"
    else if h_D > 0 m
        Δh_t ← "Подсыпка"
    else
        Δh_t ← "Нет"
    = "Нет"
Δh :=
    if |h_D| < 3 m
        Δh ← 0 m
    else if Δh_t == "Срезка"
        Δh ← 3 m
    else if Δh_t == "Подсыпка"
        Δh ← -3 m
    else
        Δh ← 0 m
    Δh
    = 0 m
# Слои грунта от верха сваи
table  # each column defines a variable
    h_i (m) | φ_i (°) | c_i (kPa) | γ_i (kN/m^3) | γ_ci
    1.0 | 27.3 | 0.7 | 16.4 | 0.8
    1.0 | 27.3 | 0.7 | 16.4 | 0.8
    0.5 | 7 | 8 | 15.3 | 0.7
end table
n := length(h_i) = 3
sum(h_i) = 2.5 m
dz := 0
z :=
    for i ∈ 0 .. n - 1
        z[i] ← h_i[i]/2 + dz
        dz ← dz + h_i[i]
    z + h_k + Δh
    = [0.5; 1.5; 2.25] m
# Несущая способность лопасти
# [reference: 7.10.mcdx]
# (Т а б л и ц а 7.10)
φ_1 := φ_i[n - 1] = 7°
α_1 := linterp(φ, α_1, φ_1) = 6
α_2 := linterp(φ, α_2, φ_1) = 1.3
c_1 := c_i[n - 1] = 8 kPa
γ_1 := γ_i[n - 1] = 15.3 kN/m^3
h_1 := sum(h_i) = 2.5 m
F_d0 := (α_1*c_1 + α_2*γ_1*h_1)*A_b = 9.40225 kN  # (7.18)
# Несущая способность ствола
# [reference: Песок 7.3.mcdx]
# (Т а б л и ц а 7.3)
Z_f1 := [z[0]; z[1]] = [0.5; 1.5] m
f1 := linterp(Z, Крупные, Z_f1) = [31.5; 38.5] kPa
# [reference: Глинистые 7.3.mcdx]
Z_f2 := submatrix(z, 2, n - 1, 0, 0) = [2.25] m
f2 := linterp(Z, IL_0.8, Z_f2) = [5.5] kPa
f := stack(f1, f2) = [31.5; 38.5; 5.5] kPa
F_df := sum(vectorize(u*f)*(H - d_b)) = 67.8246 kN  # (7.19)
# Несущая способность сваи
γ_c := γ_ci[n - 1] = 0.7
γ_RR := 1
γ_Rf := 1
F_d := γ_c*(γ_RR*F_d0 + γ_Rf*F_df) = 54.0588 kN  # (7.17)
# коэффициент надежности по ответственности сооружения
γ_n := 1
# коэффициент надежности по грунту
γ_cg := 1.4
# Допускаемая нагрузка на сваю
N := F_d/(γ_n*γ_cg) = 38.6134 kN  # (7.2)
