# Расчёт на сейсмическое воздействие с применением консольной РДМ по линейно-спектральному методу
# СП 14.13330.2018
# Расчётная динамическая модель РДМ | Модуль упругости бетона
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E_b := [30000; 30000; 30000; 30000] MPa
# Плотность бетона
γ := [2400; 2400; 2400; 2400] kg/m^3
# Толщина диафрагм | Длина диафрагм | Количество диафрагм
td := [180; 180; 180; 180] mm
ld := [6.6; 6.6; 6.6; 6.6] m
n_d := 2
# Толщина перекрытий | Отметки этажей | Грузовые площади
tp := [160; 160; 160; 200] mm
x_i := [4.5; 9; 13.5; 16.5] m
la := [260; 260; 260; 260] m^2
# Постоянные нагрузки | Временные нагрузки
dlv := [2; 3; 3; 3]*kPa
llv := [4; 2; 2; 2]*kPa
# Моменты инерции
I := vectorize(td*ld*ld*ld)/12*n_d = [8.62488; 8.62488; 8.62488; 8.62488] m^4
n := rows(x_i) = 4
# Общая длина
L := x_i[n - 1] = 16.5 m
# Матрица масс
M :=
    for i ∈ 0 .. n - 1
        M[i, i] ← (tp[i]*γ[i] + dlv[i]/g + llv[i]/g)*la[i]
    M
M = [258.916, 0, 0, 0; 0, 232.403, 0, 0; 0, 0, 232.403, 0; 0, 0, 0, 257.363] tonne
# Единичные силы
S1 :=
    for i ∈ 0 .. n - 1
        S1[i] ← 1 kN
    S1
    = [1; 1; 1; 1] kN
# Моменты от единичных сил
M.0(x, S1) :=
    if x ≤ x_i[0]
        M ← S1[0]*x_i[0] - S1[0]*x
    else
        M ← 0 kN*m
    M
M.0(0 m, S1) = 4.5 kN*m
x := 0 m, L/50 .. L
# [plot: M.0(x, S1) (kN*m) vs x (m)]
M.1(x, S1) :=
    if x ≤ x_i[1]
        M ← S1[1]*x_i[1] - S1[1]*x
    else
        M ← 0 kN*m
    M
M.1(0 m, S1) = 9 kN*m
# [plot: M.1(x, S1) (kN*m) vs x (m)]
M.2(x, S1) :=
    if x ≤ x_i[2]
        M ← S1[2]*x_i[2] - S1[2]*x
    else
        M ← 0 kN*m
    M
M.2(0 m, S1) = 13.5 kN*m
# [plot: M.2(x, S1) (kN*m) vs x (m)]
M.3(x, S1) := S1[3]*L - S1[3]*x
M.3(0 m, S1) = 16.5 kN*m
# [plot: M.3(x, S1) (kN*m) vs x (m)]
EI(x) :=
    for i ∈ 0 .. n - 1
        EI ← E_b[i]*I[i]
    EI
# Матрица податливости
D[0, 0] := integral(M.0(x, S1)*M.0(x, S1)/EI(x), x = 0 m .. L)
D[0, 1] := integral(M.0(x, S1)*M.1(x, S1)/EI(x), x = 0 m .. L)
D[0, 2] := integral(M.0(x, S1)*M.2(x, S1)/EI(x), x = 0 m .. L)
D[0, 3] := integral(M.0(x, S1)*M.3(x, S1)/EI(x), x = 0 m .. L)
D[1, 0] := integral(M.1(x, S1)*M.0(x, S1)/EI(x), x = 0 m .. L)
D[1, 1] := integral(M.1(x, S1)*M.1(x, S1)/EI(x), x = 0 m .. L)
D[1, 2] := integral(M.1(x, S1)*M.2(x, S1)/EI(x), x = 0 m .. L)
D[1, 3] := integral(M.1(x, S1)*M.3(x, S1)/EI(x), x = 0 m .. L)
D[2, 0] := integral(M.2(x, S1)*M.0(x, S1)/EI(x), x = 0 m .. L)
D[2, 1] := integral(M.2(x, S1)*M.1(x, S1)/EI(x), x = 0 m .. L)
D[2, 2] := integral(M.2(x, S1)*M.2(x, S1)/EI(x), x = 0 m .. L)
D[2, 3] := integral(M.2(x, S1)*M.3(x, S1)/EI(x), x = 0 m .. L)
D[3, 0] := integral(M.3(x, S1)*M.0(x, S1)/EI(x), x = 0 m .. L)
D[3, 1] := integral(M.3(x, S1)*M.1(x, S1)/EI(x), x = 0 m .. L)
D[3, 2] := integral(M.3(x, S1)*M.2(x, S1)/EI(x), x = 0 m .. L)
D[3, 3] := integral(M.3(x, S1)*M.3(x, S1)/EI(x), x = 0 m .. L)
D = [
    1.17468e-7, 2.93726e-7, 4.70051e-7, 5.87601e-7;
    2.93726e-7, 9.39205e-7, 1.64451e-6, 2.11471e-6;
    4.70051e-7, 1.64451e-6, 3.16963e-6, 4.22655e-6;
    5.87601e-7, 2.11471e-6, 4.22655e-6, 5.78704e-6
] kN·m
A := D*M = [
    3.04143e-5, 6.82628e-5, 0.000109241, 0.000151227;
    7.60502e-5, 0.000218274, 0.000382188, 0.000544247;
    0.000121704, 0.000382188, 0.000736633, 0.00108776;
    0.000152139, 0.000491464, 0.000982264, 0.00148937
] tonne*kN·m
# Собственные значения
λ := eigenvals(A) = [0.00241954; 4.70107e-5; 6.03374e-6; 2.10502e-6] tonne*kN·m
# Круговая частота
ω := sqrt(1/λ) = [20.3298; 145.848; 407.105; 689.242] 1/(s*kN)
# Период
T := 2*π/ω = [0.309063; 0.0430802; 0.0154338; 0.00911607] kN*s
# Техническая частота
f := ω/(2*π) = [3.23559; 23.2125; 64.7928; 109.696] 1/(s*kN)
# Собственные векторы
U := eigenvecs(A) = [
    0.0827346, 0.427954, 0.733881, -0.469476;
    0.290749, 0.747506, -0.0641193, 0.626621;
    0.567189, 0.227049, -0.587448, -0.580243;
    0.766105, -0.454466, 0.334981, 0.22418
]
vx := stack(0 m, x_i) = [0; 4.5; 9; 13.5; 16.5] m
vy0 := stack(0, U[:, 0]) = [0; 0.0827346; 0.290749; 0.567189; 0.766105]
vy1 := stack(0, U[:, 1]) = [0; 0.427954; 0.747506; 0.227049; -0.454466]
vy2 := stack(0, U[:, 2]) = [0; 0.733881; -0.0641193; -0.587448; 0.334981]
vy3 := stack(0, U[:, 3]) = [0; -0.469476; 0.626621; -0.580243; 0.22418]
c0 := cspline(vx, vy0)
U_0(x) := interp(c0, vx, vy0, x)
c1 := cspline(vx, vy1)
U_1(x) := interp(c1, vx, vy1, x)
c2 := cspline(vx, vy2)
U_2(x) := interp(c2, vx, vy2, x)
c3 := cspline(vx, vy3)
U_3(x) := interp(c3, vx, vy3, x)
# Формы колебаний
# [plot: U_0(x), U_1(x), U_2(x), U_3(x) vs x]
# Матрица весов масс
G := M*g = [2539.1, 0, 0, 0; 0, 2279.1, 0, 0; 0, 0, 2279.1, 0; 0, 0, 0, 2523.87] kN
E1 :=
    for i ∈ 0 .. n - 1
        E[i] ← 1
    E
    = [1; 1; 1; 1]
# коэффициент, зависящий от формы деформации здания или сооружения при его собственных колебаниях по i-й форме, от узловой точки приложения рассчитываемой нагрузки и направления сейсмического воздействия
η :=
    for i ∈ 0 .. n - 1
        η[i] ← transpose(U[:, i])*G*E1/(transpose(U[:, i])*G*U[:, i])*U[:, i]
    η
    = [
        [0.139872; 0.491542; 0.958894; 1.29518]; [0.388969; 0.67941; 0.206366; -0.413066]; [0.367109; -0.0320744; -0.293859; 0.167567]; [0.10405; -0.138878; 0.128599; -0.0496851]
    ]
# Проверка
η[0][0] + η[1][0] + η[2][0] + η[3][0] = 1
η[0][1] + η[1][1] + η[2][1] + η[3][1] = 1
η[0][2] + η[1][2] + η[2][2] + η[3][2] = 1
η[0][3] + η[1][3] + η[2][3] + η[3][3] = 1
# значение ускорения в уровне основания
A := 4 m/s^2
# коэффициент, учитывающий назначение сооружения и его ответственность
K_0 := 1
# коэффициент, учитывающий допускаемые повреждения зданий и сооружений
K_1 := 0.3
# коэффициент, учитывающий способность зданий и сооружений к рассеиванию энергии
K_Ψ := 1.5
# Категории грунтов
soil := 1
βi(T) :=
    if soil == 1
        if T ≤ 0.1 s
            β_i ← 1 + 15*T/s
        else if 0.1 s < T ≤ 0.4 s
            β_i ← 2.5
        else if T > 0.4 s
            β_i ← 2.5*(0.4*s/T)^0.5
        else
            β_i ← 0.8
    else
        if T ≤ 0.1 s
            β_i ← 1 + 15*T/s
        else if 0.1 s < T ≤ 0.8 s
            β_i ← 2.5
        else if T > 0.8 s
            β_i ← 2.5*(0.8*s/T)^0.5
        else
            β_i ← 0.8
# Значения коэффициента динамичности
Ti := 0 s, 2 s/20 .. 2 s
# [plot: βi(Ti) vs Ti]
β :=
    for i ∈ 0 .. n - 1
        β[i] ← βi(T[i]/kN)
    β
    = [2.5; 1.6462; 1.23151; 1.13674]
# Расчетная сейсмическая нагрузка
S_0 :=
    for i ∈ 0 .. n - 1
        S_0[i] ← M*η[i]*A*β[i]*K_Ψ
    S_0
    = [
        [543.225; 1713.54; 3342.75; 4999.99]; [994.737; 1559.58; 473.711; -1050.03]; [702.331; -55.0793; -504.625; 318.657]; [183.744; -220.134; 203.841; -87.2137]
    ] kN
S := K_0*K_1*S_0 = [
    [162.967; 514.061; 1002.83; 1500]; [298.421; 467.875; 142.113; -315.008]; [210.699; -16.5238; -151.388; 95.5972]; [55.1232; -66.0403; 61.1524; -26.1641]
] kN
# Изгибающие моменты
M0(x, S) := M.0(x, S[0]) + M.1(x, S[0]) + M.2(x, S[0]) + M.3(x, S[0])
M1(x, S) := M.0(x, S[1]) + M.1(x, S[1]) + M.2(x, S[1]) + M.3(x, S[1])
M2(x, S) := M.0(x, S[2]) + M.1(x, S[2]) + M.2(x, S[2]) + M.3(x, S[2])
M3(x, S) := M.0(x, S[3]) + M.1(x, S[3]) + M.2(x, S[3]) + M.3(x, S[3])
# [plot: M0(x, S) (kN*m), M1(x, S) (kN*m), M2(x, S) (kN*m), M3(x, S) (kN*m) vs x (m)]
# Суммарная эпюра моментов
M_0(x, S) := (M.0(x, S[0]) + M.1(x, S[0]) + M.2(x, S[0]) + M.3(x, S[0]))^2
M_1(x, S) := (M.0(x, S[1]) + M.1(x, S[1]) + M.2(x, S[1]) + M.3(x, S[1]))^2
M_2(x, S) := (M.0(x, S[2]) + M.1(x, S[2]) + M.2(x, S[2]) + M.3(x, S[2]))^2
M_3(x, S) := (M.0(x, S[3]) + M.1(x, S[3]) + M.2(x, S[3]) + M.3(x, S[3]))^2
MS(x, S) := sqrt(M_0(x, S) + M_1(x, S) + M_2(x, S) + M_3(x, S))
# [plot: MS(x, S) (kN*m) vs x (m)]
MS(0 m, S) = 43708.5 kN*m
MS(x_i[0], S) = 29342.8 kN*m
MS(x_i[1], S) = 15856.8 kN*m
MS(x_i[2], S) = 4607.75 kN*m
MS(x_i[3], S) = 0 kN*m
# Перемещения от сейсмического воздействия
Δ[0, 0] := integral(M.0(x, S1)*M0(x, S)/EI(x), x = 0 m .. L)
Δ[0, 1] := integral(M.0(x, S1)*M1(x, S)/EI(x), x = 0 m .. L)
Δ[0, 2] := integral(M.0(x, S1)*M2(x, S)/EI(x), x = 0 m .. L)
Δ[0, 3] := integral(M.0(x, S1)*M3(x, S)/EI(x), x = 0 m .. L)
Δ[1, 0] := integral(M.1(x, S1)*M0(x, S)/EI(x), x = 0 m .. L)
Δ[1, 1] := integral(M.1(x, S1)*M1(x, S)/EI(x), x = 0 m .. L)
Δ[1, 2] := integral(M.1(x, S1)*M2(x, S)/EI(x), x = 0 m .. L)
Δ[1, 3] := integral(M.1(x, S1)*M3(x, S)/EI(x), x = 0 m .. L)
Δ[2, 0] := integral(M.2(x, S1)*M0(x, S)/EI(x), x = 0 m .. L)
Δ[2, 1] := integral(M.2(x, S1)*M1(x, S)/EI(x), x = 0 m .. L)
Δ[2, 2] := integral(M.2(x, S1)*M2(x, S)/EI(x), x = 0 m .. L)
Δ[2, 3] := integral(M.2(x, S1)*M3(x, S)/EI(x), x = 0 m .. L)
Δ[3, 0] := integral(M.3(x, S1)*M0(x, S)/EI(x), x = 0 m .. L)
Δ[3, 1] := integral(M.3(x, S1)*M1(x, S)/EI(x), x = 0 m .. L)
Δ[3, 2] := integral(M.3(x, S1)*M2(x, S)/EI(x), x = 0 m .. L)
Δ[3, 3] := integral(M.3(x, S1)*M3(x, S)/EI(x), x = 0 m .. L)
Δ = [
    1.52134, 0.0541781, 0.00490882, 0.000447192;
    5.34839, 0.0949149, -0.000478651, -0.000623805;
    10.4393, 0.0282617, -0.00404582, 0.000603229;
    14.1007, -0.058543, 0.00219855, -0.000168234
] J
Δi := [
    sqrt(Δ[0, 0]^2 + Δ[0, 1]^2 + Δ[0, 2]^2 + Δ[0, 3]^2);
    sqrt(Δ[1, 0]^2 + Δ[1, 1]^2 + Δ[1, 2]^2 + Δ[1, 3]^2);
    sqrt(Δ[2, 0]^2 + Δ[2, 1]^2 + Δ[2, 2]^2 + Δ[2, 3]^2);
    sqrt(Δ[3, 0]^2 + Δ[3, 1]^2 + Δ[3, 2]^2 + Δ[3, 3]^2)
]*1/kN = [1.52232; 5.34923; 10.4393; 14.1008] mm
vy := stack(0, Δi) = [0; 1.52232; 5.34923; 10.4393; 14.1008] mm
c := cspline(vx, vy)
Δ(x) := interp(c, vx, vy, x)
# Перемещения
# [plot: Δ(x) (mm) vs x]
