# Расчёт на сейсмическое воздействие с применением консольной РДМ по линейно-спектральному методу
# СП 14.13330.2018
# Расчётная динамическая модель РДМ | Модуль упругости стали
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E_s := [206000000; 206000000] kPa
# Плотность стали
γ := [7850; 7850] kg/m^3
# Средний диаметр трубы
d := [2.8; 2.8] m
# Толщина стенки трубы
t := [18; 18] mm
# Масса
G_1 := 10 tonne
# Моменты инерции | Погонная масса
I := π*vectorize(d^3*t)/8 = [0.15517; 0.15517] m^4
q := π*vectorize(d*t*γ) = [1.24294; 1.24294] tonne/m
# Координаты
x_i := [13; 26] m
n := rows(x_i) = 2
# Общая длина
L := x_i[n - 1] = 26 m
# Матрица масс
M := [q[0]*(x_i[0] + (x_i[1] - x_i[0]))/2, 0 tonne; 0 tonne, q[1]*(x_i[1] - x_i[0])/2 + G_1] = [16.1582, 0; 0, 18.0791] tonne
# Единичные силы
S1 :=
    for i ∈ 0 .. n - 1
        S1[i] ← 1 kN
    S1
    = [1; 1] kN
# Моменты от единичных сил
M_0(x, S1) :=
    if x ≤ x_i[0]
        M ← S1[0]*x_i[0] - S1[0]*x
    else
        M ← 0 kN*m
    M
M_0(0 m, S1) = 13 kN*m
x := 0 m, L/20 .. L
# [plot: M_0(x, S1) (kN*m) vs x (m)]
M_1(x, S1) := S1[1]*L - S1[1]*x
M_1(0 m, S1) = 26 kN*m
# [plot: M_1(x, S1) (kN*m) vs x (m)]
EI(x) :=
    if x ≤ x_i[0]
        EI ← E_s[0]*I[0]
    else
        EI ← E_s[1]*I[1]
    EI
# Матрица податливости
D[0, 0] := integral(M_0(x, S1)*M_0(x, S1)/EI(x), x = 0 m .. L)
D[0, 1] := integral(M_0(x, S1)*M_1(x, S1)/EI(x), x = 0 m .. L)
D[1, 0] := integral(M_0(x, S1)*M_1(x, S1)/EI(x), x = 0 m .. L)
D[1, 1] := integral(M_1(x, S1)*M_1(x, S1)/EI(x), x = 0 m .. L)
D = [2.29105e-5, 5.72763e-5; 5.72763e-5, 0.000183284] kN·m
A := D*M = [0.000370193, 0.0010355; 0.000925483, 0.00331362] tonne*kN·m
# Собственные значения
λ := eigenvals(A) = [0.00360947; 7.43422e-5] tonne*kN·m
# Круговая частота
ω := sqrt(1/λ) = [16.6448; 115.98] 1/(s*kN)
# Период
T := 2*π/ω = [0.377486; 0.0541748] kN*s
# Техническая частота
f := ω/(2*π) = [2.6491; 18.4588] 1/(s*kN)
# Собственные векторы
U := eigenvecs(A) = [-0.304492, -0.961526; -0.952515, 0.274715]
vx := stack(0 m, x_i) = [0; 13; 26] m
vy0 := stack(0, U[:, 0]) = [0; -0.304492; -0.952515]
vy1 := stack(0, U[:, 1]) = [0; -0.961526; 0.274715]
c0 := cspline(vx, vy0)
U_0(x) := interp(c0, vx, vy0, x)
c1 := cspline(vx, vy1)
U_1(x) := interp(c1, vx, vy1, x)
# Формы колебаний
# [plot: U_0(x), U_1(x) vs x]
# Матрица весов масс
G := M*g = [158.458, 0; 0, 177.295] kN
E :=
    for i ∈ 0 .. n - 1
        E[i] ← 1
    E
    = [1; 1]
# коэффициент, зависящий от формы деформации здания или сооружения при его собственных колебаниях по i-й форме, от узловой точки приложения рассчитываемой нагрузки и направления сейсмического воздействия
η :=
    for i ∈ 0 .. n - 1
        η[i] ← transpose(U[:, i])*G*E/(transpose(U[:, i])*G*U[:, i])*U[:, i]
    η
    = [[0.376608; 1.17811]; [0.623392; -0.178108]]
# Проверка
η[0][0] + η[1][0] = 1
η[0][1] + η[1][1] = 1
# значение ускорения в уровне основания
A := 4 m/s^2
# коэффициент, учитывающий назначение сооружения и его ответственность
K_0 := 1
# коэффициент, учитывающий допускаемые повреждения зданий и сооружений
K_1 := 1
# Коэффициент, учитывающий способность зданий и сооружений к рассеиванию энергии
K_Ψ := 1.5
# Категории грунтов
soil := 1
βi(T) :=
    if soil == 1
        if T ≤ 0.1 s
            β_i ← 1 + 15*T/s
        else if 0.1 s < T ≤ 0.4 s
            β_i ← 2.5
        else if T > 0.4 s
            β_i ← 2.5*(0.4*s/T)^0.5
        else
            β_i ← 0.8
    else
        if T ≤ 0.1 s
            β_i ← 1 + 15*T/s
        else if 0.1 s < T ≤ 0.8 s
            β_i ← 2.5
        else if T > 0.8 s
            β_i ← 2.5*(0.8*s/T)^0.5
        else
            β_i ← 0.8
# Значения коэффициента динамичности
Ti := 0 s, 2 s/20 .. 2 s
# [plot: βi(Ti) vs Ti]
β :=
    for i ∈ 0 .. n - 1
        β[i] ← βi(T[i]/kN)
    β
    = [2.5; 1.81262]
# Расчетная сейсмическая нагрузка
S_0 :=
    for i ∈ 0 .. n - 1
        S_0[i] ← M*η[i]*A*β[i]*K_Ψ
    S_0
    = [[91.2797; 319.487]; [109.55; -35.0201]] kN
S := K_0*K_1*S_0 = [[91.2797; 319.487]; [109.55; -35.0201]] kN
# Изгибающие моменты
M0(x, S) := M_0(x, S[0]) + M_1(x, S[0])
M1(x, S) := M_0(x, S[1]) + M_1(x, S[1])
# [plot: M0(x, S) (kN*m), M1(x, S) (kN*m) vs x (m)]
# Суммарная эпюра моментов
MS(x, S) := sqrt((M_0(x, S[0]) + M_1(x, S[0]))^2 + (M_0(x, S[1]) + M_1(x, S[1]))^2)
# [plot: MS(x, S) (kN*m) vs x (m)]
MS(0 m, S) = 9507.18 kN*m
MS(x_i[0], S) = 4178.21 kN*m
MS(x_i[1], S) = 0 kN*m
# Перемещения от сейсмического воздействия
Δ[0, 0] := integral(M_0(x, S1)*M0(x, S)/EI(x), x = 0 m .. L)
Δ[0, 1] := integral(M_0(x, S1)*M1(x, S)/EI(x), x = 0 m .. L)
Δ[1, 0] := integral(M_1(x, S1)*M0(x, S)/EI(x), x = 0 m .. L)
Δ[1, 1] := integral(M_1(x, S1)*M1(x, S)/EI(x), x = 0 m .. L)
Δ = [20.3903, 0.504029; 63.7851, -0.144005] J
Δi := [sqrt(Δ[0, 0]^2 + Δ[0, 1]^2); sqrt(Δ[1, 0]^2 + Δ[1, 1]^2)]*1/kN = [20.3965; 63.7853] mm
