# Расчёт на сейсмическое воздействие с применением консольной РДМ по линейно-спектральному методу
# СП 14.13330.2018 методом сил
# Расчётная динамическая модель РДМ
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# Модуль упругости бетона
E := 36000 MPa
# Плотность бетона
γ := 2750 kg/m^3
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# Толщина диафрагм | Длина диафрагм | Количество диафрагм
td := [300; 300; 300] mm
ld := [7.2; 7.2; 7.2] m
n_d := 8
# Толщина перекрытий | Отметки этажей | Площади этажей
tp := [200; 200; 200] mm
x_i := [5.1; 10.2; 15.3] m
la := [1650; 1650; 1650] m^2
# Постоянные нагрузки | Временные нагрузки
dlv := [2; 2; 3]*kPa
llv := [4; 4; 2]*kPa
# Момент инерции диафрагм
I := vectorize(td*ld^3)/12*n_d
EI := E*I
n := rows(x_i) = 3
# Общая длина
L := x_i[n - 1] = 15.3 m
# коэффициент учёта других конструкций
k_w := 1.1
# Матрица масс
M :=
    for i ∈ 0 .. n - 1
        M[i, i] ← (tp[i]*γ + dlv[i]/g + llv[i]/g)*la[i]*k_w
    M
M = [2108.72, 0, 0; 0, 2108.72, 0; 0, 0, 1923.64] tonne
# Моменты от единичных сил
M_i(x, xi, S) :=
    if x ≤ xi
        M ← S*xi - S*x
    else
        M ← 0 kN*m
    M
# Матрица податливости
δ :=
    for i ∈ 0 .. n - 1
        for j ∈ 0 .. n - 1
            D[i, j] ← integral(M_i(x, x_i[i], 1 kN)*M_i(x, x_i[j], 1 kN)/EI[i], x = 0 m .. L)
    D
δ = [
    1.64606e-8, 4.11742e-8, 6.58299e-8;
    4.11742e-8, 1.31621e-7, 2.30376e-7;
    6.58299e-8, 2.30376e-7, 4.44246e-7
] kN*m
d := δ*M = [
    3.47109e-5, 8.68249e-5, 0.000126633;
    8.68249e-5, 0.000277552, 0.000443161;
    0.000138817, 0.000485798, 0.00085457
] tonne*kN·m
# Собственные значения
λ := eigenvals(d) = [0.00113514; 2.78452e-5; 3.84577e-6] tonne*kN·m
# Круговая частота
ω := sqrt(1/λ) = [29.6808; 189.507; 509.927] 1/(s*kN)
# Период
T := 2*π/ω = [0.211692; 0.0331555; 0.0123217] kN*s
# Техническая частота
f := ω/(2*π) = [4.72384; 30.1609; 81.1574] 1/(s*kN)
# Собственные векторы
U := eigenvecs(d) = [-0.137345, -0.571014, -0.802976; -0.465668, -0.66231, 0.564473; -0.874237, 0.485065, -0.191312]
vx := stack(0 m, x_i) = [0; 5.1; 10.2; 15.3] m
vy :=
    for i ∈ 0 .. n - 1
        vy[i] ← stack(0, U[:, i])
    vy
    = [
        [0; -0.137345; -0.465668; -0.874237]; [0; -0.571014; -0.66231; 0.485065]; [0; -0.802976; 0.564473; -0.191312]
    ]
c0 := cspline(vx, vy[0])
U_0(x) := interp(c0, vx, vy[0], x)
c1 := cspline(vx, vy[1])
U_1(x) := interp(c1, vx, vy[1], x)
c2 := cspline(vx, vy[2])
U_2(x) := interp(c2, vx, vy[2], x)
# Формы колебаний
x := 0 m, L/100 .. L
# [plot: U_0(x), U_1(x), U_2(x) vs x]
# Матрица весов масс
G := M*g = [20679.5, 0, 0; 0, 20679.5, 0; 0, 0, 18864.5] kN
E1 :=
    for i ∈ 0 .. n - 1
        E[i] ← 1
    E
    = [1; 1; 1]
# коэффициент, зависящий от формы деформации здания или сооружения при его собственных колебаниях по i-й форме, от узловой точки приложения рассчитываемой нагрузки и направления сейсмического воздействия
η :=
    for i ∈ 0 .. n - 1
        η[i] ← transpose(U[:, i])*G*E1/(transpose(U[:, i])*G*U[:, i])*U[:, i]
    η
    = [[0.206186; 0.699071; 1.31242]; [0.461098; 0.53482; -0.391694]; [0.332716; -0.233892; 0.0792708]]
# Проверка
η[0][0] + η[1][0] + η[2][0] = 1
η[0][1] + η[1][1] + η[2][1] = 1
η[0][2] + η[1][2] + η[2][2] = 1
# значение ускорения в уровне основания
As := 4 m/s^2
# коэффициент, учитывающий назначение сооружения и его ответственность
K_0 := 1.1
# коэффициент, учитывающий допускаемые повреждения зданий и сооружений
K_1 := 0.3
# коэффициент, учитывающий способность зданий и сооружений к рассеиванию энергии
K_Ψ := 1
# Категории грунтов
soil := 3
βi(T) :=
    if soil == 1
        if T ≤ 0.1 s
            β_i ← 1 + 15*T/s
        else if 0.1 s < T < 0.4 s
            β_i ← 2.5
        else
            β_i ← 2.5*(0.4*s/T)^0.5
    else
        if T ≤ 0.1 s
            β_i ← 1 + 15*T/s
        else if 0.1 s < T < 0.8 s
            β_i ← 2.5
        else
            β_i ← 2.5*(0.8*s/T)^0.5
    if β_i < 0.8
        β_i ← 0.8
    β_i
# Значения коэффициента динамичности
Ti := 0 s, 2 s/15 .. 4.5 s
# [plot: βi(Ti) vs Ti]
β :=
    for i ∈ 0 .. n - 1
        β[i] ← βi(T[i]/kN)
    β
    = [2.5; 1.49733; 1.18483]
S_0 :=
    for i ∈ 0 .. n - 1
        S_0[i] ← M*η[i]*As*β[i]*K_Ψ
    S_0
# Расчетная сейсмическая нагрузка
S := K_0*K_1*S_0 = [[1434.8; 4864.68; 8331.29]; [1921.78; 2229.05; -1489.24]; [1097.29; -771.37; 238.488]] kN
M.0(x) := M_i(x, x_i[0], S[0][0, :][0]) + M_i(x, x_i[1], S[0][1, :][0]) + M_i(x, x_i[2], S[0][2, :][0])
M.1(x) := M_i(x, x_i[0], S[1][0, :][0]) + M_i(x, x_i[1], S[1][1, :][0]) + M_i(x, x_i[2], S[1][2, :][0])
M.2(x) := M_i(x, x_i[0], S[2][0, :][0]) + M_i(x, x_i[1], S[2][1, :][0]) + M_i(x, x_i[2], S[2][2, :][0])
# Изгибающие моменты в диафрагмах по формам
# [plot: M.0(x) (kN*m), M.1(x) (kN*m), M.2(x) (kN*m) vs x (m)]
M.0(0 m) = 184406 kN*m
# Суммарная эпюра моментов
M_0(x) := (M_i(x, x_i[0], S[0][0, :][0]) + M_i(x, x_i[1], S[0][1, :][0]) + M_i(x, x_i[2], S[0][2, :][0]))^2
M_1(x) := (M_i(x, x_i[0], S[1][0, :][0]) + M_i(x, x_i[1], S[1][1, :][0]) + M_i(x, x_i[2], S[1][2, :][0]))^2
M_2(x) := (M_i(x, x_i[0], S[2][0, :][0]) + M_i(x, x_i[1], S[2][1, :][0]) + M_i(x, x_i[2], S[2][2, :][0]))^2
MS(x) := sqrt(M_0(x) + M_1(x) + M_2(x))
# [plot: MS(x) (kN*m) vs x (m)]
MS(0 m) = 184669 kN*m
# Перемещения от сейсмического воздействия
Δ :=
    for i ∈ 0 .. n - 1
        Δ[i, 0] ← integral(M_i(x, x_i[i], 1 kN)*M.0(x)/EI[i], x = 0 m .. L)
        Δ[i, 1] ← integral(M_i(x, x_i[i], 1 kN)*M.1(x)/EI[i], x = 0 m .. L)
        Δ[i, 2] ← integral(M_i(x, x_i[i], 1 kN)*M.2(x)/EI[i], x = 0 m .. L)
    Δ
Δ_i :=
    for i ∈ 0 .. n - 1
        Δ_i[i] ← sqrt(Δ[i, 0]^2 + Δ[i, 1]^2 + Δ[i, 2]^2)/kN
    Δ_i
    = [0.772445; 2.61863; 4.9162] mm
vyΔ := stack(0, Δ_i) = [0; 0.772445; 2.61863; 4.9162] mm
c := cspline(vx, vyΔ)
Δi(x) := interp(c, vx, vyΔ, x)
# Перемещения
# [plot: Δi(x) (mm) vs x]
