# Расчёт на сейсмическое воздействие с применением консольной РДМ по линейно-спектральному методу
# СП 14.13330.2018 методом деформаций
# Расчётная динамическая модель РДМ
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# Модуль упругости бетона
E_b := 36000 MPa
# Плотность бетона
γ := 2750 kg/m^3
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# Толщина диафрагм | Длина диафрагм | Количество диафрагм
td := [300; 300; 300] mm
ld := [7.2; 7.2; 7.2] m
n_d := 8
# Толщина перекрытий | Отметки этажей | Площади этажей
tp := [200; 200; 200] mm
x_i := [5.1; 10.2; 15.3] m
la := [1650; 1650; 1650] m^2
# Постоянные нагрузки | Временные нагрузки
dlv := [2; 2; 3]*kPa
llv := [4; 4; 2]*kPa
# Моменты инерции и площади диафрагм
I_s := vectorize(td*ld^3)/12*n_d
A_s := vectorize(td*ld)*n_d
n := rows(x_i) = 3
# Общая длина
L := x_i[n - 1] = 15.3 m
# коэффициент учёта других конструкций
k_w := 1.1
# Матрица масс
M__s :=
    for i ∈ 0 .. n - 1
        M[i, i] ← (tp[i]*γ + dlv[i]/g + llv[i]/g)*la[i]*k_w
    M
M__s = [2108.72, 0, 0; 0, 2108.72, 0; 0, 0, 1923.64] tonne
# Узлы
table  # each column defines a variable
    x (m) | z (m) | U_x | U_z | R_y | m_x (tonne)
    0 | 0 | 1 | 1 | 1 | 0
    0 | 5.1 | 0 | 0 | 0 | 2108.721
    0 | 10.2 | 0 | 0 | 0 | 2108.721
    0 | 15.3 | 0 | 0 | 0 | 1923.642
end table
# 1 - закрепление
# количество узлов
n_j := rows(x) = 4
# Элементы
table  # each column defines a variable
    j_s | j_e | R_s | R_e | A (m^2) | J (m^4) | E (MPa)
    0 | 1 | 0 | 0 | 17.28 | 74.6496 | 36000
    1 | 2 | 0 | 0 | 17.28 | 74.6496 | 36000
    2 | 3 | 0 | 0 | 1.44 | 74.6496 | 36000
end table
# 1 - шарнир
# количество элементов
n_f := rows(j_s) = 3
# Длины элементов
l :=
    for i ∈ 0 .. n_f - 1
        l[i] ← sqrt((x[j_e[i]] - x[j_s[i]])^2 + (z[j_e[i]] - z[j_s[i]])^2)
    l
# Косинусы α | Синусы α
cos :=
    for i ∈ 0 .. n_f - 1
        c[i] ← (x[j_e[i]] - x[j_s[i]])/l[i]
    c
sin :=
    for i ∈ 0 .. n_f - 1
        s[i] ← (z[j_e[i]] - z[j_s[i]])/l[i]
    s
# Матрица преобразования координат
T_α(i) := [
    cos[i], sin[i], 0, 0, 0, 0;
    -sin[i], cos[i], 0, 0, 0, 0;
    0, 0, 1, 0, 0, 0;
    0, 0, 0, cos[i], sin[i], 0;
    0, 0, 0, -sin[i], cos[i], 0;
    0, 0, 0, 0, 0, 1
]
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# Матрица приведения размерностей
u_1 := [
    m, m, m, m, m, m;
    m, m, 1, m, m, 1;
    m, 1, 1/m, m, 1, 1/m;
    m, m, m, m, m, m;
    m, m, 1, m, m, 1;
    m, 1, 1/m, m, 1, 1/m
]*1/kN
# Матрица  КЭ в локальной системе координат
K'_1(i) := [
    E[i]*A[i]/l[i], 0, 0, -E[i]*A[i]/l[i], 0, 0;
    0, 12*E[i]*J[i]/l[i]^3, -6*E[i]*J[i]/l[i]^2, 0, -12*E[i]*J[i]/l[i]^3, -6*E[i]*J[i]/l[i]^2;
    0, -6*E[i]*J[i]/l[i]^2, 4*E[i]*J[i]/l[i], 0, 6*E[i]*J[i]/l[i]^2, 2*E[i]*J[i]/l[i];
    -E[i]*A[i]/l[i], 0, 0, E[i]*A[i]/l[i], 0, 0;
    0, -12*E[i]*J[i]/l[i]^3, 6*E[i]*J[i]/l[i]^2, 0, 12*E[i]*J[i]/l[i]^3, 6*E[i]*J[i]/l[i]^2;
    0, -6*E[i]*J[i]/l[i]^2, 2*E[i]*J[i]/l[i], 0, 6*E[i]*J[i]/l[i]^2, 4*E[i]*J[i]/l[i]
]
# Матрица КЭ в глобальной системе координат
K_1(i) := transpose(T_α(i))*vectorize(K'_1(i)*u_1)*T_α(i)
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# Матрица приведения размерностей
u_2 := [
    m, m, m, m, m, m;
    m, m, 1, m, m, m;
    m, 1, 1/m, m, 1, m;
    m, m, m, m, m, m;
    m, m, 1, m, m, m;
    m, m, m, m, m, m
]*1/kN
# Матрица  КЭ в локальной системе координат
K'_2(i) := [
    E[i]*A[i]/l[i], 0, 0, -E[i]*A[i]/l[i], 0, 0;
    0, 3*E[i]*J[i]/l[i]^3, -3*E[i]*J[i]/l[i]^2, 0, -3*E[i]*J[i]/l[i]^3, 0;
    0, -3*E[i]*J[i]/l[i]^2, 3*E[i]*J[i]/l[i], 0, 3*E[i]*J[i]/l[i]^2, 0;
    -E[i]*A[i]/l[i], 0, 0, E[i]*A[i]/l[i], 0, 0;
    0, -3*E[i]*J[i]/l[i]^3, 3*E[i]*J[i]/l[i]^2, 0, 3*E[i]*J[i]/l[i]^3, 0;
    0, 0, 0, 0, 0, 0
]
# Матрица КЭ в глобальной системе координат
K_2(i) := transpose(T_α(i))*vectorize(K'_2(i)*u_2)*T_α(i)
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# Матрица приведения размерностей
u_3 := [
    m, m, m, m, m, m;
    m, m, m, m, m, 1;
    m, m, m, m, m, m;
    m, m, m, m, m, m;
    m, m, m, m, m, 1;
    m, 1, m, m, 1, 1/m
]*1/kN
# Матрица КЭ в локальной системе координат
K'_3(i) := [
    E[i]*A[i]/l[i], 0, 0, -E[i]*A[i]/l[i], 0, 0;
    0, 3*E[i]*J[i]/l[i]^3, 0, 0, -3*E[i]*J[i]/l[i]^3, -3*E[i]*J[i]/l[i]^2;
    0, 0, 0, 0, 0, 0;
    -E[i]*A[i]/l[i], 0, 0, E[i]*A[i]/l[i], 0, 0;
    0, -3*E[i]*J[i]/l[i]^3, 0, 0, 3*E[i]*J[i]/l[i]^3, 3*E[i]*J[i]/l[i]^2;
    0, -3*E[i]*J[i]/l[i]^2, 0, 0, 3*E[i]*J[i]/l[i]^2, 3*E[i]*J[i]/l[i]
]
# Матрица КЭ в глобальной системе координат
K_3(i) := transpose(T_α(i))*vectorize(K'_3(i)*u_3)*T_α(i)
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# Матрица приведения размерностей
u_4 := [
    m, m, m, m, m, m;
    m, m, m, m, m, m;
    m, m, m, m, m, m;
    m, m, m, m, m, m;
    m, m, m, m, m, m;
    m, m, m, m, m, m
]*1/kN
# Матрица КЭ в локальной системе координат
K'_4(i) := [
    E[i]*A[i]/l[i], 0, 0, -E[i]*A[i]/l[i], 0, 0;
    0, 0, 0, 0, 0, 0;
    0, 0, 0, 0, 0, 0;
    -E[i]*A[i]/l[i], 0, 0, E[i]*A[i]/l[i], 0, 0;
    0, 0, 0, 0, 0, 0;
    0, 0, 0, 0, 0, 0
]
# Матрица КЭ в глобальной системе координат
K_4(i) := transpose(T_α(i))*vectorize(K'_4(i)*u_4)*T_α(i)
# Матрица жёсткости конечных элементов
K_i(i) :=
    if R_s[i] == 0 and R_e[i] == 0
        K ← K_1(i)
    else if R_s[i] == 0 and R_e[i] == 1
        K ← K_2(i)
    else if R_s[i] == 1 and R_e[i] == 0
        K ← K_3(i)
    else
        K ← K_4(i)
    K
# Степени свободы узлов | Матрица топологии
DoF :=
    k ← 0
    for i ∈ 0 .. n_j - 1
        for j ∈ 0 .. 2
            dof[i, j] ← i + j + k
        k ← k + 2
    dof
A_f :=
    for i ∈ 0 .. n_f - 1
        for j ∈ 0 .. 2
            af[j, i] ← DoF[j_s[i], j]
            af[j + 3, i] ← DoF[j_e[i], j]
    af
# Матрица положения КЭ | Матрица жесткости в глобальной системе координат
C_i(f) :=
    for i ∈ 0 .. 5
        for j ∈ n_j*3 - 1
            c[i, j] ← 0
    for i ∈ 0 .. 5
        k ← A_f[i, f]
        c[i, k] ← 1
    c
K :=
    for i ∈ 0 .. n_j*3 - 1
        for j ∈ 0 .. n_j*3 - 1
            k[i, j] ← 0
    for i ∈ 0 .. n_f - 1
        k ← k + transpose(C_i(i))*K_i(i)*C_i(i)
    k
# Граничные условия K | Граничные условия F
k_r(K) :=
    K_r ← K
    for i ∈ 0 .. n_j - 1
        rstr ← [U_x[i]; U_z[i]; R_y[i]]
        for j ∈ 0 .. 2
            if rstr[j] ≠ 0
                rs ← i*3 + j
                for k ∈ 0 .. n_j*3 - 1
                    K_r[rs, k] ← 0
                    K_r[k, rs] ← 0
                K_r[rs, rs] ← 1
        if K_r[i*3 + 2, i*3 + 2] == 0
            K_r[i*3 + 2, i*3 + 2] ← 1
    K_r
f_r(F) :=
    F_r ← F
    for i ∈ 0 .. n_j - 1
        rstr ← [U_x[i]; U_z[i]; R_y[i]]
        for j ∈ 0 .. 2
            if rstr[j] ≠ 0
                rs ← i*3 + j
                F_r[rs] ← 0
    F_r
K_r := k_r(K)
# Матрица масс в локальной системе координат | Матрица масс в глобальной системе координат
M'(k) :=
    for i ∈ 0 .. 5
        for j ∈ 0 .. 5
            M[i, j] ← 0
    M[0, 0] ← m_x[j_s[k]]/tonne
    M[3, 3] ← m_x[j_e[k]]/tonne
    M
M :=
    for i ∈ 0 .. n_j*3 - 1
        for j ∈ 0 .. n_j*3 - 1
            m[i, j] ← 0
    for i ∈ 0 .. n_f - 1
        m_i ← transpose(C_i(i))*M'(i)*C_i(i)
        for j ∈ 0 .. n_j*3 - 1
            if m[j, j] == 0
                m[j, j] ← m_i[j, j]
    m
# Число степеней свободы масс | Матрица податливости
n_m :=
    n ← 0
    for i ∈ 0 .. n_j - 1
        if m_x[i] ≠ 0
            n ← n + 1
    n
δ := K_r^-1
d := δ*M
# Собственные значения
λ := submatrix(eigenvals(d), 0, n_m - 1, 0, 0) = [0.00113508; 2.78315e-5; 3.91977e-6]
# Круговая частота | Период
ω := sqrt(1/λ) = [29.6815; 189.554; 505.091]
T := 2*π/ω = [0.211687; 0.0331473; 0.0124397]
# Техническая частота | Собственные векторы
u := eigenvecs(d)
f := ω/(2*π) = [4.72396; 30.1684; 80.3877]
U :=
    k ← 0
    for i ∈ 3, 6 .. n_j*3 - 1
        for j ∈ 0 .. 2
            U[i - k - 3, j] ← u[i, j]
        k ← k + 2
    U
vx := stack(0 m, x_i) = [0; 5.1; 10.2; 15.3] m
vy :=
    for i ∈ 0 .. n - 1
        vy[i] ← stack(0, U[:, i])
    vy
c0 := cspline(vx, vy[0])
u__0(x) := interp(c0, vx, vy[0], x)
c1 := cspline(vx, vy[1])
u__1(x) := interp(c1, vx, vy[1], x)
c2 := cspline(vx, vy[2])
u__2(x) := interp(c2, vx, vy[2], x)
# Формы колебаний
x_m := 0 m, L/100 .. L
# [plot: u__0(x_m), u__1(x_m), u__2(x_m) vs x_m]
# Матрица весов масс
G_m := M*g*s^2/m
G :=
    k ← 0
    for i ∈ 3, 6 .. n_j*3 - 1
        l ← 0
        for j ∈ 3, 6 .. n_j*3 - 1
            g[i - k - 3, j - 3 - l] ← G_m[i, j]
            l ← l + 2
        k ← k + 2
    g
E1 :=
    for i ∈ 0 .. n - 1
        E[i] ← 1
    E
    = [1; 1; 1]
# коэффициент, зависящий от формы деформации здания или сооружения при его собственных колебаниях по i-й форме, от узловой точки приложения рассчитываемой нагрузки и направления сейсмического воздействия
η :=
    for i ∈ 0 .. n - 1
        η[i] ← transpose(U[:, i])*G*E1/(transpose(U[:, i])*G*U[:, i])*U[:, i]
    η
    = [[0.206097; 0.699016; 1.3124]; [0.459585; 0.535203; -0.391604]; [0.334318; -0.234218; 0.0792007]]
# Проверка
η[0][0] + η[1][0] + η[2][0] = 1
η[0][1] + η[1][1] + η[2][1] = 1
η[0][2] + η[1][2] + η[2][2] = 1
# значение ускорения в уровне основания
As := 4 m/s^2
# коэффициент, учитывающий назначение сооружения и его ответственность
K_0 := 1.1
# коэффициент, учитывающий допускаемые повреждения зданий и сооружений
K__1 := 0.3
# коэффициент, учитывающий способность зданий и сооружений к рассеиванию энергии
K_Ψ := 1
# Категории грунтов
soil := 3
βi(T) :=
    if soil == 1
        if T ≤ 0.1
            β_i ← 1 + 15*T
        else if 0.1 < T < 0.4
            β_i ← 2.5
        else
            β_i ← 2.5*(0.4/T)^0.5
    else
        if T ≤ 0.1
            β_i ← 1 + 15*T
        else if 0.1 < T < 0.8
            β_i ← 2.5
        else
            β_i ← 2.5*(0.8/T)^0.5
    if β_i < 0.8
        β_i ← 0.8
    β_i
# Значения коэффициента динамичности
Ti := 0, 2/15 .. 4.5
# [plot: βi(Ti) vs Ti]
β :=
    for i ∈ 0 .. n - 1
        β[i] ← βi(T[i])
    β
    = [2.5; 1.49721; 1.1866]
S_0 :=
    for i ∈ 0 .. n - 1
        S_0[i] ← G/g*η[i]*As*β[i]*K_Ψ*kN
    S_0
# Расчетная сейсмическая нагрузка
S := K_0*K__1*S_0
F_z := [0; 0; 0; 0] kN
M_y := [0; 0; 0; 0] kN*m
# Узловые нагрузки | Перемещения узлов
F_p(F_x) :=
    for i ∈ n_j*3 - 1
        f[i] ← 0
    for i ∈ 0 .. n_f - 1
        f[i*3 + 3] ← F_x[j_s[i]]/kN
        f[i*3 + 4] ← F_z[j_s[i]]/kN
        f[i*3 + 5] ← M_y[j_s[i]]/kN·m
    f
U_i(U) :=
    for i ∈ 0 .. n_j - 1
        u[i] ← [U[i*3]*m; U[i*3 + 1]*m; U[i*3 + 2]*rad]
    u
# Узловые усилия в КЭ
S_i(U) :=
    for i ∈ 0 .. n_f - 1
        U_ ← C_i(i)*U
        s[i] ← (T_α(i)*K_i(i))*U_
    s
# Поперечные силы в сечениях КЭ | Изгибающие моменты в сечениях КЭ
Q_i(U) :=
    S ← S_i(U)
    for i ∈ 0 .. n_f - 1
        q[i] ← [-S[i][1], S[i][4]] kN
    q
M_i(U) :=
    S_i ← S_i(U)
    for i ∈ 0 .. n_f - 1
        m[i] ← [S_i[i][2], -S_i[i][5]]*kN*m
    m
# Решение по форме 0
# Перемещения узлов
U_0 := lsolve(K_r, f_r(F_p(S[0])))
U_i(U_0) = [
    [0 m; 0 m; 0]; [0.000771993 m; 0 m; 0.000279143]; [0.00261835 m; 0 m; 0.000423633]; [0.00491596 m; 0 m; 0.00046395]
]
# Поперечные силы в сечениях КЭ
Q_i(U_0) = [[-14629642, -14629642] N; [-13195456, -13195456] N; [-8331160, -8331160] N] N
# Изгибающие моменты в сечениях КЭ
M_i(U_0) = [[-184397, -109786]; [-109786, -42488.9]; [-42488.9, 0]] kN*m
# Решение по форме 1
# Перемещения узлов
U_1 := lsolve(K_r, f_r(F_p(S[1])))
# Поперечные силы в сечениях КЭ
U_i(U_1) = [
    [0 m; 0 m; 0]; [2.52789e-5 m; 0 m; 5.6273e-6]; [2.94382e-5 m; 0 m; -5.19261e-6]; [-2.15397e-5 m; 0 m; -1.23972e-5]
]
Q_i(U_1) = [[-2657005, -2657005] N; [-741687, -741687] N; [1488770, 1488770] N] N
# Изгибающие моменты в сечениях КЭ
M_i(U_1) = [[-9740.6, 3810.12]; [3810.12, 7592.73]; [7592.73, 0]] kN*m
# Решение по форме 2
# Перемещения узлов
U_2 := lsolve(K_r, f_r(F_p(S[2])))
# Поперечные силы в сечениях КЭ
Q_i(U_2) = [[-569252, -569252] N; [534968, 534968] N; [-238633, -238633] N] N
U_i(U_2) = [
    [0 m; 0 m; 0]; [2.05257e-6 m; 0 m; -1.13328e-7]; [-1.438e-6 m; 0 m; -3.92568e-7]; [4.86257e-7 m; 0 m; 7.62241e-7]
]
# Изгибающие моменты в сечениях КЭ
M_i(U_2) = [[-1391.88, 1511.31]; [1511.31, -1217.03]; [-1217.03, 0]] kN*m
# Перемещения от сейсмического воздействия
U_s := U_i(sqrt(U_0^2 + U_1^2 + U_2^2)) = [
    [0 m; 0 m; 0]; [0.000772409 m; 0 m; 0.0002792]; [0.00261852 m; 0 m; 0.000423665]; [0.00491601 m; 0 m; 0.000464116]
]
# Поперечные силы от сейсмического воздействия
Q_s :=
    for i ∈ 0 .. n_f - 1
        Q[i] ← transpose(Q_i(U_0)[i])^2 + transpose(Q_i(U_1)[i])^2 + transpose(Q_i(U_2)[i])^2
    sqrt(Q)
    = [[14879.9; 14879.9]; [13227.1; 13227.1]; [8466.5; 8466.5]] kN
# Моменты от сейсмического воздействия
M_s :=
    for i ∈ 0 .. n_f - 1
        M[i] ← transpose(M_i(U_0)[i])^2 + transpose(M_i(U_1)[i])^2 + transpose(M_i(U_2)[i])^2
    sqrt(M)
    = [[184659; 109862]; [109862; 43179.1]; [43179.1; 0]] kN*m
