# Расчет газобетонной самонесущей стены по СП 15.13330.2020  "Каменные и армокаменные конструкции"
# Замечание #797
# Блоки марки D600 по плотности | Класс прочности B5
# Марка раствора M50
# (Таблица 9.1) группа кладки I
# Проём
B := 1.64 m
# Толщина стены
h := 200 mm
# Длина стены
l := 6.90 m
# Высота стены
H := 5400 mm
ρ := 600 kg/m^3
# Определение устойчивости стены
# (Таблица 9.3)
β := 25
# Стена закреплена в верхнем сечении
β_t := β*0% = 0  # (п. 9.24)
table  # each column defines a variable
    h_i (cm) | k1
    10 | 1.8
    25 | 1.2
end table
# (Таблица 9.4)
k_1 := linterp(h_i, k1, h) = 1.4
A_b := l*h = 1.38 m^2
A_n := (l - B)*h = 1.052 m^2
k_2 := sqrt(A_n/A_b) = 0.873109
k := k_1*k_2 = 1.22235
β := β*k = 30.5588
# При конструктивном продольном армировании кладки 0.05%
β_r := β*0%  # (п. 9.23)
β := β + β_r - β_t = 30.5588
H/h = 27  # (п. 9.21)
# Коэффициент запаса
β*h/H = 1.13181
ret :=
    if H/h ≤ β
        ret ← "условие выполняется"
    else
        ret ← "условие не выполняется"
    = "условие выполняется"
l = 6.9 m
k*β*h = 7.47072 m
# Предельная высота стены | (п. 9.23)
H_u :=
    if l ≤ k*β*h
        H_u ← 50 m
    else
        H_u ← l/k
    H_u
    = 50 m
l = 6.9 m
H = 5.4 m
H + l = 12.3 m
3*k*β*h = 22.4122 m
ret :=
    if l ≥ H and l ≤ 2*H
        if H + l ≤ 3*k*β*h
            ret ← "условие выполняется"
        else
            ret ← "условие не выполняется"
    else
        if H ≤ H_u
            ret ← "Условие выполняется"
        else
            ret ← "Условие не выполняется"
    ret
    = "условие выполняется"
# Вывод: все условия устойчивости выполняются, проектируемая высота стены 5.4 м., предельная высота не ограничивается (50 м).
