# Предварительный расчет фундамента на естественном основании по СП 22.13330.2016 по деформациям
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# ширина фундамента
b := 2.4 m
# длина фундамента
l := 3 m
# отметка планировки
DL := -0.4 m
# отметка поверхности природного рельефа
NL := -0.5 m
# отметка подошвы фундамента
FL := -3 m
# уровень подземных вод
WL := -10 m
# отметка пола подвала
DB := -0.4 m
# среднее давление под подошвой фундамента
p := 300 kPa
# глубина заложения фундамента от уровня планировки
d := DL - FL = 2.6 m
# глубина заложения фундамента от уровня поверхности природного рельефа
d_n := NL - FL = 2.5 m
# площадь фундамента
A := b*l = 7.2 m^2
# отношение сторон фундамента
η := l/b = 1.25
# ширина котлована
b_e := 2.4 m
# длина котлована
l_e := 3 m
# отношение сторон котлована
η_e := l_e/b_e = 1.25
# Максимальная толщина слоя грунта
h_min := 0.4*b = 0.96 m
# Свойства грунтов под подошвой фундамента
# Удельный вес грунтов
table  # each column defines a variable
    h_i (m) | ρ_i (tonne/m^3) | φ_i (°) | c_i (kPa) | E_i (MPa) | u_i (kPa) | R_0i (kPa)
    0.6 | 1.91 | 20 | 21 | 6.9 | 0 | 0
    0.9 | 1.97 | 22 | 19 | 6.1 | 0 | 0
    0.9 | 1.99 | 16 | 51 | 16.37 | 0 | 60
    0.9 | 1.99 | 16 | 51 | 16.37 | 0 | 0
    0.9 | 1.99 | 16 | 51 | 16.37 | 0 | 0
    0.9 | 1.99 | 16 | 51 | 16.37 | 0 | 0
    0.8 | 1.96 | 21 | 19 | 6.6 | 0 | 0
    0.8 | 1.96 | 21 | 19 | 6.6 | 0 | 0
    0.8 | 1.96 | 21 | 19 | 6.6 | 0 | 0
    0.8 | 2 | 24 | 50 | 18 | 0 | 0
    0.8 | 2 | 24 | 50 | 18 | 0 | 0
    0.8 | 2 | 24 | 50 | 18 | 0 | 0
    0.8 | 2 | 24 | 50 | 18 | 0 | 0
    0.8 | 2 | 24 | 50 | 18 | 0 | 0
    0.8 | 2 | 24 | 50 | 18 | 0 | 0
end table
γ_i := ρ_i*g
n_a := length(h_i) = 15
H_s := sum(h_i) = 12.3 m
# модуль деформации i-го слоя грунта по ветви вторичного нагружения
E_ei := 5*E_i
# Проверка толщины слоёв
for i ∈ 0 .. n_a - 1
    if h_i[i] > h_min
        ht ← format("h{0}>hmin", i)
        break
    else
        ht ← "ok"
    ht
= "ok"
# Расстояния от подошвы фундамента до верха слоёв | Расстояния от подошвы фундамента до низа слоёв
z_top :=
    z_top[0] ← 0 m
    for i ∈ 1 .. n_a - 1
        z_top[i] ← z_top[i - 1] + h_i[i - 1]
    z_top
z_bot :=
    z_bot[0] ← h_i[0]
    for i ∈ 1 .. n_a - 1
        z_bot[i] ← z_bot[i - 1] + h_i[i]
    z_bot
z_mid := (z_top + z_bot)/2
z_0 := 8 m
k_z :=
    if b < 10 m
        k_z ← 1
    else
        k_z ← z_0/b + 0.2
    k_z
    = 1
F := "плитный"
# толщина слоя грунта выше подошвы фундамента со стороны подвала
h_s := 0 m
# толщина слоя грунта ниже подошвы фундамента для определения R
# толщина конструкции пола подвала
h_cf := 0 m
z_1 := 4 m
z :=
    if b < 10 m
        z ← b/2
    else
        z ← z_1 + 0.1*b
    z
    = 1.2 m
# расчетное значение удельного веса конструкции пола подвала
# 5.6.10
γ_cf := 22*kN/m^3
# Слои грунта ниже подошвы фундамента для определения R
n_r :=
    n_r ← 0
    for i ∈ 0 .. n_a - 1
        if z_bot[i] ≤ z
            n_r ← n_r + 1
    n_r
    = 1
h_r := stack(submatrix(h_i, 0, n_r - 1, 0, 0), z_bot[n_r] - z) = [0.6; 0.3] m
# Средневзвешенные значения характеристик грунта под подошвой
# 5.6.7 | 5.6.10
γ_II := sum(γ_i[i]*h_r[i], i = 0 .. n_r)/sum(h_r[i], i = 0 .. n_r) = 18.9268 kN/m^3
φ_II := sum(φ_i[i]*h_r[i], i = 0 .. n_r)/sum(h_r[i], i = 0 .. n_r) = 20.6667°
c_II := sum(c_i[i]*h_r[i], i = 0 .. n_r)/sum(h_r[i], i = 0 .. n_r) = 20.3333 kPa
# γ_II - при наличии подземных вод определяется с учетом взвешивающего действия воды
ψ := π/(1/tan(φ_II) + φ_II - π/2) = 2.18016
sum(h_r[i], i = 0 .. n_r) = 0.9 m
M_y := ψ/4 = 0.54504
M_q := 1 + ψ = 3.18016
M_c := ψ*1/tan(φ_II) = 5.77979
# глубина подвала, расстояние от уровня планировки до пола подвала
d_b :=
    if (DL - DB) > 2 m
        d_b ← 2 m
    else
        d_b ← DL - DB
    = 0 m
# Глубина заложения фундаментов
# удельный вес для грунтов, залегающих выше подошвы
γ'_II := 20*kN/m^3
d_1 :=
    if d_b == 0 m
        d_1 ← d
    else if F == "плитный"
        d_1 ← d
    else
        d_1 ← h_s + h_cf*γ_cf/γ'_II
    d_1
    = 2.6 m
# (5.8)
γ_c1 := 1.25
γ_c2 := 1
k_s := 1
# Расчетное сопротивление грунта основания | (5.7)
R := γ_c1*γ_c2/k_s*(M_y*k_z*b*γ_II + M_q*d_1*γ'_II + (M_q - 1)*d_b*γ'_II + M_c*c_II) = 384.561 kPa
σ_zi(ξ, η, p) :=
    if ξ == 0
        α ← 1
    else
        α_1 ← atan(η/(ξ*sqrt(1 + ξ^2 + η^2)))
        α_2 ← ξ*η*(1 + η^2 + 2*ξ^2)/((ξ^2 + η^2)*(1 + ξ^2)*sqrt(1 + ξ^2 + η^2))
        α ← 2/π*(α_1 + α_2)
    σ_z ← α*p
# Вертикальные напряжения в грунте от внешней нагрузки
# (5.17)
σ_zptop :=
    ξ_i ← 2*z_top/b
    for i ∈ 0 .. n_a - 1
        σ_zpt[i] ← σ_zi(ξ_i[i], η, p)
    σ_zpt
σ_zpbot :=
    ξ_i ← 2*z_bot/b
    for i ∈ 0 .. n_a - 1
        σ_zpb[i] ← σ_zi(ξ_i[i], η, p)
    σ_zpb
# вертикальное напряжение от собственного веса грунта на отметке подошвы фундамента
σ_zg0 :=
    if DL < NL
        σ_zg0 ← γ'_II*d
    else
        σ_zg0 ← γ'_II*d_n
    σ_zg0
    = 50 kPa
# Вертикальные напряжения в грунте при отрывке котлована грунта
# (5.18)
σ_zytop :=
    ξ_i ← 2*z_top/b_e
    for i ∈ 0 .. n_a - 1
        σ_zyt[i] ← σ_zi(ξ_i[i], η_e, σ_zg0)
    σ_zyt
σ_zybot :=
    ξ_i ← 2*z_bot/b_e
    for i ∈ 0 .. n_a - 1
        σ_zyb[i] ← σ_zi(ξ_i[i], η_e, σ_zg0)
    σ_zyb
# Вертикальные напряжения в грунте от собственного веса грунта
# (5.20)
# (5.23)
σ_zgtop :=
    σ_zg ← σ_zg0 - γ_i[0]*h_i[0]
    for i ∈ 0 .. n_a - 1
        σ_zgbot[i] ← σ_zg + γ_i[i]*h_i[i] - u_i[i]
        σ_zg ← σ_zgbot[i]
    σ_zgbot
σ_zgbot :=
    σ_zg ← σ_zg0
    for i ∈ 0 .. n_a - 1
        σ_zgbot[i] ← σ_zg + γ_i[i]*h_i[i] - u_i[i]
        σ_zg ← σ_zgbot[i]
    σ_zgbot
σ_zpmid := (σ_zptop + σ_zpbot)/2
σ_zymid := (σ_zytop + σ_zybot)/2
σ_zgmid := (σ_zgtop + σ_zgbot)/2
# Распределение вертикальных напряжений по глубине основания
# [plot: σ_zptop (kPa), σ_zytop (kPa), σ_zgtop (kPa) vs z_top]
# Минимальная глубина сжимаемой толщи
H_min :=
    if b ≤ 10 m
        H_min ← b/2
    else if b ≤ 60 m
        H_min ← 4 m + 0.1*b
    else
        H_min ← 10 m
    H_min
    = 1.2 m
z_top = [0; 0.6; 1.5; 2.4; 3.3; 4.2; 5.1; 5.9; 6.7; 7.5; 8.3; 9.1; 9.9; 10.7; 11.5] m
# Осадка основания фундамента
β := 0.8
H_ci := z_mid
S_i :=
    S_0 ← 0 cm
    for i ∈ 0 .. n_a - 1
        if p ≤ σ_zg0
            S_i[i] ← S_0 + β*σ_zpmid[i]*h_i[i]/E_ei[i]
            S_0 ← S_i[i]
        else
            S_i[i] ← S_0 + β*(σ_zpmid[i] - σ_zymid[i])*h_i[i]/E_i[i] + β*σ_zymid[i]*h_i[i]/E_ei[i]
            S_0 ← S_i[i]
    S_i
# (5.19)
# (5.16)
S_i[n_a - 1] = 6.36835 cm
# [plot: S_i (cm) vs H_ci]
# Нижняя граница сжимаемой толщи основания | 5.6.41
H05 :=
    for i ∈ 0 .. n_a - 1
        if σ_zptop[i] ≤ 0.5*σ_zgtop[i]
            H_c ← z_top[i]
            break
        else
            H_c ← "Не достаточно грунта"
    H_c
H_c05 := max(H05, H_min) = 4.2 m
i_c05 :=
    for i ∈ 0 .. n_a - 1
        if z_top[i] ≥ H_c05
            i_c ← i - 1
            break
    i_c
    = 4
H100 :=
    for i ∈ 1 .. i_c05
        if E_i[i] > 100 MPa and h_i[i] ≥ H_c05*(1 - nthroot(E_i[i + 1]/E_i[i], 3))
            H_c ← z_top[i]
            i_c ← i
            break
        else
            H_c ← H_c05
            i_c ← i_c05
    [H_c; i_c]
H_c100 := H100[0] = 4.2 m
i_c100 := H100[1] = 4
# (5.23а)
H02 :=
    for i ∈ 0 .. n_a - 1
        if σ_zptop[i] ≤ 0.2*σ_zgtop[i]
            H_c ← z_top[i]
            i_c ← i
            break
        else
            H_c ← "Не достаточно грунта"
            i_c ← i
    [H_c; i_c]
H_c02 := H02[0] = 5.9 m
i_c02 := H02[1] = 7
H7 :=
    if E_i[i_c100 + 1] ≤ 7 MPa
        H_c ← z_top[i_c100 + 1]
        i_c ← i_c100 + 1
    else
        H_c ← z_top[i_c100 + 1]
        i_c ← i_c100
    [H_c; i_c]
H_c7 := H7[0] = 4.2 m
i_c7 := H7[1] = 4
H_c := min(H_c7, H_c02) = 4.2 m
i_c := min(i_c7, i_c02) = 4
H_c = 4.2 m
z_ctop := submatrix(z_top, 0, i_c, 0, 0)
# (5.16)
s_i :=
    if p ≤ σ_zg0
        s_i ← β*sum(σ_zpmid[i]*h_i[i]/E_ei[i], i = 0 .. i_c)
    else
        s_i ← β*(sum((σ_zpmid[i] - σ_zymid[i])*h_i[i]/E_i[i], i = 0 .. i_c) + sum(σ_zymid[i]*h_i[i]/E_ei[i], i = 0 .. i_c))
    s_i
    = 5.37422 cm
# Определение прочности слоёв грунта | 5.6.25
# вертикальная нагрузка на основание от фундамента
N_c := p*A = 2160 kN
A_z := N_c/σ_zptop
a := (l - b)/2 = 0.3 m
# ширина условного фундамента
b_z := sqrt(A_z + a^2) - a  # (5.10)
b_0 := 1 m
d_0 := 2 m
k_1 := 0.05
k_2 := 0.2
R_e(R_0) :=
    if d ≤ 2 m
        R ← R_0*(1 + k_1*(b - b_0)/b_0)*(d + d_0)/(2*d_0)
    else
        R ← R_0*(1 + k_1*(b - b_0)/b_0) + k_2*γ'_II*(d - d_0)
    R
# (Б.1)
# (Б.2)
ψ_ci := π/(1/tan(φ_i) + φ_i - π/2)
M_cy := ψ_ci/4
M_cq := 1 + ψ_ci
M_cc := vectorize(ψ_ci*1/tan(φ_i))
R_z :=
    for i ∈ 0 .. n_a - 1
        if R_0i[i] ≠ 0
            R_c[i] ← R_e(R_0i[i])
        else
            R_c[i] ← γ_c1*γ_c2/k_s*(M_cy[i]*k_z*b_z[i]*γ_i[i] + M_cq[i]*d_1*γ'_II + (M_cq[i] - 1)*d_b*γ'_II + M_cc[i]*c_i[i])
    R_c
σ_z := (σ_zptop - σ_zytop) + σ_zgtop  # (5.9)
# [plot: R_z (kPa), σ_z (kPa) vs z_top]
# 6.13 Особенности проектирования оснований сооружений, возводимых в сейсмических районах
# 6.13.2
# Предварительно тип и размеры фундаментов допускается определять расчетом оснований на основное сочетание нагрузок (без учета сейсмических воздействий) согласно требованиям раздела 5, а затем следует уточнять расчетом на особое сочетание нагрузок с учетом сейсмических воздействий.
